# OpenSim document version 40000
Model WholeBodyModel-yuetian:
  gravity: 0 -9.80665 0
  length_units: meters
  force_units: N
  credits:
    Rajagopal, A, Dembia, C.L., DeMers, M.S., Delp, D.D., Hicks, J.L., and Delp, S.L.
  publications:
    Rajagopal, Apoorva, et al. "Full-Body Musculoskeletal Model for Muscle-Driven Simulation of Human Gait." IEEE Transactions on Biomedical Engineering 63.10 (2016): 2068-2079. (2016)
  Ground
  BodySet:
    Body Abdomen: mass=0.0012626 [kg] mass_center=(0.00785344 0 0) inertia=(2.165837e-6 7.057221e-7 1.654797e-6 0 0 0)
      WrapEllipsoid Abdomen: translation=(0 0 0) quadrant=x dimensions=(0.0098168 0.0785344 0.049084)
    Body sacrum: mass=0 mass_center=(0 0 0) inertia=(0 0 0 0 0 0) meshes=sacrum.vtp
    Body pelvis: mass=15.71412 mass_center=(-0.07069455 0 0) inertia=(0.1371455 0.1162001 0.0772444 0 0 0)
        meshes=(r_pelvis.vtp l_pelvis.vtp sacrum.vtp)
      WrapCylinder Gmax1_at_pelvis_r: xyz_body_rotation=(-0.6 0.45 0) translation=(-0.07699406 -0.09899236 0.06099529)
          quadrant=-x radius=0.03999691 length=0.1499884
      WrapCylinder Gmax2_at_pelvis_r: xyz_body_rotation=(-0.75 0.39 0) translation=(-0.07999383 -0.0829936 0.06799475)
          quadrant=all radius=0.03999691 length=0.09999229
      WrapCylinder Gmax3_at_pelvis_r: xyz_body_rotation=(-0.1 0 0) translation=(-0.0829936 -0.08799321 0.06799475)
          quadrant=all radius=0.03999691 length=0.09999229
      WrapCylinder Gmax1_at_pelvis_l: xyz_body_rotation=(0.6 -0.45 0) translation=(-0.07699406 -0.09899236 -0.06099529)
          quadrant=-x radius=0.03999691 length=0.1499884
      WrapCylinder Gmax2_at_pelvis_l: xyz_body_rotation=(0.75 -0.39 0) translation=(-0.07999383 -0.0829936 -0.06799475)
          quadrant=all radius=0.03999691 length=0.09999229
      WrapCylinder Gmax3_at_pelvis_l: xyz_body_rotation=(0.1 0 0) translation=(-0.0829936 -0.08799321 -0.06799475)
          quadrant=all radius=0.03999691 length=0.09999229
      WrapCylinder PS_at_brim_r: xyz_body_rotation=(-0.25 -0.27 0.1) translation=(-0.07399429 -0.05999537 0.06559494)
          quadrant=-y radius=0.04999614 length=0.09999229
      WrapCylinder PS_at_brim_l: xyz_body_rotation=(0.25 0.27 0.1) translation=(-0.07399429 -0.05999537 -0.06559494)
          quadrant=-y radius=0.04999614 length=0.09999229
      WrapCylinder IL_at_brim_r: xyz_body_rotation=(-0.32 -0.24 0.9) translation=(-0.07099452 -0.06499499 0.07559417)
          quadrant=-y radius=0.05489577 length=0.09999229
      WrapCylinder IL_at_brim_l: xyz_body_rotation=(0.32 0.24 0.9) translation=(-0.07099452 -0.06499499 -0.07559417)
          quadrant=-y radius=0.05489577 length=0.09999229
    Body femur_r: mass=9.588819 mass_center=(0 -0.1559801 0) inertia=(0.1162085 0.03046242 0.122544 0 0 0)
        meshes=r_femur.vtp
      WrapCylinder Gastroc_at_condyles_r: translation=(0.00458765 -0.3761873 0) quadrant=all radius=0.02293825
          length=0.091753
      WrapCylinder KnExt_at_fem_r: xyz_body_rotation=(-0.0623366 0.0507601 0)
          translation=(0.003292355 -0.3695187 0.001918656) quadrant=all radius=0.02293825 length=0.091753
      WrapCylinder AB_at_femshaft_r: xyz_body_rotation=(1.66157 0.186644 0)
          translation=(0.01343576 -0.1033093 0.02143809) quadrant=all radius=0.01513925 length=0.0642271
      WrapCylinder AL_at_femshaft_r: xyz_body_rotation=(1.77711 0.136489 0)
          translation=(0.02819817 -0.2127835 0.01386727) quadrant=all radius=0.01844235 length=0.091753
      WrapCylinder AMprox_at_femshaft_r: xyz_body_rotation=(1.61126 0.18656 0)
          translation=(0.004755549 -0.06688317 0.02330801) quadrant=all radius=0.01935988 length=0.0642271
      WrapCylinder AMmid_at_femshaft_r: xyz_body_rotation=(1.61139 0.13656 0)
          translation=(0.02111466 -0.1474572 0.01888662) quadrant=all radius=0.01963514 length=0.1101036
      WrapCylinder AMdist_at_femshaft_r: xyz_body_rotation=(1.71188 0.186636 0)
          translation=(0.02899991 -0.2392331 0.008592301) quadrant=all radius=0.02000215 length=0.183506
      WrapCylinder AMisch_at_condyles_r: xyz_body_rotation=(1.71115 -0.463363 0)
          translation=(-0.02078306 -0.3457537 -0.002894229) quadrant=all radius=0.0367012 length=0.2202072
      WrapCylinder PECT_at_femshaft_r: xyz_body_rotation=(1.81295 0.276344 0)
          translation=(0.00558384 -0.07753395 0.02793007) quadrant=all radius=0.01376295 length=0.0458765
    Body tibia_r: mass=3.297812 mass_center=(0 -0.1630825 0) inertia=(0.0342059 0.003461312 0.03468099 0 0 0)
        meshes=(r_tibia.vtp r_fibula.vtp)
      WrapCylinder GasLat_at_shank_r: xyz_body_rotation=(2.96723 -0.279725 -1.47812)
          translation=(-0.0064639 -0.064639 -0.00288255) quadrant=-y radius=0.0480425 length=0.08735
      WrapCylinder GasMed_at_shank_r: xyz_body_rotation=(2.96723 0.0279725 -1.47812)
          translation=(-0.0064639 -0.064639 -0.00288255) quadrant=-y radius=0.0480425 length=0.08735
      WrapCylinder GR_at_condyles_r: xyz_body_rotation=(0 -0.4 0) translation=(-0.0026205 -0.01747 0) quadrant=all
          radius=0.031446 length=0.08735
      WrapCylinder SM_at_condyles_r: xyz_body_rotation=(0 -0.1 0) translation=(-0.0008735 -0.01747 0) quadrant=all
          radius=0.0307472 length=0.08735
      WrapCylinder ST_at_condyles_r: xyz_body_rotation=(0 -0.2 0) translation=(-0.001747 -0.01790675 0) quadrant=all
          radius=0.03712375 length=0.08735
      WrapCylinder BF_at_gastroc_r: translation=(-0.050663 -0.05241 0) quadrant=y radius=0.026205 length=0.131025
    Body patella_r: mass=0.125269 mass_center=(0.001851822 0.02716006 0)
        inertia=(4.414399e-6 2.016473e-5 2.016473e-5 0 0 0) meshes=r_patella.vtp
    Body talus_r: mass=0.1351502 mass_center=(0 0 0) inertia=(0.001362878 0.001362878 0.001362878 0 0 0)
        meshes=r_talus.vtp
    Body calcn_r: mass=1.689377 mass_center=(0.10042 0.030126 0) inertia=(0.00190803 0.005315225 0.005587801 0 0 0)
        meshes=r_foot.vtp
    Body toes_r: mass=0.2927353 mass_center=(0.03474532 0.0060252 -0.0175735)
        inertia=(0.0001362878 0.0002725757 0.001362878 0 0 0) meshes=r_bofoot.vtp
    Body femur_l: mass=9.588819 mass_center=(0 -0.1559801 0) inertia=(0.1162085 0.03046242 0.122544 0 0 0)
        meshes=l_femur.vtp
      WrapCylinder Gastroc_at_condyles_l: translation=(0.00458765 -0.3761873 0) quadrant=all radius=0.02293825
          length=0.091753
      WrapCylinder KnExt_at_fem_l: xyz_body_rotation=(0.0623366 -0.0507601 0)
          translation=(0.003292355 -0.3695187 -0.001918656) quadrant=all radius=0.02293825 length=0.091753
      WrapCylinder AB_at_femshaft_l: xyz_body_rotation=(-1.66157 -0.186644 0)
          translation=(0.01343576 -0.1033093 -0.02143809) quadrant=all radius=0.01513925 length=0.0642271
      WrapCylinder AL_at_femshaft_l: xyz_body_rotation=(-1.77711 -0.136489 0)
          translation=(0.02819817 -0.2127835 -0.01386727) quadrant=all radius=0.01844235 length=0.091753
      WrapCylinder AMprox_at_femshaft_l: xyz_body_rotation=(-1.61126 -0.18656 0)
          translation=(0.004755549 -0.06688317 -0.02330801) quadrant=all radius=0.01935988 length=0.0642271
      WrapCylinder AMmid_at_femshaft_l: xyz_body_rotation=(-1.61139 -0.13656 0)
          translation=(0.02111466 -0.1474572 -0.01888662) quadrant=all radius=0.01963514 length=0.1101036
      WrapCylinder AMdist_at_femshaft_l: xyz_body_rotation=(-1.71188 -0.186636 0)
          translation=(0.02899991 -0.2392331 -0.008592301) quadrant=all radius=0.02000215 length=0.183506
      WrapCylinder AMisch_at_condyles_l: xyz_body_rotation=(-1.71115 0.463363 0)
          translation=(-0.02078306 -0.3457537 0.002894229) quadrant=all radius=0.0367012 length=0.2202072
      WrapCylinder PECT_at_femshaft_l: xyz_body_rotation=(-1.81295 -0.276344 0)
          translation=(0.00558384 -0.07753395 -0.02793007) quadrant=all radius=0.01376295 length=0.0458765
    Body tibia_l: mass=3.297812 mass_center=(0 -0.1630825 0) inertia=(0.0342059 0.003461312 0.03468099 0 0 0)
        meshes=(l_tibia.vtp l_fibula.vtp)
      WrapCylinder GasLat_at_shank_l: xyz_body_rotation=(-2.96723 0.279725 -1.47812)
          translation=(-0.0064639 -0.064639 0.00288255) quadrant=-y radius=0.0480425 length=0.08735
      WrapCylinder GasMed_at_shank_l: xyz_body_rotation=(-2.96723 -0.0279725 -1.47812)
          translation=(-0.0064639 -0.064639 0.00288255) quadrant=-y radius=0.0480425 length=0.08735
      WrapCylinder GR_at_condyles_l: xyz_body_rotation=(0 0.4 0) translation=(-0.0026205 -0.01747 0) quadrant=all
          radius=0.031446 length=0.08735
      WrapCylinder SM_at_condyles_l: xyz_body_rotation=(0 0.1 0) translation=(-0.0008735 -0.01747 0) quadrant=all
          radius=0.0307472 length=0.08735
      WrapCylinder ST_at_condyles_l: xyz_body_rotation=(0 0.2 0) translation=(-0.001747 -0.01790675 0) quadrant=all
          radius=0.03712375 length=0.08735
      WrapCylinder BF_at_gastroc_l: translation=(-0.050663 -0.05241 0) quadrant=all radius=0.026205 length=0.131025
    Body patella_l: mass=0.125269 mass_center=(0.001851822 0.02716006 0)
        inertia=(4.414399e-6 2.016473e-5 2.016473e-5 0 0 0) meshes=l_patella.vtp
    Body talus_l: mass=0.1351502 mass_center=(0 0 0) inertia=(0.001362878 0.001362878 0.001362878 0 0 0)
        meshes=l_talus.vtp
    Body calcn_l: mass=1.689377 mass_center=(0.10042 0.030126 0) inertia=(0.00190803 0.005315225 0.005587801 0 0 0)
        meshes=l_foot.vtp
    Body toes_l: mass=0.2927353 mass_center=(0.03474532 0.0060252 0.0175735)
        inertia=(0.0001362878 0.0002725757 0.001362878 0 0 0) meshes=l_bofoot.vtp
    Body torso: mass=21.24052 mass_center=(-0.0294726 0.3143744 0) inertia=(1.456332 0.6269778 1.42068 0 0 0)
        meshes=(cerv1sm.vtp cerv2sm.vtp cerv3sm.vtp cerv4sm.vtp cerv5sm.vtp cerv6sm.vtp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)
      WrapCylinder Cylinder: translation=(-0.2043434 0.0392968 0) quadrant=all radius=0.1670114 length=0.2554292
      WrapEllipsoid Chest_r: xyz_body_rotation=(0 -0.4 0.2) translation=(0 0.2063082 0.0098242) quadrant=z
          dimensions=(0.0736815 0.1670114 0.1277146)
      WrapEllipsoid Chest_l: xyz_body_rotation=(0 0.4 0.2) translation=(0 0.2063082 -0.0098242) quadrant=-z
          dimensions=(0.0736815 0.1670114 0.1277146)
      WrapEllipsoid Chest_pect: xyz_body_rotation=(0 0 0.35) translation=(0.01277146 0.245605 0) quadrant=all
          dimensions=(0.0736815 0.1670114 0.1336091)
    Body humerus_r: mass=2.204645 mass_center=(0 -0.1535166 0) inertia=(0.01128493 0.00389295 0.01266696 0 0 0)
        meshes=humerus_rv.vtp
      WrapSphere deltoid: xyz_body_rotation=(-0.193033 -0.238063 0) translation=(0.00606593 -0.000839898 -0.003546236)
          quadrant=all radius=0.02445036
      WrapSphere inf_sup_sub: xyz_body_rotation=(-0.193033 -0.238063 0)
          translation=(0.00513271 0.001679796 -0.007559082) quadrant=all radius=0.01969094
      WrapCylinder infra_cyl: xyz_body_rotation=(1.56643 0.00610865 0)
          translation=(0.008772268 -0.02146406 -0.00186644) quadrant=-x radius=0.0139983 length=0.1026542
      WrapCylinder ter_min_cyl: xyz_body_rotation=(1.56643 0.00610865 -1.47672) translation=(0.001026542 -0.02146406 0)
          quadrant=-y radius=0.0139983 length=0.093322
      WrapCylinder ter_lat_pec: xyz_body_rotation=(1.56643 0.00610865 0) translation=(0.01123597 -0.04946066 0)
          quadrant=all radius=0.00746576 length=0.093322
    Body ulna_r: mass=0.7351117 mass_center=(0 -0.1166525 0) inertia=(0.003357579 0.0007005346 0.0036421 0 0 0)
        meshes=ulna_rv.vtp
      WrapCylinder elbow: translation=(-0.00387148 -0.004355415 0.009581913) quadrant=y radius=0.01838953
          length=0.04645776
      WrapCylinder elbow_circ: translation=(-0.01451805 -0.004355415 0.009581913) quadrant=all radius=0.01451805
          length=0.04645776
    Body radius_r: mass=0.7830559 mass_center=(0 -0.1191353 0) inertia=(0.003730427 0.0007783267 0.004046543 0 0 0)
        meshes=radius_rv.vtp
      WrapCylinder supinator: xyz_body_rotation=(-1.78 0 -0.5) translation=(-0.002273481 -0.118221 0.02273481)
          quadrant=-y radius=0.00691929 length=0.2471175
      WrapCylinder ulna_radius: xyz_body_rotation=(1.4 0 3) translation=(-0.00197694 -0.08797383 0.01383858)
          quadrant=-x radius=0.007018137 length=0.0593082
      WrapCylinder supinator2: xyz_body_rotation=(-3 1.58 3) translation=(-0.00098847 -0.003459645 0.00296541)
          quadrant=-x radius=0.00593082 length=0.0197694
      WrapCylinder supinator3: xyz_body_rotation=(-1 -1.58 2) translation=(-0.00098847 -0.003459645 0.00296541)
          quadrant=-x radius=0.00593082 length=0.0197694
    Body hand_r: mass=0.1395548 mass_center=(0 -0.04163396 0) inertia=(0.0001017147 6.237434e-5 0.0001528 0 0 0)
        meshes=(pisiform_rvs.vtp lunate_rvs.vtp scaphoid_rvs.vtp triquetrum_rvs.vtp hamate_rvs.vtp capitate_rvs.vtp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)
    Body humerus_l: mass=2.004305 mass_center=(0 -0.148718 0) inertia=(0.009628103 0.003321397 0.01080724 0 0 0)
        meshes=humerus_lv.vtp
      WrapSphere deltoid_l: xyz_body_rotation=(0.193033 0.238063 0) translation=(0.005876325 -0.000813645 0.00343539)
          quadrant=all radius=0.02368611
      WrapSphere inf_sup_sub_l: xyz_body_rotation=(-0.193033 -0.238063 0)
          translation=(0.004972275 0.00162729 0.007322805) quadrant=all radius=0.01907546
      WrapCylinder infra_cyl_l: xyz_body_rotation=(1.56643 -0.00610865 0)
          translation=(0.00849807 -0.02079315 0.0018081) quadrant=-x radius=0.01356075 length=0.0994455
      WrapCylinder ter_min_cyl_l: xyz_body_rotation=(1.56643 -0.00610865 -1.47672)
          translation=(0.000994455 -0.02079315 0) quadrant=-y radius=0.01356075 length=0.090405
      WrapCylinder ter_lat_pec_l: xyz_body_rotation=(1.56643 -0.00610865 0) translation=(0.01088476 -0.04791465 0)
          quadrant=all radius=0.0072324 length=0.090405
    Body ulna_l: mass=0.7351117 mass_center=(0 -0.1166525 0) inertia=(0.003357579 0.0007005346 0.0036421 0 0 0)
        meshes=ulna_lv.vtp
      WrapCylinder elbow_l: translation=(-0.00387148 -0.004355415 -0.009581913) quadrant=y radius=0.01838953
          length=0.04645776
      WrapCylinder elbow_circ_l: translation=(-0.01451805 -0.004355415 -0.009581913) quadrant=all radius=0.01451805
          length=0.04645776
    Body radius_l: mass=0.7830559 mass_center=(0 -0.1191353 0) inertia=(0.003730427 0.0007783267 0.004046543 0 0 0)
        meshes=radius_lv.vtp
      WrapCylinder supinator_l: xyz_body_rotation=(1.78 0 -0.5) translation=(-0.002273481 -0.118221 -0.02273481)
          quadrant=-y radius=0.00691929 length=0.2471175
      WrapCylinder ulna_radius_l: xyz_body_rotation=(-1.4 0 3) translation=(-0.00197694 -0.08797383 -0.01383858)
          quadrant=-x radius=0.007018137 length=0.0593082
      WrapCylinder supinator2_l: xyz_body_rotation=(3 -1.58 3) translation=(-0.00098847 -0.003459645 -0.00296541)
          quadrant=-x radius=0.00593082 length=0.0197694
      WrapCylinder supinator3_l: xyz_body_rotation=(1 1.58 2) translation=(-0.00098847 -0.003459645 -0.00296541)
          quadrant=-x radius=0.00593082 length=0.0197694
    Body hand_l: mass=0.1395548 mass_center=(0 -0.04163396 0) inertia=(0.0001017147 6.237434e-5 0.0001528 0 0 0)
        meshes=(pisiform_lvs.vtp lunate_lvs.vtp scaphoid_lvs.vtp triquetrum_lvs.vtp hamate_lvs.vtp capitate_lvs.vtp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)
    Body lumbar5: mass=1.58534 mass_center=(0.01497813 0.01586226 0) inertia=(0.1163783 0.01418839 0.1119835 0 0 0)
        meshes=lumbar5.vtp
    Body lumbar4: mass=1.563611 mass_center=(0.01612229 0.01889195 0) inertia=(0.111802 0.0135039 0.1078643 0 0 0)
        meshes=lumbar4.vtp
    Body lumbar3: mass=1.45149 mass_center=(0.01551025 0.02017358 0) inertia=(0.102979 0.01300205 0.0995507 0 0 0)
        meshes=lumbar3.vtp
    Body lumbar2: mass=1.468004 mass_center=(0.02188315 0.01751991 0) inertia=(0.1062494 0.01435015 0.1029843 0 0 0)
        meshes=lumbar2.vtp
    Body lumbar1: mass=1.457574 mass_center=(0.0283787 0.01682205 0.001151886)
        inertia=(0.106218 0.01575812 0.1031292 0 0 0) meshes=lumbar1.vtp
    Body LB_wrap: mass=0.0008691558 mass_center=(-0.08494542 0.06154209 0)
        inertia=(4.478616e-6 4.478616e-6 1.599895e-6 0 0 0)
      WrapCylinder Cylinder2: translation=(-0.09976753 0.06656947 0) quadrant=all radius=0.0606753 length=0.2253654
    Body clavicle_1: mass=0 mass_center=(0 0 0) inertia=(0 0 0 0 0 0)
    Body clavicle_2: mass=0 mass_center=(0 0 0) inertia=(0 0 0 0 0 0)
    Body clavicle_r: mass=0.1478865 mass_center=(-0.009278136 0.005325645 0.04527661)
        inertia=(0.0001457221 0.0001457221 2.668291e-5 -1.140121e-5 -4.201277e-5 3.226162e-5) meshes=clavicle.vtp
    Body scapula_1: mass=0 mass_center=(0 0 0) inertia=(0 0 0 0 0 0)
    Body scapula_2: mass=0 mass_center=(0 0 0) inertia=(0 0 0 0 0 0)
    Body scapula_r: mass=0.7193548 mass_center=(-0.0560165 -0.03588121 -0.04477513)
        inertia=(0.001332535 0.00123274 0.001332535 0.0004817575 0.0004386409 0.0002584713) meshes=scapula.vtp
      WrapCylinder delt_ant: translation=(-0.01501074 -0.04099109 -0.02679509) quadrant=x radius=0.01126686
          length=0.0614556
    Body clavicle_l_1: mass=0 mass_center=(0 0 0) inertia=(0 0 0 0 0 0)
    Body clavicle_l_2: mass=0 mass_center=(0 0 0) inertia=(0 0 0 0 0 0)
    Body clavicle_l: mass=0.1478865 mass_center=(-0.009278136 0.005325645 -0.04527661)
        inertia=(0.0001457221 0.0001457221 2.668291e-5 -1.140121e-5 4.201277e-5 -3.226162e-5) meshes=clavicle_l.vtp
    Body scapula_l_1: mass=0 mass_center=(0 0 0) inertia=(0 0 0 0 0 0)
    Body scapula_l_2: mass=0 mass_center=(0 0 0) inertia=(0 0 0 0 0 0)
    Body scapula_l: mass=0.7193548 mass_center=(-0.0560165 -0.03588121 0.04477513)
        inertia=(0.001332535 0.00123274 0.001332535 0.0004817575 -0.0004386409 -0.0002584713) meshes=scapula_l.vtp
      WrapCylinder delt_ant_l: translation=(-0.01501074 -0.04099109 0.02679509) quadrant=x radius=0.01126686
          length=0.0614556
  JointSet:
    CustomJoint ground_pelvis: socket_parent_frame=ground_offset socket_child_frame=pelvis_offset
      Coordinate pelvis_tilt: default_value=-3.872706e-11 range=(-1.570796 1.570796) clamped=true
      Coordinate pelvis_list: default_value=-3.54233e-14 range=(-1.570796 1.570796) clamped=true locked=true
      Coordinate pelvis_rotation: default_value=-3.709765e-11 range=(-1.570796 1.570796) clamped=true locked=true
      Coordinate pelvis_tx: default_value=0 range=(-5 5) clamped=true
      Coordinate pelvis_ty: default_value=0.94 range=(-1 2) clamped=true
      Coordinate pelvis_tz: default_value=0 range=(-3 3) clamped=true
      PhysicalOffsetFrame ground_offset: socket_parent=/ground translation=(0 0 0) [meters]
      PhysicalOffsetFrame pelvis_offset: socket_parent=/bodyset/pelvis translation=(0 0 0)
      SpatialTransform:
        TransformAxis rotation1: coordinates=pelvis_tilt axis=(0 0 1) LinearFunction(coefficients=1 0)
        TransformAxis rotation2: coordinates=pelvis_list axis=(1 0 0) LinearFunction(coefficients=1 0)
        TransformAxis rotation3: coordinates=pelvis_rotation axis=(0 1 0) LinearFunction(coefficients=1 0)
        TransformAxis translation1: coordinates=pelvis_tx axis=(1 0 0) LinearFunction(coefficients=1 0)
        TransformAxis translation2: coordinates=pelvis_ty axis=(0 1 0) LinearFunction(coefficients=1 0)
        TransformAxis translation3: coordinates=pelvis_tz axis=(0 0 1) LinearFunction(coefficients=1 0)
    WeldJoint sacrumjnt: socket_parent_frame=pelvis_offset socket_child_frame=sacrum_offset
      PhysicalOffsetFrame pelvis_offset: socket_parent=/bodyset/pelvis translation=(0.009999229 -0.01699869 0)
      PhysicalOffsetFrame sacrum_offset: socket_parent=/bodyset/sacrum translation=(0 0 0)
    CustomJoint hip_r: socket_parent_frame=pelvis_offset socket_child_frame=femur_r_offset
      Coordinate hip_flexion_r: default_value=0 range=(-2.094395 2.094395) clamped=true
      Coordinate hip_adduction_r: default_value=0 range=(-2.094395 2.094395) clamped=true
      Coordinate hip_rotation_r: default_value=0 range=(-2.094395 2.094395) clamped=true
      PhysicalOffsetFrame pelvis_offset: socket_parent=/bodyset/pelvis translation=(-0.07069455 -0.0660949 0.08349356)
      PhysicalOffsetFrame femur_r_offset: socket_parent=/bodyset/femur_r translation=(0 0 0)
      SpatialTransform: axes_held_at_zero=(translation1 translation2 translation3)
        TransformAxis rotation1: coordinates=hip_flexion_r axis=(0 0 1) LinearFunction(coefficients=1 0)
        TransformAxis rotation2: coordinates=hip_adduction_r axis=(1 0 0) LinearFunction(coefficients=1 0)
        TransformAxis rotation3: coordinates=hip_rotation_r axis=(0 1 0) LinearFunction(coefficients=1 0)
    CustomJoint hip_l: socket_parent_frame=pelvis_offset socket_child_frame=femur_l_offset
      Coordinate hip_flexion_l: default_value=0 range=(-2.094395 2.094395) clamped=true
      Coordinate hip_adduction_l: default_value=0 range=(-2.094395 2.094395) clamped=true
      Coordinate hip_rotation_l: default_value=0 range=(-2.094395 2.094395) clamped=true
      PhysicalOffsetFrame pelvis_offset: socket_parent=/bodyset/pelvis translation=(-0.07069455 -0.0660949 -0.08349356)
      PhysicalOffsetFrame femur_l_offset: socket_parent=/bodyset/femur_l translation=(0 0 0)
      SpatialTransform: axes_held_at_zero=(translation1 translation2 translation3)
        TransformAxis rotation1: coordinates=hip_flexion_l axis=(0 0 1) LinearFunction(coefficients=1 0)
        TransformAxis rotation2: coordinates=hip_adduction_l axis=(-1 0 0) LinearFunction(coefficients=1 0)
        TransformAxis rotation3: coordinates=hip_rotation_l axis=(0 -1 0) LinearFunction(coefficients=1 0)
    CustomJoint walker_knee_r: socket_parent_frame=femur_r_offset socket_child_frame=tibia_r_offset
      Coordinate knee_angle_r: default_value=0 range=(0 2.0944) clamped=true
      PhysicalOffsetFrame femur_r_offset: socket_parent=/bodyset/femur_r
          translation=(-0.007422818 -0.3743155 -0.002523207) orientation=(-1.64157 1.44618 1.5708) [radians]
      PhysicalOffsetFrame tibia_r_offset: socket_parent=/bodyset/tibia_r
          translation=(-0.007066213 -0.003087648 -0.00129692) orientation=(-1.64157 1.44618 1.5708)
      SpatialTransform: axes_held_at_zero=translation3
        TransformAxis rotation1: coordinates=knee_angle_r axis=(1 0 0) LinearFunction(coefficients=1 0)
        TransformAxis rotation2: coordinates=knee_angle_r axis=(0 0 1)
          SimmSpline: x=(0 0.174533 0.349066 0.523599 0.698132 0.872665 1.0472 1.22173 1.39626 1.5708 1.74533 1.91986 2.0944)
              y=(0 0.0126809 0.0226969 0.0296054 0.0332049 0.0335354 0.0308779 0.0257548 0.0189295 0.011407 0.00443314 -0.00050475 -0.0016782)
        TransformAxis rotation3: coordinates=knee_angle_r axis=(0 1 0)
          SimmSpline: x=(0 0.174533 0.349066 0.523599 0.698132 0.872665 1.0472 1.22173 1.39626 1.5708 1.74533 1.91986 2.0944)
              y=(0 0.059461 0.109399 0.150618 0.18392 0.210107 0.229983 0.24435 0.254012 0.25977 0.262428 0.262788 0.261654)
        TransformAxis translation1: coordinates=knee_angle_r axis=(0 1 0)
          MultiplierFunction: scale=0.91753
            SimmSpline: x=(0 0.174533 0.349066 0.523599 0.698132 0.872665 1.0472 1.22173 1.39626 1.5708 1.74533 1.91986 2.0944)
                y=(0 0.000479 0.000835 0.001086 0.001251 0.001346 0.001391 0.001403 0.0014 0.0014 0.001421 0.001481 0.001599)
        TransformAxis translation2: coordinates=knee_angle_r axis=(0 0 1)
          MultiplierFunction: scale=0.91753
            SimmSpline: x=(0 0.174533 0.349066 0.523599 0.698132 0.872665 1.0472 1.22173 1.39626 1.5708 1.74533 1.91986 2.0944)
                y=(0 0.000988 0.001899 0.002734 0.003492 0.004173 0.004777 0.005305 0.005756 0.00613 0.006427 0.006648 0.006792)
    CustomJoint patellofemoral_r: socket_parent_frame=femur_r_offset socket_child_frame=patella_r_offset
      Coordinate knee_angle_r_beta: default_value=0 range=(-99999.9 99999.9) clamped=false
      PhysicalOffsetFrame femur_r_offset: socket_parent=/bodyset/femur_r
          translation=(-0.007422818 -0.3743155 -0.002523207)
      PhysicalOffsetFrame patella_r_offset: socket_parent=/bodyset/patella_r translation=(0 0 0)
      SpatialTransform: axes_held_at_zero=(rotation2 rotation3)
        TransformAxis rotation1: coordinates=knee_angle_r_beta axis=(0 0 1)
          SimmSpline: x=(0 0.174533 0.349066 0.523599 0.698132 0.872665 1.0472 1.22173 1.39626 1.5708 1.74533 1.91986 2.0944)
              y=(0.00113686 -0.00629212 -0.105582 -0.253683 -0.414245 -0.579047 -0.747244 -0.91799 -1.09044 -1.26379 -1.43763 -1.61186 -1.78634)
        TransformAxis translation1: coordinates=knee_angle_r_beta axis=(1 0 0)
          MultiplierFunction: scale=0.91753
            SimmSpline: x=(0 0.174533 0.349066 0.523599 0.698132 0.872665 1.0472 1.22173 1.39626 1.5708 1.74533 1.91986 2.0944)
                y=(0.0524 0.0488 0.0437 0.0371 0.0296 0.0216 0.0136 0.0057 -0.0019 -0.0088 -0.0148 -0.0196 -0.0227)
        TransformAxis translation2: coordinates=knee_angle_r_beta axis=(0 1 0)
          MultiplierFunction: scale=0.91753
            SimmSpline: x=(0 0.174533 0.349066 0.523599 0.698132 0.872665 1.0472 1.22173 1.39626 1.5708 1.74533 1.91986 2.0944)
                y=(-0.0108 -0.019 -0.0263 -0.0322 -0.0367 -0.0395 -0.0408 -0.0404 -0.0384 -0.0349 -0.0301 -0.0245 -0.0187)
        TransformAxis translation3: axis=(0 0 1) MultiplierFunction(scale=0.91753, Constant(value=0.00275))
    PinJoint ankle_r: socket_parent_frame=tibia_r_offset socket_child_frame=talus_r_offset
      Coordinate ankle_angle_r: default_value=0 range=(-0.6981317 0.5235988) clamped=true
      PhysicalOffsetFrame tibia_r_offset: socket_parent=/bodyset/tibia_r translation=(-0.008735 -0.3494 0)
          orientation=(0.175895 -0.105208 0.0186622)
      PhysicalOffsetFrame talus_r_offset: socket_parent=/bodyset/talus_r translation=(0 0 0)
          orientation=(0.175895 -0.105208 0.0186622)
    PinJoint subtalar_r: socket_parent_frame=talus_r_offset socket_child_frame=calcn_r_offset
      Coordinate subtalar_angle_r: default_value=0 range=(-0.3490659 0.3490659) clamped=true
      PhysicalOffsetFrame talus_r_offset: socket_parent=/bodyset/talus_r
          translation=(-0.04897483 -0.04212619 0.007953264) orientation=(-1.76819 0.906223 1.8196)
      PhysicalOffsetFrame calcn_r_offset: socket_parent=/bodyset/calcn_r translation=(0 0 0)
          orientation=(-1.76819 0.906223 1.8196)
    PinJoint mtp_r: socket_parent_frame=calcn_r_offset socket_child_frame=toes_r_offset
      Coordinate mtp_angle_r: default_value=0 range=(-0.5235988 0.5235988) clamped=true
      PhysicalOffsetFrame calcn_r_offset: socket_parent=/bodyset/calcn_r translation=(0.179551 -0.0020084 0.001084536)
          orientation=(-3.14159 0.619901 0)
      PhysicalOffsetFrame toes_r_offset: socket_parent=/bodyset/toes_r translation=(0 0 0)
          orientation=(-3.14159 0.619901 0)
    CustomJoint walker_knee_l: socket_parent_frame=femur_l_offset socket_child_frame=tibia_l_offset
      Coordinate knee_angle_l: default_value=0 range=(0 2.0944) clamped=true
      PhysicalOffsetFrame femur_l_offset: socket_parent=/bodyset/femur_l
          translation=(-0.007422818 -0.3743155 0.002523207) orientation=(1.64157 -1.44618 1.5708)
      PhysicalOffsetFrame tibia_l_offset: socket_parent=/bodyset/tibia_l
          translation=(-0.007066213 -0.003087648 0.00129692) orientation=(1.64157 -1.44618 1.5708)
      SpatialTransform: axes_held_at_zero=translation3
        TransformAxis rotation1: coordinates=knee_angle_l axis=(-1 0 0) LinearFunction(coefficients=1 0)
        TransformAxis rotation2: coordinates=knee_angle_l axis=(0 0 1)
          SimmSpline: x=(0 0.174533 0.349066 0.523599 0.698132 0.872665 1.0472 1.22173 1.39626 1.5708 1.74533 1.91986 2.0944)
              y=(0 0.0126809 0.0226969 0.0296054 0.0332049 0.0335354 0.0308779 0.0257548 0.0189295 0.011407 0.00443314 -0.00050475 -0.0016782)
        TransformAxis rotation3: coordinates=knee_angle_l axis=(0 1 0)
          SimmSpline: x=(0 0.174533 0.349066 0.523599 0.698132 0.872665 1.0472 1.22173 1.39626 1.5708 1.74533 1.91986 2.0944)
              y=(0 -0.059461 -0.109399 -0.150618 -0.18392 -0.210107 -0.229983 -0.24435 -0.254012 -0.25977 -0.262428 -0.262788 -0.261654)
        TransformAxis translation1: coordinates=knee_angle_l axis=(0 1 0)
          MultiplierFunction: scale=0.91753
            SimmSpline: x=(0 0.174533 0.349066 0.523599 0.698132 0.872665 1.0472 1.22173 1.39626 1.5708 1.74533 1.91986 2.0944)
                y=(0 0.000479 0.000835 0.001086 0.001251 0.001346 0.001391 0.001403 0.0014 0.0014 0.001421 0.001481 0.001599)
        TransformAxis translation2: coordinates=knee_angle_l axis=(0 0 1)
          MultiplierFunction: scale=0.91753
            SimmSpline: x=(0 0.174533 0.349066 0.523599 0.698132 0.872665 1.0472 1.22173 1.39626 1.5708 1.74533 1.91986 2.0944)
                y=(0 -0.000988 -0.001899 -0.002734 -0.003492 -0.004173 -0.004777 -0.005305 -0.005756 -0.00613 -0.006427 -0.006648 -0.006792)
    CustomJoint patellofemoral_l: socket_parent_frame=femur_l_offset socket_child_frame=patella_l_offset
      Coordinate knee_angle_l_beta: default_value=0 range=(-99999.9 99999.9) clamped=false
      PhysicalOffsetFrame femur_l_offset: socket_parent=/bodyset/femur_l
          translation=(-0.007422818 -0.3743155 0.002523207)
      PhysicalOffsetFrame patella_l_offset: socket_parent=/bodyset/patella_l translation=(0 0 0)
      SpatialTransform: axes_held_at_zero=(rotation2 rotation3)
        TransformAxis rotation1: coordinates=knee_angle_l_beta axis=(0 0 1)
          SimmSpline: x=(0 0.174533 0.349066 0.523599 0.698132 0.872665 1.0472 1.22173 1.39626 1.5708 1.74533 1.91986 2.0944)
              y=(0.00113686 -0.00629212 -0.105582 -0.253683 -0.414245 -0.579047 -0.747244 -0.91799 -1.09044 -1.26379 -1.43763 -1.61186 -1.78634)
        TransformAxis translation1: coordinates=knee_angle_l_beta axis=(1 0 0)
          MultiplierFunction: scale=0.91753
            SimmSpline: x=(0 0.174533 0.349066 0.523599 0.698132 0.872665 1.0472 1.22173 1.39626 1.5708 1.74533 1.91986 2.0944)
                y=(0.0524 0.0488 0.0437 0.0371 0.0296 0.0216 0.0136 0.0057 -0.0019 -0.0088 -0.0148 -0.0196 -0.0227)
        TransformAxis translation2: coordinates=knee_angle_l_beta axis=(0 1 0)
          MultiplierFunction: scale=0.91753
            SimmSpline: x=(0 0.174533 0.349066 0.523599 0.698132 0.872665 1.0472 1.22173 1.39626 1.5708 1.74533 1.91986 2.0944)
                y=(-0.0108 -0.019 -0.0263 -0.0322 -0.0367 -0.0395 -0.0408 -0.0404 -0.0384 -0.0349 -0.0301 -0.0245 -0.0187)
        TransformAxis translation3: axis=(0 0 1) MultiplierFunction(scale=0.91753, Constant(value=-0.00275))
    PinJoint ankle_l: socket_parent_frame=tibia_l_offset socket_child_frame=talus_l_offset
      Coordinate ankle_angle_l: default_value=0 range=(-0.6981317 0.5235988) clamped=true
      PhysicalOffsetFrame tibia_l_offset: socket_parent=/bodyset/tibia_l translation=(-0.008735 -0.3494 0)
          orientation=(-0.175895 0.105208 0.0186622)
      PhysicalOffsetFrame talus_l_offset: socket_parent=/bodyset/talus_l translation=(0 0 0)
          orientation=(-0.175895 0.105208 0.0186622)
    PinJoint subtalar_l: socket_parent_frame=talus_l_offset socket_child_frame=calcn_l_offset
      Coordinate subtalar_angle_l: default_value=0 range=(-0.3490659 0.3490659) clamped=true
      PhysicalOffsetFrame talus_l_offset: socket_parent=/bodyset/talus_l
          translation=(-0.04897483 -0.04212619 -0.007953264) orientation=(1.76819 -0.906223 1.8196)
      PhysicalOffsetFrame calcn_l_offset: socket_parent=/bodyset/calcn_l translation=(0 0 0)
          orientation=(1.76819 -0.906223 1.8196)
    PinJoint mtp_l: socket_parent_frame=calcn_l_offset socket_child_frame=toes_l_offset
      Coordinate mtp_angle_l: default_value=0 range=(-0.5235988 0.5235988) clamped=true
      PhysicalOffsetFrame calcn_l_offset: socket_parent=/bodyset/calcn_l translation=(0.179551 -0.0020084 -0.001084536)
          orientation=(-3.14159 -0.619901 0)
      PhysicalOffsetFrame toes_l_offset: socket_parent=/bodyset/toes_l translation=(0 0 0)
          orientation=(-3.14159 -0.619901 0)
    CustomJoint L5_S1_IVDjnt: socket_parent_frame=sacrum_offset socket_child_frame=lumbar5_offset
      Coordinate flex_extension: default_value=0 range=(-1.22173 0.4537856) clamped=true
      Coordinate lat_bending: default_value=0 range=(-0.4363323 0.4363323) clamped=true
      Coordinate axial_rotation: default_value=0 range=(-0.9791297 0.9791297) clamped=true
      PhysicalOffsetFrame sacrum_offset: socket_parent=/bodyset/sacrum translation=(-0.09799975 0.07099982 0)
      PhysicalOffsetFrame lumbar5_offset: socket_parent=/bodyset/lumbar5 translation=(0 0 0)
      SpatialTransform: axes_held_at_zero=(translation1 translation2 translation3)
        TransformAxis rotation1: coordinates=flex_extension axis=(0 0 1) LinearFunction(coefficients=0.0889273 0)
        TransformAxis rotation2: coordinates=lat_bending axis=(1 0 0)
            PiecewiseLinearFunction(x=-1.01875 1.01875, y=-0.138056 0.138056)
        TransformAxis rotation3: coordinates=axial_rotation axis=(0 1 0)
          SimmSpline: x=(-0.97913 0 0.97913) y=(-0.0296706 0 0.0279253)
    CustomJoint L4_L5_IVDjnt: socket_parent_frame=lumbar5_offset socket_child_frame=lumbar4_offset
      Coordinate L4_L5_IVDjnt_r3: default_value=0 range=(-99999.9 99999.9) clamped=false
      Coordinate L4_L5_IVD_bendjnt_r1: default_value=0 range=(-99999.9 99999.9) clamped=false
      Coordinate L4_L5_IVD_rotjnt_r2: default_value=0 range=(-99999.9 99999.9) clamped=false
      PhysicalOffsetFrame lumbar5_offset: socket_parent=/bodyset/lumbar5 translation=(0.0086679 0.02565698 0)
      PhysicalOffsetFrame lumbar4_offset: socket_parent=/bodyset/lumbar4 translation=(0.00086679 -0.002166975 0)
      SpatialTransform: axes_held_at_zero=(translation1 translation2 translation3)
        TransformAxis rotation1: coordinates=L4_L5_IVDjnt_r3 axis=(0 0 1) LinearFunction(coefficients=1 0)
        TransformAxis rotation2: coordinates=L4_L5_IVD_bendjnt_r1 axis=(1 0 0) LinearFunction(coefficients=1 0)
        TransformAxis rotation3: coordinates=L4_L5_IVD_rotjnt_r2 axis=(0 1 0) LinearFunction(coefficients=1 0)
    CustomJoint L3_L4_IVDjnt: socket_parent_frame=lumbar4_offset socket_child_frame=lumbar3_offset
      Coordinate L3_L4_IVDjnt_r3: default_value=0 range=(-99999.9 99999.9) clamped=false
      Coordinate L3_L4_IVD_bendjnt_r1: default_value=0 range=(-99999.9 99999.9) clamped=false
      Coordinate L3_L4_IVD_rotjnt_r2: default_value=0 range=(-99999.9 99999.9) clamped=false
      PhysicalOffsetFrame lumbar4_offset: socket_parent=/bodyset/lumbar4 translation=(0 0.02773728 0)
      PhysicalOffsetFrame lumbar3_offset: socket_parent=/bodyset/lumbar3 translation=(-0.000520074 -0.001040148 0)
      SpatialTransform: axes_held_at_zero=(translation1 translation2 translation3)
        TransformAxis rotation1: coordinates=L3_L4_IVDjnt_r3 axis=(0 0 1) LinearFunction(coefficients=1 0)
        TransformAxis rotation2: coordinates=L3_L4_IVD_bendjnt_r1 axis=(1 0 0) LinearFunction(coefficients=1 0)
        TransformAxis rotation3: coordinates=L3_L4_IVD_rotjnt_r2 axis=(0 1 0) LinearFunction(coefficients=1 0)
    CustomJoint L2_L3_IVD_jnt: socket_parent_frame=lumbar3_offset socket_child_frame=lumbar2_offset
      Coordinate L2_L3_IVDjnt_r3: default_value=0 range=(-99999.9 99999.9) clamped=false
      Coordinate L2_L3_IVD_bendjnt_r1: default_value=0 range=(-99999.9 99999.9) clamped=false
      Coordinate L2_L3_IVD_rotjnt_r2: default_value=0 range=(-99999.9 99999.9) clamped=false
      PhysicalOffsetFrame lumbar3_offset: socket_parent=/bodyset/lumbar3 translation=(-0.00693432 0.02704385 0)
      PhysicalOffsetFrame lumbar2_offset: socket_parent=/bodyset/lumbar2 translation=(-0.001126827 -0.003380481 0)
      SpatialTransform: axes_held_at_zero=(translation1 translation2 translation3)
        TransformAxis rotation1: coordinates=L2_L3_IVDjnt_r3 axis=(0 0 1) LinearFunction(coefficients=1 0)
        TransformAxis rotation2: coordinates=L2_L3_IVD_bendjnt_r1 axis=(1 0 0) LinearFunction(coefficients=1 0)
        TransformAxis rotation3: coordinates=L2_L3_IVD_rotjnt_r2 axis=(0 1 0) LinearFunction(coefficients=1 0)
    CustomJoint L1_L2_IVD_jnt: socket_parent_frame=lumbar2_offset socket_child_frame=lumbar1_offset
      Coordinate L1_L2_IVDjnt_r3: default_value=0 range=(-99999.9 99999.9) clamped=false
      Coordinate L1_L2_IVD_bendjnt_r1: default_value=0 range=(-99999.9 99999.9) clamped=false
      Coordinate L1_L2_IVD_rotjnt_r2: default_value=0 range=(-99999.9 99999.9) clamped=false
      PhysicalOffsetFrame lumbar2_offset: socket_parent=/bodyset/lumbar2 translation=(-0.0086679 0.02166975 0)
      PhysicalOffsetFrame lumbar1_offset: socket_parent=/bodyset/lumbar1 translation=(0.001213506 -0.003293802 0)
      SpatialTransform: axes_held_at_zero=(translation1 translation2 translation3)
        TransformAxis rotation1: coordinates=L1_L2_IVDjnt_r3 axis=(0 0 1) LinearFunction(coefficients=0.85 0)
        TransformAxis rotation2: coordinates=L1_L2_IVD_bendjnt_r1 axis=(1 0 0) LinearFunction(coefficients=1 0)
        TransformAxis rotation3: coordinates=L1_L2_IVD_rotjnt_r2 axis=(0 1 0) LinearFunction(coefficients=1 0)
    CustomJoint Torsojnt: socket_parent_frame=lumbar1_offset socket_child_frame=torso_offset
      Coordinate Torso_Rot: default_value=0 range=(-1.1 1.1) clamped=true
      PhysicalOffsetFrame lumbar1_offset: socket_parent=/bodyset/lumbar1 translation=(0.002166975 -0.0780111 0)
      PhysicalOffsetFrame torso_offset: socket_parent=/bodyset/torso translation=(0 0 0)
      SpatialTransform: axes_held_at_zero=(rotation2 rotation3 translation1 translation2 translation3)
        TransformAxis rotation1: coordinates=Torso_Rot axis=(0 1 0) LinearFunction(coefficients=1 0)
    CustomJoint Abdjnt: socket_parent_frame=sacrum_offset socket_child_frame=Abdomen_offset
      Coordinate Abs_r3: default_value=0 range=(-1.7 1.7) clamped=false
      Coordinate Abs_t1: default_value=0 range=(-99999.9 99999.9) clamped=false locked=true
      Coordinate Abs_t2: default_value=0 range=(-99999.9 99999.9) clamped=false locked=true
      PhysicalOffsetFrame sacrum_offset: socket_parent=/bodyset/sacrum translation=(-0.09799975 0.07099982 0)
      PhysicalOffsetFrame Abdomen_offset: socket_parent=/bodyset/Abdomen translation=(-0.0883512 -0.0883512 0)
      SpatialTransform: axes_held_at_zero=(rotation2 rotation3 translation3)
        TransformAxis rotation1: coordinates=Abs_r3 axis=(0 0 1) LinearFunction(coefficients=1 0)
        TransformAxis translation1: coordinates=Abs_t1 axis=(1 0 0) LinearFunction(coefficients=1 0)
        TransformAxis translation2: coordinates=Abs_t2 axis=(0 1 0) LinearFunction(coefficients=1 0)
    CustomJoint LB_wrapjnt: socket_parent_frame=sacrum_offset socket_child_frame=LB_wrap_offset
      Coordinate LB_wrapjnt_r3: default_value=0 range=(-99999.9 99999.9) clamped=false
      Coordinate LB_wrapjnt_t1: default_value=0 range=(-99999.9 99999.9) clamped=false
      Coordinate LB_wrapjnt_t2: default_value=0 range=(-99999.9 99999.9) clamped=false
      PhysicalOffsetFrame sacrum_offset: socket_parent=/bodyset/sacrum translation=(-0.09799975 0.07099982 0)
      PhysicalOffsetFrame LB_wrap_offset: socket_parent=/bodyset/LB_wrap translation=(0 0 0)
      SpatialTransform: axes_held_at_zero=(rotation2 rotation3 translation3)
        TransformAxis rotation1: coordinates=LB_wrapjnt_r3 axis=(0 0 1) LinearFunction(coefficients=1 0)
        TransformAxis translation1: coordinates=LB_wrapjnt_t1 axis=(1 0 0) LinearFunction(coefficients=1 0)
        TransformAxis translation2: coordinates=LB_wrapjnt_t2 axis=(0 1 0) LinearFunction(coefficients=1 0)
    CustomJoint sc1: socket_parent_frame=torso_offset socket_child_frame=clavicle_1_offset
      Coordinate SC_y: default_value=0 range=(-0.5235988 0.5235988) clamped=true
      PhysicalOffsetFrame torso_offset: socket_parent=/bodyset/torso translation=(0.03588898 0.371287 0.02501733)
      PhysicalOffsetFrame clavicle_1_offset: socket_parent=/bodyset/clavicle_1 translation=(0 0 0)
      SpatialTransform: axes_held_at_zero=(rotation2 rotation3 translation1 translation2 translation3)
        TransformAxis rotation1: coordinates=SC_y axis=(0 1 0) LinearFunction(coefficients=1 0)
    CustomJoint sc2: socket_parent_frame=clavicle_1_offset socket_child_frame=clavicle_2_offset
      Coordinate SC_x: default_value=0 range=(-0.7853982 0.1745329) clamped=true
      PhysicalOffsetFrame clavicle_1_offset: socket_parent=/bodyset/clavicle_1 translation=(0 0 0)
      PhysicalOffsetFrame clavicle_2_offset: socket_parent=/bodyset/clavicle_2 translation=(0 0 0)
      SpatialTransform: axes_held_at_zero=(rotation1 rotation2 translation1 translation2 translation3)
        TransformAxis rotation3: coordinates=SC_x axis=(0.0873 0 0) LinearFunction(coefficients=1 0)
    CustomJoint sc3: socket_parent_frame=clavicle_2_offset socket_child_frame=clavicle_r_offset
      Coordinate SC_z: default_value=0 range=(0 0.6108652) clamped=true
      PhysicalOffsetFrame clavicle_2_offset: socket_parent=/bodyset/clavicle_2 translation=(0 0 0)
      PhysicalOffsetFrame clavicle_r_offset: socket_parent=/bodyset/clavicle_r translation=(0 0 0)
      SpatialTransform: axes_held_at_zero=(rotation1 rotation3 translation1 translation2 translation3)
        TransformAxis rotation2: coordinates=SC_z axis=(0.0873 0 0.5744638) LinearFunction(coefficients=1 0)
    WeldJoint AC1: socket_parent_frame=clavicle_r_offset socket_child_frame=scapula_1_offset
      PhysicalOffsetFrame clavicle_r_offset: socket_parent=/bodyset/clavicle_r
          translation=(-0.0119773 0.01677491 0.1132829)
      PhysicalOffsetFrame scapula_1_offset: socket_parent=/bodyset/scapula_1 translation=(0 0 0)
    WeldJoint AC2: socket_parent_frame=scapula_1_offset socket_child_frame=scapula_2_offset
      PhysicalOffsetFrame scapula_1_offset: socket_parent=/bodyset/scapula_1 translation=(0 0 0)
      PhysicalOffsetFrame scapula_2_offset: socket_parent=/bodyset/scapula_2 translation=(0 0 0)
    WeldJoint AC3: socket_parent_frame=scapula_2_offset socket_child_frame=scapula_r_offset
      PhysicalOffsetFrame scapula_2_offset: socket_parent=/bodyset/scapula_2 translation=(0 0 0)
      PhysicalOffsetFrame scapula_r_offset: socket_parent=/bodyset/scapula_r translation=(0 0 0)
    CustomJoint sc1_l: socket_parent_frame=torso_offset socket_child_frame=clavicle_l_1_offset
      Coordinate SC_y_l: default_value=0 range=(-0.5235988 0.5235988) clamped=true
      PhysicalOffsetFrame torso_offset: socket_parent=/bodyset/torso translation=(0.03588898 0.371287 -0.02501733)
      PhysicalOffsetFrame clavicle_l_1_offset: socket_parent=/bodyset/clavicle_l_1 translation=(0 0 0)
      SpatialTransform: axes_held_at_zero=(rotation2 rotation3 translation1 translation2 translation3)
        TransformAxis rotation1: coordinates=SC_y_l axis=(0 1 0) LinearFunction(coefficients=1 0)
    CustomJoint sc2_l: socket_parent_frame=clavicle_l_1_offset socket_child_frame=clavicle_l_2_offset
      Coordinate SC_x_l: default_value=0 range=(-0.7853982 0.1745329) clamped=true
      PhysicalOffsetFrame clavicle_l_1_offset: socket_parent=/bodyset/clavicle_l_1 translation=(0 0 0)
      PhysicalOffsetFrame clavicle_l_2_offset: socket_parent=/bodyset/clavicle_l_2 translation=(0 0 0)
      SpatialTransform: axes_held_at_zero=(rotation1 rotation2 translation1 translation2 translation3)
        TransformAxis rotation3: coordinates=SC_x_l axis=(-0.0873 0 0) LinearFunction(coefficients=1 0)
    CustomJoint sc3_l: socket_parent_frame=clavicle_l_2_offset socket_child_frame=clavicle_l_offset
      Coordinate SC_z_l: default_value=0 range=(-0.6108652 0) clamped=true
      PhysicalOffsetFrame clavicle_l_2_offset: socket_parent=/bodyset/clavicle_l_2 translation=(0 0 0)
      PhysicalOffsetFrame clavicle_l_offset: socket_parent=/bodyset/clavicle_l translation=(0 0 0)
      SpatialTransform: axes_held_at_zero=(rotation1 rotation3 translation1 translation2 translation3)
        TransformAxis rotation2: coordinates=SC_z_l axis=(-0.0873 0 -0.5744638) LinearFunction(coefficients=1 0)
    WeldJoint AC1_l: socket_parent_frame=clavicle_l_offset socket_child_frame=scapula_l_1_offset
      PhysicalOffsetFrame clavicle_l_offset: socket_parent=/bodyset/clavicle_l
          translation=(-0.0119773 0.01677491 -0.1132829)
      PhysicalOffsetFrame scapula_l_1_offset: socket_parent=/bodyset/scapula_l_1 translation=(0 0 0)
    WeldJoint AC2_l: socket_parent_frame=scapula_l_1_offset socket_child_frame=scapula_l_2_offset
      PhysicalOffsetFrame scapula_l_1_offset: socket_parent=/bodyset/scapula_l_1 translation=(0 0 0)
      PhysicalOffsetFrame scapula_l_2_offset: socket_parent=/bodyset/scapula_l_2 translation=(0 0 0)
    WeldJoint AC3_l: socket_parent_frame=scapula_l_2_offset socket_child_frame=scapula_l_offset
      PhysicalOffsetFrame scapula_l_2_offset: socket_parent=/bodyset/scapula_l_2 translation=(0 0 0)
      PhysicalOffsetFrame scapula_l_offset: socket_parent=/bodyset/scapula_l translation=(0 0 0)
    CustomJoint acromial_r: socket_parent_frame=scapula_r_offset socket_child_frame=humerus_r_offset
      Coordinate arm_flex_r: default_value=0 range=(-1.570796 3.141593) clamped=true
      Coordinate arm_add_r: default_value=0 range=(-2.094395 1.570796) clamped=true
      Coordinate arm_rot_r: default_value=0 range=(-1.570796 1.570796) clamped=true
      PhysicalOffsetFrame scapula_r_offset: socket_parent=/bodyset/scapula_r
          translation=(-0.02730186 -0.04099109 0.003932708)
      PhysicalOffsetFrame humerus_r_offset: socket_parent=/bodyset/humerus_r translation=(0 0 0)
      SpatialTransform: axes_held_at_zero=(translation1 translation2 translation3)
        TransformAxis rotation1: coordinates=arm_flex_r axis=(0 0 1) LinearFunction(coefficients=1 0)
        TransformAxis rotation2: coordinates=arm_add_r axis=(1 0 0) LinearFunction(coefficients=1 0)
        TransformAxis rotation3: coordinates=arm_rot_r axis=(0 1 0) LinearFunction(coefficients=1 0)
    CustomJoint elbow_r: socket_parent_frame=humerus_r_offset socket_child_frame=ulna_r_offset
      Coordinate elbow_flex_r: default_value=0 range=(0 2.618) clamped=true
      PhysicalOffsetFrame humerus_r_offset: socket_parent=/bodyset/humerus_r
          translation=(0.01226624 -0.2671557 -0.008954246)
      PhysicalOffsetFrame ulna_r_offset: socket_parent=/bodyset/ulna_r translation=(0 0 0)
      SpatialTransform: axes_held_at_zero=(rotation2 rotation3 translation1 translation2 translation3)
        TransformAxis rotation1: coordinates=elbow_flex_r axis=(0.226047 0.022269 0.9738618)
            LinearFunction(coefficients=1 0)
    CustomJoint radioulnar_r: socket_parent_frame=ulna_r_offset socket_child_frame=radius_r_offset
      Coordinate pro_sup_r: default_value=0 range=(0 1.570796) clamped=true
      PhysicalOffsetFrame ulna_r_offset: socket_parent=/bodyset/ulna_r
          translation=(-0.006510861 -0.01258909 0.02524495)
      PhysicalOffsetFrame radius_r_offset: socket_parent=/bodyset/radius_r translation=(0 0 0)
      SpatialTransform: axes_held_at_zero=(rotation2 rotation3 translation1 translation2 translation3)
        TransformAxis rotation1: coordinates=pro_sup_r axis=(0.05639803 0.9984065 0.001952)
            LinearFunction(coefficients=1 0)
    CustomJoint radius_hand_r: socket_parent_frame=radius_r_offset socket_child_frame=hand_r_offset
      Coordinate wrist_flex_r: default_value=0 range=(-1.22173 1.22173) clamped=true
      Coordinate wrist_dev_r: default_value=0 range=(-0.4363323 0.6108652) clamped=true
      PhysicalOffsetFrame radius_r_offset: socket_parent=/bodyset/radius_r
          translation=(-0.008695571 -0.2331218 0.01345308)
      PhysicalOffsetFrame hand_r_offset: socket_parent=/bodyset/hand_r translation=(0 0 0)
      SpatialTransform: axes_held_at_zero=(rotation3 translation1 translation2 translation3)
        TransformAxis rotation1: coordinates=wrist_flex_r axis=(0 0 1) LinearFunction(coefficients=1 0)
        TransformAxis rotation2: coordinates=wrist_dev_r axis=(1 0 0) LinearFunction(coefficients=1 0)
    CustomJoint acromial_l: socket_parent_frame=scapula_l_offset socket_child_frame=humerus_l_offset
      Coordinate arm_flex_l: default_value=0 range=(-1.570796 3.141593) clamped=true
      Coordinate arm_add_l: default_value=0 range=(-2.094395 1.570796) clamped=true
      Coordinate arm_rot_l: default_value=0 range=(-1.570796 1.570796) clamped=true
      PhysicalOffsetFrame scapula_l_offset: socket_parent=/bodyset/scapula_l
          translation=(-0.02730186 -0.04099109 -0.003932708)
      PhysicalOffsetFrame humerus_l_offset: socket_parent=/bodyset/humerus_l translation=(0 0 0)
      SpatialTransform: axes_held_at_zero=(translation1 translation2 translation3)
        TransformAxis rotation1: coordinates=arm_flex_l axis=(0 0 1) LinearFunction(coefficients=1 0)
        TransformAxis rotation2: coordinates=arm_add_l axis=(-1 0 0) LinearFunction(coefficients=1 0)
        TransformAxis rotation3: coordinates=arm_rot_l axis=(0 -1 0) LinearFunction(coefficients=1 0)
    CustomJoint elbow_l: socket_parent_frame=humerus_l_offset socket_child_frame=ulna_l_offset
      Coordinate elbow_flex_l: default_value=0 range=(0 2.618) clamped=true
      PhysicalOffsetFrame humerus_l_offset: socket_parent=/bodyset/humerus_l
          translation=(0.01188283 -0.2588051 0.00867436)
      PhysicalOffsetFrame ulna_l_offset: socket_parent=/bodyset/ulna_l translation=(0 0 0)
      SpatialTransform: axes_held_at_zero=(rotation2 rotation3 translation1 translation2 translation3)
        TransformAxis rotation1: coordinates=elbow_flex_l axis=(-0.226047 -0.022269 0.9738618)
            LinearFunction(coefficients=1 0)
    CustomJoint radioulnar_l: socket_parent_frame=ulna_l_offset socket_child_frame=radius_l_offset
      Coordinate pro_sup_l: default_value=0 range=(0 1.570796) clamped=true
      PhysicalOffsetFrame ulna_l_offset: socket_parent=/bodyset/ulna_l
          translation=(-0.006510861 -0.01258909 -0.02524495)
      PhysicalOffsetFrame radius_l_offset: socket_parent=/bodyset/radius_l translation=(0 0 0)
      SpatialTransform: axes_held_at_zero=(rotation2 rotation3 translation1 translation2 translation3)
        TransformAxis rotation1: coordinates=pro_sup_l axis=(-0.05639803 -0.9984065 0.001952)
            LinearFunction(coefficients=1 0)
    CustomJoint radius_hand_l: socket_parent_frame=radius_l_offset socket_child_frame=hand_l_offset
      Coordinate wrist_flex_l: default_value=0 range=(-1.22173 1.22173) clamped=true
      Coordinate wrist_dev_l: default_value=0 range=(-0.4363323 0.6108652) clamped=true
      PhysicalOffsetFrame radius_l_offset: socket_parent=/bodyset/radius_l
          translation=(-0.008695571 -0.2331218 -0.01345308)
      PhysicalOffsetFrame hand_l_offset: socket_parent=/bodyset/hand_l translation=(0 0 0)
      SpatialTransform: axes_held_at_zero=(rotation3 translation1 translation2 translation3)
        TransformAxis rotation1: coordinates=wrist_flex_l axis=(0 0 1) LinearFunction(coefficients=1 0)
        TransformAxis rotation2: coordinates=wrist_dev_l axis=(-1 0 0) LinearFunction(coefficients=1 0)
  ForceSet:
    Thelen2003Muscle delt_scap_1: max_isometric_force=289 optimal_fiber_length=0.1097088 tendon_slack_length=0.07780768
        pennation_angle_at_optimal=0.08726646 [radians]
      PathPoint P1: scapula_r (-0.07931286 -0.01236649 -0.05672806)
      PathPoint P2: scapula_r (-0.0688188 -0.05721281 -0.02863247)
      PathPoint P3: humerus_r (0.0005331535 -0.09780847 0.01079792)
      PathWrap: wrap_object=deltoid
    Thelen2003Muscle delt_scap_2: max_isometric_force=211 optimal_fiber_length=0.09181696
        tendon_slack_length=0.07353097 pennation_angle_at_optimal=0.08726646
      PathPoint P1: scapula_r (-0.06494014 -0.004795631 -0.03149065)
      PathPoint P2: scapula_r (-0.0555024 -0.04780139 -0.01594896)
      PathPoint P3: humerus_r (0.003900598 -0.09000907 0.01111932)
      PathWrap: wrap_object=deltoid
    Thelen2003Muscle delt_scap_3: max_isometric_force=446 optimal_fiber_length=0.07995079
        tendon_slack_length=0.05950719 pennation_angle_at_optimal=0.08726646
      PathPoint P1: scapula_r (-0.05090815 -0.002516748 -0.005746628)
      PathPoint P2: humerus_r (-0.01862586 -0.004087877 -0.003216025)
      PathPoint P3: humerus_r (0.003900598 -0.09000907 0.01111932)
      PathWrap: wrap_object=deltoid
    Thelen2003Muscle delt_scap_4: max_isometric_force=117 optimal_fiber_length=0.0636919 tendon_slack_length=0.04303507
        pennation_angle_at_optimal=0.08726646
      PathPoint P1: scapula_r (-0.04336904 -0.008538431 0.002457591)
      PathPoint P2: humerus_r (-0.0164522 -0.002540691 0.006433843)
      PathPoint P3: humerus_r (0.005057791 -0.07901574 0.01126863)
      PathWrap: wrap_object=deltoid
    Thelen2003Muscle delt_scap_5: max_isometric_force=120 optimal_fiber_length=0.06280167
        tendon_slack_length=0.03350699 pennation_angle_at_optimal=0.08726646
      PathPoint P1: scapula_r (-0.03022315 -0.005551013 0.01210924)
      PathPoint P2: humerus_r (0.008212075 -0.06884955 0.01226718)
      PathWrap: wrap_object=deltoid
    Thelen2003Muscle delt_scap_6: max_isometric_force=285 optimal_fiber_length=0.07324762
        tendon_slack_length=0.06398423 pennation_angle_at_optimal=0.08726646
      PathPoint P1: scapula_r (-0.04117568 -0.002612924 0.00494579)
      PathPoint P2: humerus_r (0.002659416 -0.101665 0.01196855)
      PathWrap: wrap_object=deltoid
    Thelen2003Muscle delt_scap_7: max_isometric_force=149 optimal_fiber_length=0.0716775 tendon_slack_length=0.07795166
        pennation_angle_at_optimal=0.08726646
      PathPoint P1: scapula_r (-0.03729904 -0.005237866 0.01096136)
      PathPoint P2: humerus_r (0.004012581 -0.1228118 0.01134329)
      PathWrap: wrap_object=deltoid
    Thelen2003Muscle delt_scap_8: max_isometric_force=215 optimal_fiber_length=0.06768291
        tendon_slack_length=0.06196323 pennation_angle_at_optimal=0.08726646
      PathPoint P1: scapula_r (-0.02820068 -0.002437133 0.01072885)
      PathPoint P2: humerus_r (0.002659416 -0.101665 0.01196855)
      PathWrap: wrap_object=deltoid
    Thelen2003Muscle delt_scap_9: max_isometric_force=286 optimal_fiber_length=0.06951304
        tendon_slack_length=0.06742385 pennation_angle_at_optimal=0.08726646
      PathPoint P1: scapula_r (-0.02236197 -0.004628411 0.009709678)
      PathPoint P2: humerus_r (0.01343811 -0.1095414 0.01384432)
      PathWrap: wrap_object=deltoid
    Thelen2003Muscle delt_scap_10: max_isometric_force=445 optimal_fiber_length=0.07111683
        tendon_slack_length=0.06084862 pennation_angle_at_optimal=0.08726646
      PathPoint delt_scap10-P1: scapula_r (-0.01295802 -0.004698259 0.01085041)
      PathPoint delt_scap10-P2: humerus_r (0.01614838 -0.1021506 0.01368567)
      PathWrap: wrap_object=deltoid
    Thelen2003Muscle delt_scap_11: max_isometric_force=239 optimal_fiber_length=0.07032168
        tendon_slack_length=0.04579974 pennation_angle_at_optimal=0.08726646
      PathPoint delt_scap11-P1: scapula_r (-0.000915905 -0.006518687 0.005838814)
      PathPoint delt_scap11-P2: humerus_r (0.02123356 -0.09070255 0.01339469)
      PathWrap: wrap_object=deltoid
    Thelen2003Muscle delt_clav_1: max_isometric_force=128 optimal_fiber_length=0.07990646
        tendon_slack_length=0.05926077 pennation_angle_at_optimal=0.08726646
      PathPoint P1: clavicle_r (-0.02064491 0.01550846 0.09960969)
      PathPoint P2: humerus_r (0.02123356 -0.09070255 0.01339469)
      PathWrap pathwrap-1: wrap_object=delt_ant
    Thelen2003Muscle delt_clav_2: max_isometric_force=160 optimal_fiber_length=0.08923846
        tendon_slack_length=0.08354239 pennation_angle_at_optimal=0.08726646
      PathPoint P1: clavicle_r (-0.01701221 0.01528699 0.08290739)
      PathPoint P2: humerus_r (0.01916898 -0.1104394 0.011918)
      PathWrap pathwrap-1: wrap_object=delt_ant
    Thelen2003Muscle delt_clav_3: max_isometric_force=105 optimal_fiber_length=0.07860752
        tendon_slack_length=0.06391631 pennation_angle_at_optimal=0.08726646
      PathPoint P1: clavicle_r (-0.01595583 0.01346744 0.08835292)
      PathPoint P2: humerus_r (0.02111513 -0.09725555 0.01245682)
      PathWrap pathwrap-1: wrap_object=delt_ant
    Thelen2003Muscle delt_clav_4: max_isometric_force=112 optimal_fiber_length=0.09463602 tendon_slack_length=0.0697117
        pennation_angle_at_optimal=0.08726646
      PathPoint P1: clavicle_r (-0.01464457 0.01007637 0.08581662)
      PathPoint P2: humerus_r (0.01916898 -0.1104394 0.011918)
      PathWrap pathwrap-1: wrap_object=delt_ant
    Thelen2003Muscle tric_long_1: max_isometric_force=223 optimal_fiber_length=0.09345249 tendon_slack_length=0.1892228
        pennation_angle_at_optimal=0.1745329
      PathPoint P1: ulna_r (-0.02251759 0.003751468 -0.005725797)
      PathPoint P2: scapula_r (-0.053072 -0.05931322 -0.01854781)
      PathWrap: wrap_object=elbow
    Thelen2003Muscle tric_long_2: max_isometric_force=296 optimal_fiber_length=0.08164938 tendon_slack_length=0.203243
        pennation_angle_at_optimal=0.1745329
      PathPoint P1: ulna_r (-0.0222397 0.01332908 0.003415194)
      PathPoint P2: scapula_r (-0.02818621 -0.0566842 -0.02102305)
      PathWrap: wrap_object=elbow
    Thelen2003Muscle tric_long_3: max_isometric_force=283 optimal_fiber_length=0.1098376 tendon_slack_length=0.2024057
        pennation_angle_at_optimal=0.1745329
      PathPoint P1: ulna_r (-0.02778214 0.009234882 0.003893612)
      PathPoint P2: scapula_r (-0.04337853 -0.05234912 -0.01309292)
      PathWrap: wrap_object=elbow
    Thelen2003Muscle tric_long_4: max_isometric_force=327 optimal_fiber_length=0.1137507 tendon_slack_length=0.203842
        pennation_angle_at_optimal=0
      PathPoint P1: ulna_r (-0.02434949 0.008423754 0.007807386)
      PathPoint P2: scapula_r (-0.02818621 -0.0566842 -0.02102305)
      PathWrap: wrap_object=elbow
    Thelen2003Muscle tric_med_1: max_isometric_force=263 optimal_fiber_length=0.07544974 tendon_slack_length=0.08180734
        pennation_angle_at_optimal=0.296706
      PathPoint P1: humerus_r (0.004465715 -0.1110882 -0.006567256)
      PathPoint P2: ulna_r (-0.03324562 -0.003215289 0.001130425)
      PathWrap: wrap_object=elbow
    Thelen2003Muscle tric_med_2: max_isometric_force=256 optimal_fiber_length=0.07230871 tendon_slack_length=0.1049552
        pennation_angle_at_optimal=0
      PathPoint P1: humerus_r (0.003611699 -0.1359317 -0.008902738)
      PathPoint P2: ulna_r (-0.03324562 -0.003215289 0.001130425)
      PathWrap: wrap_object=elbow
    Thelen2003Muscle tric_med_3: max_isometric_force=240 optimal_fiber_length=0.05675485 tendon_slack_length=0.01008766
        pennation_angle_at_optimal=0
      PathPoint P1: humerus_r (-0.003247675 -0.2258927 0.005721608)
      PathPoint P2: ulna_r (-0.03324562 -0.003215289 0.001130425)
      PathWrap: wrap_object=elbow
    Thelen2003Muscle tric_med_4: max_isometric_force=211 optimal_fiber_length=0.06991102 tendon_slack_length=0.03786066
        pennation_angle_at_optimal=0.1396263
      PathPoint P1: humerus_r (-0.001953477 -0.1865413 0.001106174)
      PathPoint P2: ulna_r (-0.03324562 -0.003215289 0.001130425)
      PathWrap: wrap_object=elbow
    Thelen2003Muscle tric_med_5: max_isometric_force=107 optimal_fiber_length=0.07547515 tendon_slack_length=0.06902189
        pennation_angle_at_optimal=0
      PathPoint P1: humerus_r (-0.002104244 -0.1424807 -0.005035841)
      PathPoint P2: ulna_r (-0.03324562 -0.003215289 0.001130425)
      PathWrap: wrap_object=elbow
    Thelen2003Muscle tric_lat_1: max_isometric_force=153 optimal_fiber_length=0.07061014 tendon_slack_length=0.1590125
        pennation_angle_at_optimal=0
      PathPoint P1: humerus_r (-0.001894744 -0.06069788 0.00379682)
      PathPoint P2: ulna_r (-0.02579457 0.01171795 -0.003415094)
      PathWrap: wrap_object=elbow
    Thelen2003Muscle tric_lat_2: max_isometric_force=410 optimal_fiber_length=0.07138982 tendon_slack_length=0.1649608
        pennation_angle_at_optimal=0.08726646
      PathPoint P1: humerus_r (-0.001894744 -0.06069788 0.00379682)
      PathPoint P2: ulna_r (-0.02695595 0.009269194 -0.002553686)
      PathWrap: wrap_object=elbow
    Thelen2003Muscle tric_lat_3: max_isometric_force=219 optimal_fiber_length=0.06118741 tendon_slack_length=0.1782456
        pennation_angle_at_optimal=0.1745329
      PathPoint P1: humerus_r (-0.001894744 -0.06069788 0.00379682)
      PathPoint P2: ulna_r (-0.02506861 0.004042696 0.00633136)
      PathWrap: wrap_object=elbow
    Thelen2003Muscle tric_lat_4: max_isometric_force=275 optimal_fiber_length=0.05951224 tendon_slack_length=0.1464486
        pennation_angle_at_optimal=0.1745329
      PathPoint P1: humerus_r (0.002411425 -0.09645118 0.005895416)
      PathPoint P2: ulna_r (-0.02506861 0.004042696 0.00633136)
      PathWrap: wrap_object=elbow
    Thelen2003Muscle tric_lat_5: max_isometric_force=87 optimal_fiber_length=0.05946651 tendon_slack_length=0.1463361
        pennation_angle_at_optimal=0.296706
      PathPoint P1: humerus_r (0.002411425 -0.09645118 0.005895416)
      PathPoint P2: ulna_r (-0.02633574 0.007972248 0.004066545)
      PathWrap: wrap_object=elbow
    Thelen2003Muscle bic_l: max_isometric_force=347 optimal_fiber_length=0.1245943 tendon_slack_length=0.2251761
        pennation_angle_at_optimal=0
      PathPoint P1: scapula_r (-0.02537689 -0.02174074 -0.01270269)
      PathPoint P2: humerus_r (0.02189695 -0.005562545 0.006082406)
      PathPoint P3: radius_r (0.00350281 -0.03163104 -0.00691929)
      PathWrap: wrap_object=inf_sup_sub
      PathWrap pathwrap_0: wrap_object=elbow_circ
    Thelen2003Muscle bic_s: max_isometric_force=173 optimal_fiber_length=0.1102511 tendon_slack_length=0.1802653
        pennation_angle_at_optimal=0
      PathPoint P1: scapula_r (0.01059939 -0.03837089 -0.02447164)
      PathPoint P2: radius_r (0.00350281 -0.03163104 -0.00691929)
      PathWrap: wrap_object=elbow_circ
    Thelen2003Muscle coracobr_1: max_isometric_force=201 optimal_fiber_length=0.06207989 tendon_slack_length=0.0865356
        pennation_angle_at_optimal=0
      PathPoint P1: scapula_r (0.004613552 -0.03486708 -0.02389662)
      PathPoint P2: humerus_r (0.01431307 -0.1439266 -0.004187275)
    Thelen2003Muscle coracobr_2: max_isometric_force=148 optimal_fiber_length=0.06398482 tendon_slack_length=0.0974293
        pennation_angle_at_optimal=0
      PathPoint P1: scapula_r (0.005276829 -0.04329597 -0.02879128)
      PathPoint P2: humerus_r (0.009408923 -0.1625758 -0.006082339)
    Thelen2003Muscle coracobr_3: max_isometric_force=114 optimal_fiber_length=0.06826305 tendon_slack_length=0.1061035
        pennation_angle_at_optimal=0
      PathPoint P1: scapula_r (0.01052598 -0.03590565 -0.02387638)
      PathPoint P2: humerus_r (0.01614286 -0.170289 -0.007702355)
    Thelen2003Muscle brachialis_1: max_isometric_force=314 optimal_fiber_length=0.08246761
        tendon_slack_length=0.07597187 pennation_angle_at_optimal=0
      PathPoint P1: humerus_r (0.003788493 -0.1424332 0.007397058)
      PathPoint P2: ulna_r (-0.01311139 -0.03775889 -0.003262862)
      PathWrap: wrap_object=elbow_circ
    Thelen2003Muscle brachialis_2: max_isometric_force=158 optimal_fiber_length=0.08977424
        tendon_slack_length=0.05576742 pennation_angle_at_optimal=0
      PathPoint P1: humerus_r (0.01355992 -0.1495481 -0.003692458)
      PathPoint P2: ulna_r (-0.01551024 -0.03733437 -0.007686663)
      PathWrap: wrap_object=elbow_circ
    Thelen2003Muscle brachialis_3: max_isometric_force=157 optimal_fiber_length=0.08196832
        tendon_slack_length=0.03712129 pennation_angle_at_optimal=0
      PathPoint P1: humerus_r (0.006718597 -0.1760967 -0.006520389)
      PathPoint P2: ulna_r (-0.01447314 -0.02665475 -0.0123963)
      PathWrap: wrap_object=elbow_circ
    Thelen2003Muscle brachialis_4: max_isometric_force=87 optimal_fiber_length=0.0715836 tendon_slack_length=0.02993668
        pennation_angle_at_optimal=0
      PathPoint P1: humerus_r (0.01022506 -0.1846219 -0.002095761)
      PathPoint P2: ulna_r (-0.01539416 -0.03689702 -0.004039476)
      PathWrap: wrap_object=elbow_circ
    Thelen2003Muscle brachialis_5: max_isometric_force=101 optimal_fiber_length=0.05865128
        tendon_slack_length=0.0198031 pennation_angle_at_optimal=0
      PathPoint P1: humerus_r (0.006542965 -0.2123286 -0.006286073)
      PathPoint P2: ulna_r (-0.01687734 -0.03417693 -0.01039048)
      PathWrap: wrap_object=elbow_circ
    Thelen2003Muscle brachialis_6: max_isometric_force=104 optimal_fiber_length=0.04469537
        tendon_slack_length=0.03314275 pennation_angle_at_optimal=0
      PathPoint P1: humerus_r (0.01019777 -0.2143326 -0.001675261)
      PathPoint P2: ulna_r (-0.01568911 -0.02892484 -0.01296498)
      PathWrap: wrap_object=elbow_circ
    Thelen2003Muscle brachialis_7: max_isometric_force=118 optimal_fiber_length=0.05898658
        tendon_slack_length=0.007218969 pennation_angle_at_optimal=0
      PathPoint P1: humerus_r (0.00611591 -0.2263392 -0.00910685)
      PathPoint P2: ulna_r (-0.01376994 -0.03660919 1.77633e-5)
      PathWrap: wrap_object=elbow_circ
    Thelen2003Muscle brachiorad_1: max_isometric_force=30 optimal_fiber_length=0.1573338 tendon_slack_length=0.1167567
        pennation_angle_at_optimal=0
      PathPoint P1: humerus_r (0.00283176 -0.2020899 0.003986135)
      PathPoint P2: radius_r (-0.00098847 -0.2214173 0.03163104)
    Thelen2003Muscle brachiorad_2: max_isometric_force=82 optimal_fiber_length=0.1577503 tendon_slack_length=0.1170658
        pennation_angle_at_optimal=0
      PathPoint P1: humerus_r (-0.0002390409 -0.218965 0.004036083)
      PathPoint P2: radius_r (-0.00098847 -0.2214173 0.03163104)
    Thelen2003Muscle brachiorad_3: max_isometric_force=52 optimal_fiber_length=0.1044985 tendon_slack_length=0.1511601
        pennation_angle_at_optimal=0
      PathPoint P1: humerus_r (7.457412e-5 -0.2321023 0.005827553)
      PathPoint P2: radius_r (-0.00098847 -0.2214173 0.03163104)
    Thelen2003Muscle pron_teres_1: max_isometric_force=510 optimal_fiber_length=0.05978536
        tendon_slack_length=0.08340547 pennation_angle_at_optimal=0
      PathPoint P1: humerus_r (0.01187109 -0.2650777 -0.02398186)
      PathPoint P2: radius_r (0.00135053 -0.09301261 0.02098804)
      PathWrap: wrap_object=ulna_radius method=hybrid
    Thelen2003Muscle pron_teres_2: max_isometric_force=141 optimal_fiber_length=0.03844716
        tendon_slack_length=0.04759188 pennation_angle_at_optimal=0
      PathPoint P1: ulna_r (0.002444935 -0.003411147 -0.005855095)
      PathPoint P2: radius_r (0.001087197 -0.07564568 0.01904674)
      PathWrap: wrap_object=ulna_radius
    Thelen2003Muscle pron_quad_1: max_isometric_force=73 optimal_fiber_length=0.03742411 tendon_slack_length=0.00496341
        pennation_angle_at_optimal=0
      PathPoint P1: radius_r (-0.003343187 -0.1929291 0.02135148)
      PathPoint P2: ulna_r (-0.01960783 -0.2006657 0.01773567)
    Thelen2003Muscle pron_quad_2: max_isometric_force=178 optimal_fiber_length=0.03864369
        tendon_slack_length=0.005005659 pennation_angle_at_optimal=0
      PathPoint P1: radius_r (-0.003065419 -0.2026433 0.02202727)
      PathPoint P2: ulna_r (-0.02036073 -0.2087978 0.01960604)
    Thelen2003Muscle pron_quad_3: max_isometric_force=219 optimal_fiber_length=0.03524389
        tendon_slack_length=0.005006235 pennation_angle_at_optimal=0
      PathPoint P1: radius_r (-0.002113621 -0.213987 0.02328216)
      PathPoint P2: ulna_r (-0.01980462 -0.2205152 0.02123618)
    Thelen2003Muscle anconeus_1: max_isometric_force=31 optimal_fiber_length=0.02430775 tendon_slack_length=0.006173396
        pennation_angle_at_optimal=0
      PathPoint P1: humerus_r (0.002146287 -0.2632449 0.01346213)
      PathPoint P2: ulna_r (-0.02745874 -0.02695493 0.01514682)
    Thelen2003Muscle anconeus_2: max_isometric_force=70 optimal_fiber_length=0.01956487 tendon_slack_length=0.007748463
        pennation_angle_at_optimal=0.2617994
      PathPoint P1: humerus_r (0.004324399 -0.2659082 0.0117834)
      PathPoint P2: ulna_r (-0.02926888 -0.03039988 0.01627791)
    Thelen2003Muscle anconeus_3: max_isometric_force=25 optimal_fiber_length=0.0219027 tendon_slack_length=0.004130773
        pennation_angle_at_optimal=0
      PathPoint P1: humerus_r (0.002761796 -0.2594398 0.01340732)
      PathPoint P2: ulna_r (-0.02694499 -0.01988521 0.01479926)
    Thelen2003Muscle anconeus_4: max_isometric_force=118 optimal_fiber_length=0.02610363 tendon_slack_length=0.02900404
        pennation_angle_at_optimal=0.3141593
      PathPoint P1: humerus_r (0.004555705 -0.26638 0.02064674)
      PathPoint P2: ulna_r (-0.0332766 -0.05855278 0.02080522)
    Thelen2003Muscle anconeus_5: max_isometric_force=118 optimal_fiber_length=0.0257008 tendon_slack_length=0.01932391
        pennation_angle_at_optimal=0.4014257
      PathPoint P1: humerus_r (0.003365643 -0.2653556 0.01936668)
      PathPoint P2: ulna_r (-0.03174913 -0.04361688 0.02023545)
    Thelen2003Muscle supinator_1: max_isometric_force=47 optimal_fiber_length=0.02639023 tendon_slack_length=0.02510531
        pennation_angle_at_optimal=0
      PathPoint P1: humerus_r (0.01171764 -0.2666314 0.02066664)
      PathPoint P2: radius_r (0.003116061 -0.03680447 0.004974519)
      PathWrap: wrap_object=supinator2
    Thelen2003Muscle supinator_2: max_isometric_force=148 optimal_fiber_length=0.02600908
        tendon_slack_length=0.01433961 pennation_angle_at_optimal=0
      PathPoint P1: humerus_r (0.007317063 -0.2659992 0.01935707)
      PathPoint P2: radius_r (0.001717515 -0.04314454 0.005619454)
      PathWrap: wrap_object=supinator3
    Thelen2003Muscle supinator_3: max_isometric_force=285 optimal_fiber_length=0.0272306 tendon_slack_length=0.01381407
        pennation_angle_at_optimal=0.03490659
      PathPoint P1: ulna_r (-0.01497769 -0.02643244 0.01905027)
      PathPoint P2: radius_r (0.005494006 -0.05542737 0.006898444)
      PathWrap: wrap_object=supinator
    Thelen2003Muscle supinator_4: max_isometric_force=126 optimal_fiber_length=0.02503354
        tendon_slack_length=0.01490092 pennation_angle_at_optimal=0
      PathPoint P1: ulna_r (-0.01683966 -0.03604453 0.01921037)
      PathPoint P2: radius_r (0.005324506 -0.06930521 0.01142756)
      PathWrap: wrap_object=supinator
    Thelen2003Muscle supinator_5: max_isometric_force=232 optimal_fiber_length=0.02582651
        tendon_slack_length=0.02294586 pennation_angle_at_optimal=0
      PathPoint P1: ulna_r (-0.01772093 -0.04672938 0.01431293)
      PathPoint P2: radius_r (0.005166216 -0.08333841 0.01413343)
      PathWrap: wrap_object=supinator
    Thelen2003Muscle trap_scap_1: max_isometric_force=118 optimal_fiber_length=0.1288693
        tendon_slack_length=0.002673638 pennation_angle_at_optimal=0
      PathPoint P1: torso (-0.0484898 0.4739204 0)
      PathPoint P2: scapula_r (-0.03529375 0.005415403 -0.01367832)
    Thelen2003Muscle trap_scap_2: max_isometric_force=168 optimal_fiber_length=0.09899096
        tendon_slack_length=0.02371567 pennation_angle_at_optimal=0
      PathPoint P1: torso (-0.0496687 0.4710714 9.8242e-5)
      PathPoint P2: scapula_r (-0.05402746 0.00782003 -0.02306142)
    Thelen2003Muscle trap_scap_3: max_isometric_force=199 optimal_fiber_length=0.09283524
        tendon_slack_length=0.04685143 pennation_angle_at_optimal=0
      PathPoint P1: torso (-0.05212475 0.463212 0.003733196)
      PathPoint P2: scapula_r (-0.06265306 0.001349131 -0.0393196)
    Thelen2003Muscle trap_scap_4: max_isometric_force=138 optimal_fiber_length=0.08175446
        tendon_slack_length=0.04551456 pennation_angle_at_optimal=0
      PathPoint P1: torso (-0.05566146 0.4580052 0.004322648)
      PathPoint P2: scapula_r (-0.07202785 -0.0003299005 -0.04730246)
    Thelen2003Muscle trap_scap_5: max_isometric_force=122 optimal_fiber_length=0.07711718
        tendon_slack_length=0.02921105 pennation_angle_at_optimal=0
      PathPoint P1: torso (-0.05919817 0.4471003 0.0049121)
      PathPoint P2: scapula_r (-0.07053492 -0.0001906325 -0.06194088)
    Thelen2003Muscle trap_scap_6: max_isometric_force=101 optimal_fiber_length=0.0722241 tendon_slack_length=0.02668976
        pennation_angle_at_optimal=0
      PathPoint P1: torso (-0.07029952 0.4212627 0.003733196)
      PathPoint P2: scapula_r (-0.07596711 -0.000488505 -0.05147041)
    Thelen2003Muscle trap_scap_7: max_isometric_force=97 optimal_fiber_length=0.0671996 tendon_slack_length=0.0278708
        pennation_angle_at_optimal=0
      PathPoint P1: torso (-0.08071317 0.3881551 0.00638573)
      PathPoint P2: scapula_r (-0.07053492 -0.0001906325 -0.06194088)
    Thelen2003Muscle trap_scap_8: max_isometric_force=138 optimal_fiber_length=0.05955737
        tendon_slack_length=0.03712667 pennation_angle_at_optimal=0
      PathPoint P1: torso (-0.08483934 0.3596649 0.01159256)
      PathPoint P2: scapula_r (-0.07837441 -0.003049553 -0.05954906)
    Thelen2003Muscle trap_scap_9: max_isometric_force=123 optimal_fiber_length=0.08269309
        tendon_slack_length=0.02780974 pennation_angle_at_optimal=0
      PathPoint P1: torso (-0.08592 0.3125088 0.01444157)
      PathPoint P2: scapula_r (-0.08444097 -0.009219772 -0.08083474)
    Thelen2003Muscle trap_scap_10: max_isometric_force=81 optimal_fiber_length=0.1105382 tendon_slack_length=0.03060788
        pennation_angle_at_optimal=0
      PathPoint trap_scap10-P1: torso (-0.08768835 0.2761592 0.01797829)
      PathPoint trap_scap10-P2: scapula_r (-0.08250061 -0.01182434 -0.0745841)
    Thelen2003Muscle trap_scap_11: max_isometric_force=92 optimal_fiber_length=0.1224884 tendon_slack_length=0.02802317
        pennation_angle_at_optimal=0
      PathPoint trap_scap11-P1: torso (-0.08149911 0.245213 0.02122027)
      PathPoint trap_scap11-P2: scapula_r (-0.0793009 -0.01029271 -0.06600628)
    Thelen2003Muscle ter_min_1: max_isometric_force=122 optimal_fiber_length=0.05038511 tendon_slack_length=0.04927885
        pennation_angle_at_optimal=0
      PathPoint P1: scapula_r (-0.07322084 -0.07294184 -0.03732615)
      PathPoint P2: humerus_r (0.005469934 -0.01260353 0.01600857)
      PathWrap: wrap_object=ter_min_cyl
    Thelen2003Muscle ter_min_2: max_isometric_force=195 optimal_fiber_length=0.0551443 tendon_slack_length=0.05113381
        pennation_angle_at_optimal=0
      PathPoint P1: scapula_r (-0.0705296 -0.0704843 -0.04432873)
      PathPoint P2: humerus_r (0.007616335 -0.007200166 0.01526197)
      PathWrap: wrap_object=ter_min_cyl
    Thelen2003Muscle ter_min_3: max_isometric_force=180 optimal_fiber_length=0.05011674 tendon_slack_length=0.01782809
        pennation_angle_at_optimal=0
      PathPoint P1: scapula_r (-0.0568627 -0.05486388 -0.02333958)
      PathPoint P2: humerus_r (0.005469934 -0.01260353 0.01600857)
      PathWrap: wrap_object=ter_min_cyl
    Thelen2003Muscle ter_maj_1: max_isometric_force=165 optimal_fiber_length=0.1457673 tendon_slack_length=0.006198466
        pennation_angle_at_optimal=0
      PathPoint P1: scapula_r (-0.0878847 -0.1094772 -0.06149274)
      PathPoint P2: humerus_r (0.01096683 -0.04344792 -0.01025313)
      PathWrap: wrap_object=ter_lat_pec
    Thelen2003Muscle ter_maj_2: max_isometric_force=85 optimal_fiber_length=0.1635756 tendon_slack_length=0.01230663
        pennation_angle_at_optimal=0
      PathPoint P1: scapula_r (-0.09805661 -0.1134449 -0.07780219)
      PathPoint P2: humerus_r (0.01101349 -0.06087114 -0.007313486)
      PathWrap: wrap_object=ter_lat_pec
    Thelen2003Muscle ter_maj_3: max_isometric_force=200 optimal_fiber_length=0.15482 tendon_slack_length=0.01521822
        pennation_angle_at_optimal=0
      PathPoint P1: scapula_r (-0.0950881 -0.0878992 -0.06387997)
      PathPoint P2: humerus_r (0.01048158 -0.0554118 -0.008190711)
      PathWrap: wrap_object=ter_lat_pec
    Thelen2003Muscle ter_maj_4: max_isometric_force=158 optimal_fiber_length=0.1124663 tendon_slack_length=0.03498495
        pennation_angle_at_optimal=0
      PathPoint P1: scapula_r (-0.08544729 -0.09564965 -0.05760262)
      PathPoint P2: humerus_r (0.01214269 -0.02871238 -0.01072907)
      PathWrap: wrap_object=ter_lat_pec
    Thelen2003Muscle supra_1: max_isometric_force=120 optimal_fiber_length=0.05415912 tendon_slack_length=0.01701858
        pennation_angle_at_optimal=0
      PathPoint P1: scapula_r (-0.06807871 -0.01629352 -0.06959041)
      PathPoint P2: humerus_r (0.02197368 0.005882761 0.009844735)
      PathWrap: wrap_object=inf_sup_sub
    Thelen2003Muscle supra_2: max_isometric_force=113 optimal_fiber_length=0.0595123 tendon_slack_length=0.02517441
        pennation_angle_at_optimal=0
      PathPoint P1: scapula_r (-0.06982173 -0.004274633 -0.08759325)
      PathPoint P2: humerus_r (0.02197368 0.005882761 0.009844735)
      PathWrap: wrap_object=inf_sup_sub
    Thelen2003Muscle supra_3: max_isometric_force=258 optimal_fiber_length=0.05691428 tendon_slack_length=0.05247416
        pennation_angle_at_optimal=0
      PathPoint P1: scapula_r (-0.06482452 0.004737682 -0.08629664)
      PathPoint P2: humerus_r (0.02633958 0.00561452 0.006390665)
      PathWrap: wrap_object=inf_sup_sub
    Thelen2003Muscle supra_4: max_isometric_force=130 optimal_fiber_length=0.05591218 tendon_slack_length=0.0312866
        pennation_angle_at_optimal=0
      PathPoint P1: scapula_r (-0.05444288 0.007185854 -0.07780291)
      PathPoint P2: humerus_r (0.02633958 0.00561452 0.006390665)
      PathWrap: wrap_object=inf_sup_sub
    Thelen2003Muscle infra_1: max_isometric_force=272 optimal_fiber_length=0.06389742 tendon_slack_length=0.03835864
        pennation_angle_at_optimal=0
      PathPoint P1: scapula_r (-0.07062238 -0.05273019 -0.03918498)
      ConditionalPathPoint P3: scapula_r (-0.05685575 -0.0449055 -0.02314705)
          socket_coordinate=/jointset/acromial_r/arm_flex_r range=(0 3.14) [radians]
      PathPoint P2: humerus_r (0.000748163 0.007875817 0.01126823)
      PathWrap: wrap_object=infra_cyl
    Thelen2003Muscle infra_2: max_isometric_force=275 optimal_fiber_length=0.07287157 tendon_slack_length=0.1084459
        pennation_angle_at_optimal=0
      PathPoint P1: scapula_r (-0.1078676 -0.08692582 -0.0855407)
      ConditionalPathPoint P3: scapula_r (-0.08801692 -0.06323494 -0.04258381)
          socket_coordinate=/jointset/acromial_r/arm_flex_r range=(0 3.14)
      PathPoint P2: humerus_r (0.004882833 0.01364312 0.01176174)
      PathWrap: wrap_object=infra_cyl
    Thelen2003Muscle infra_3: max_isometric_force=194 optimal_fiber_length=0.06853138 tendon_slack_length=0.08503155
        pennation_angle_at_optimal=0
      PathPoint P1: scapula_r (-0.1009239 -0.06993814 -0.07838912)
      ConditionalPathPoint P3: scapula_r (-0.0779426 -0.05245266 -0.04120526)
          socket_coordinate=/jointset/acromial_r/arm_flex_r range=(0 3.14)
      PathPoint P2: humerus_r (0.004882833 0.01364312 0.01176174)
      PathWrap: wrap_object=infra_cyl
    Thelen2003Muscle infra_4: max_isometric_force=207 optimal_fiber_length=0.07019694 tendon_slack_length=0.07191894
        pennation_angle_at_optimal=0
      PathPoint P1: scapula_r (-0.09380118 -0.04743836 -0.08077026)
      ConditionalPathPoint P3: scapula_r (-0.05407038 -0.03809889 -0.02379335)
          socket_coordinate=/jointset/acromial_r/arm_flex_r range=(0 3.14)
      PathPoint P2: humerus_r (0.004431858 0.008984385 0.01210681)
      PathWrap: wrap_object=infra_cyl
    Thelen2003Muscle infra_5: max_isometric_force=302 optimal_fiber_length=0.07078153 tendon_slack_length=0.0507031
        pennation_angle_at_optimal=0
      PathPoint P1: scapula_r (-0.08214267 -0.02566296 -0.08261305)
      ConditionalPathPoint P3: scapula_r (-0.05407038 -0.02551186 -0.02379335)
          socket_coordinate=/jointset/acromial_r/arm_flex_r range=(0 3.14)
      PathPoint P2: humerus_r (0.002384325 0.01301131 0.0134553)
      PathWrap: wrap_object=infra_cyl
    Thelen2003Muscle infra_6: max_isometric_force=182 optimal_fiber_length=0.07626543 tendon_slack_length=0.03544874
        pennation_angle_at_optimal=0
      PathPoint P1: scapula_r (-0.07332586 -0.01618108 -0.06048878)
      ConditionalPathPoint P3: scapula_r (-0.052315 -0.02277094 -0.02138511)
          socket_coordinate=/jointset/acromial_r/arm_flex_r range=(0 3.14)
      PathPoint P2: humerus_r (0.003529664 0.01060082 0.01252699)
      PathWrap: wrap_object=infra_cyl
    Thelen2003Muscle trap_scap_1_l: max_isometric_force=118 optimal_fiber_length=0.1288693
        tendon_slack_length=0.002673638 pennation_angle_at_optimal=0
      PathPoint trap_scap_1-P1_l: torso (-0.0484898 0.4739204 0)
      PathPoint trap_scap_1-P2_l: scapula_l (-0.03529375 0.005415403 0.01367832)
    Thelen2003Muscle trap_scap_2_l: max_isometric_force=168 optimal_fiber_length=0.09899096
        tendon_slack_length=0.02371567 pennation_angle_at_optimal=0
      PathPoint trap_scap_2-P1_l: torso (-0.0496687 0.4710714 -9.8242e-5)
      PathPoint trap_scap_2-P2_l: scapula_l (-0.05402746 0.00782003 0.02306142)
    Thelen2003Muscle trap_scap_3_l: max_isometric_force=199 optimal_fiber_length=0.09283524
        tendon_slack_length=0.04685143 pennation_angle_at_optimal=0
      PathPoint trap_scap_3-P1_l: torso (-0.05212475 0.463212 -0.003733196)
      PathPoint trap_scap_3-P2_l: scapula_l (-0.06265306 0.001349131 0.0393196)
    Thelen2003Muscle trap_scap_4_l: max_isometric_force=138 optimal_fiber_length=0.08175446
        tendon_slack_length=0.04551456 pennation_angle_at_optimal=0
      PathPoint trap_scap_4-P1_l: torso (-0.05566146 0.4580052 -0.004322648)
      PathPoint trap_scap_4-P2_l: scapula_l (-0.07202785 -0.0003299005 0.04730246)
    Thelen2003Muscle trap_scap_5_l: max_isometric_force=122 optimal_fiber_length=0.07711718
        tendon_slack_length=0.02921105 pennation_angle_at_optimal=0
      PathPoint trap_scap_5-P1_l: torso (-0.05919817 0.4471003 -0.0049121)
      PathPoint trap_scap_5-P2_l: scapula_l (-0.07053492 -0.0001906325 0.06194088)
    Thelen2003Muscle trap_scap_6_l: max_isometric_force=101 optimal_fiber_length=0.0722241
        tendon_slack_length=0.02668976 pennation_angle_at_optimal=0
      PathPoint trap_scap_6-P1_l: torso (-0.07029952 0.4212627 -0.003733196)
      PathPoint trap_scap_6-P2_l: scapula_l (-0.07596711 -0.000488505 0.05147041)
    Thelen2003Muscle trap_scap_7_l: max_isometric_force=97 optimal_fiber_length=0.0671996 tendon_slack_length=0.0278708
        pennation_angle_at_optimal=0
      PathPoint trap_scap_7-P1_l: torso (-0.08071317 0.3881551 -0.00638573)
      PathPoint trap_scap_7-P2_l: scapula_l (-0.07053492 -0.0001906325 0.06194088)
    Thelen2003Muscle trap_scap_8_l: max_isometric_force=138 optimal_fiber_length=0.05955737
        tendon_slack_length=0.03712667 pennation_angle_at_optimal=0
      PathPoint trap_scap_8-P1_l: torso (-0.08483934 0.3596649 -0.01159256)
      PathPoint trap_scap_8-P2_l: scapula_l (-0.07837441 -0.003049553 0.05954906)
    Thelen2003Muscle trap_scap_9_l: max_isometric_force=123 optimal_fiber_length=0.08269309
        tendon_slack_length=0.02780974 pennation_angle_at_optimal=0
      PathPoint trap_scap_9-P1_l: torso (-0.08592 0.3125088 -0.01444157)
      PathPoint trap_scap_9-P2_l: scapula_l (-0.08444097 -0.009219772 0.08083474)
    Thelen2003Muscle trap_scap10_l: max_isometric_force=81 optimal_fiber_length=0.1105382
        tendon_slack_length=0.03060788 pennation_angle_at_optimal=0
      PathPoint trap_scap10-P1_l: torso (-0.08768835 0.2761592 -0.01797829)
      PathPoint trap_scap10-P2_l: scapula_l (-0.08250061 -0.01182434 0.0745841)
    Thelen2003Muscle trap_scap11_l: max_isometric_force=92 optimal_fiber_length=0.1224884
        tendon_slack_length=0.02802317 pennation_angle_at_optimal=0
      PathPoint trap_scap11-P1_l: torso (-0.08149911 0.245213 -0.02122027)
      PathPoint trap_scap11-P2_l: scapula_l (-0.0793009 -0.01029271 0.06600628)
    Thelen2003Muscle ter_min_1_l: max_isometric_force=122 optimal_fiber_length=0.05009515
        tendon_slack_length=0.04899526 pennation_angle_at_optimal=0
      PathPoint ter_min_1-P1_l: scapula_l (-0.07322084 -0.07294184 0.03732615)
      PathPoint ter_min_1-P2_l: humerus_l (0.005298958 -0.01220958 -0.01550818)
      PathWrap: wrap_object=ter_min_cyl_l
    Thelen2003Muscle ter_min_2_l: max_isometric_force=195 optimal_fiber_length=0.05476921
        tendon_slack_length=0.05078599 pennation_angle_at_optimal=0
      PathPoint ter_min_2-P1_l: scapula_l (-0.0705296 -0.0704843 0.04432873)
      PathPoint ter_min_2-P2_l: humerus_l (0.007378268 -0.006975107 -0.01478492)
      PathWrap: wrap_object=ter_min_cyl_l
    Thelen2003Muscle ter_min_3_l: max_isometric_force=180 optimal_fiber_length=0.04958471
        tendon_slack_length=0.01763883 pennation_angle_at_optimal=0
      PathPoint ter_min_3-P1_l: scapula_l (-0.0568627 -0.05486388 0.02333958)
      PathPoint ter_min_3-P2_l: humerus_l (0.005298958 -0.01220958 -0.01550818)
      PathWrap: wrap_object=ter_min_cyl_l
    Thelen2003Muscle ter_maj_1_l: max_isometric_force=165 optimal_fiber_length=0.146234 tendon_slack_length=0.006218313
        pennation_angle_at_optimal=0
      PathPoint ter_maj_1-P1_l: scapula_l (-0.0878847 -0.1094772 0.06149274)
      PathPoint ter_maj_1-P2_l: humerus_l (0.01062403 -0.04208986 0.009932644)
      PathWrap: wrap_object=ter_lat_pec_l
    Thelen2003Muscle ter_maj_2_l: max_isometric_force=85 optimal_fiber_length=0.1637449 tendon_slack_length=0.01231936
        pennation_angle_at_optimal=0
      PathPoint ter_maj_2-P1_l: scapula_l (-0.09805661 -0.1134449 0.07780219)
      PathPoint ter_maj_2-P2_l: humerus_l (0.01066924 -0.05896847 0.007084886)
      PathWrap: wrap_object=ter_lat_pec_l
    Thelen2003Muscle ter_maj_3_l: max_isometric_force=200 optimal_fiber_length=0.1544462 tendon_slack_length=0.01518147
        pennation_angle_at_optimal=0
      PathPoint ter_maj_3-P1_l: scapula_l (-0.0950881 -0.0878992 0.06387997)
      PathPoint ter_maj_3-P2_l: humerus_l (0.01015395 -0.05367978 0.007934691)
      PathWrap: wrap_object=ter_lat_pec_l
    Thelen2003Muscle ter_maj_4_l: max_isometric_force=158 optimal_fiber_length=0.1126607 tendon_slack_length=0.03504543
        pennation_angle_at_optimal=0
      PathPoint ter_maj_4-P1_l: scapula_l (-0.08544729 -0.09564965 0.05760262)
      PathPoint ter_maj_4-P2_l: humerus_l (0.01176314 -0.02781491 0.01039371)
      PathWrap: wrap_object=ter_lat_pec_l
    Thelen2003Muscle supra_1_l: max_isometric_force=120 optimal_fiber_length=0.05376499 tendon_slack_length=0.01689473
        pennation_angle_at_optimal=0
      PathPoint supra_1-P1_l: scapula_l (-0.06807871 -0.01629352 0.06959041)
      PathPoint supra_1-P2_l: humerus_l (0.02128684 0.005698881 -0.009537015)
      PathWrap: wrap_object=inf_sup_sub_l
    Thelen2003Muscle supra_2_l: max_isometric_force=113 optimal_fiber_length=0.05919093 tendon_slack_length=0.02503847
        pennation_angle_at_optimal=0
      PathPoint supra_2-P1_l: scapula_l (-0.06982173 -0.004274633 0.08759325)
      PathPoint supra_2-P2_l: humerus_l (0.02128684 0.005698881 -0.009537015)
      PathWrap: wrap_object=inf_sup_sub_l
    Thelen2003Muscle supra_3_l: max_isometric_force=258 optimal_fiber_length=0.05664705 tendon_slack_length=0.05222778
        pennation_angle_at_optimal=0
      PathPoint supra_3-P1_l: scapula_l (-0.06482452 0.004737682 0.08629664)
      PathPoint supra_3-P2_l: humerus_l (0.02551628 0.005439024 -0.00619091)
      PathWrap: wrap_object=inf_sup_sub_l
    Thelen2003Muscle supra_4_l: max_isometric_force=130 optimal_fiber_length=0.05565312 tendon_slack_length=0.03114164
        pennation_angle_at_optimal=0
      PathPoint supra_4-P1_l: scapula_l (-0.05444288 0.007185854 0.07780291)
      PathPoint supra_4-P2_l: humerus_l (0.02551628 0.005439024 -0.00619091)
      PathWrap: wrap_object=inf_sup_sub_l
    Thelen2003Muscle infra_1_l: max_isometric_force=272 optimal_fiber_length=0.06359925 tendon_slack_length=0.03817965
        pennation_angle_at_optimal=0
      PathPoint infra_1-P1_l: scapula_l (-0.07062238 -0.05273019 0.03918498)
      ConditionalPathPoint infra_1-P3_l: scapula_l (-0.05685575 -0.0449055 0.02314705)
          socket_coordinate=/jointset/acromial_l/arm_flex_l range=(0 3.14)
      PathPoint infra_1-P2_l: humerus_l (0.0007247774 0.007629639 -0.01091601)
      PathWrap: wrap_object=infra_cyl_l
    Thelen2003Muscle infra_2_l: max_isometric_force=275 optimal_fiber_length=0.07262514 tendon_slack_length=0.1080791
        pennation_angle_at_optimal=0
      PathPoint infra_2-P1_l: scapula_l (-0.1078676 -0.08692582 0.0855407)
      ConditionalPathPoint infra_2-P3_l: scapula_l (-0.08801692 -0.06323494 0.04258381)
          socket_coordinate=/jointset/acromial_l/arm_flex_l range=(0 3.14)
      PathPoint infra_2-P2_l: humerus_l (0.004730208 0.01321667 -0.0113941)
      PathWrap: wrap_object=infra_cyl_l
    Thelen2003Muscle infra_3_l: max_isometric_force=194 optimal_fiber_length=0.06827371 tendon_slack_length=0.08471184
        pennation_angle_at_optimal=0
      PathPoint infra_3-P1_l: scapula_l (-0.1009239 -0.06993814 0.07838912)
      ConditionalPathPoint infra_3-P3_l: scapula_l (-0.0779426 -0.05245266 0.04120526)
          socket_coordinate=/jointset/acromial_l/arm_flex_l range=(0 3.14)
      PathPoint infra_3-P2_l: humerus_l (0.004730208 0.01321667 -0.0113941)
      PathWrap: wrap_object=infra_cyl_l
    Thelen2003Muscle infra_4_l: max_isometric_force=207 optimal_fiber_length=0.06995081 tendon_slack_length=0.07166677
        pennation_angle_at_optimal=0
      PathPoint infra_4-P1_l: scapula_l (-0.09380118 -0.04743836 0.08077026)
      ConditionalPathPoint infra_4-P3_l: scapula_l (-0.05407038 -0.03809889 0.02379335)
          socket_coordinate=/jointset/acromial_l/arm_flex_l range=(0 3.14)
      PathPoint infra_4-P2_l: humerus_l (0.00429333 0.008703556 -0.01172839)
      PathWrap: wrap_object=infra_cyl_l
    Thelen2003Muscle infra_5_l: max_isometric_force=302 optimal_fiber_length=0.07055952 tendon_slack_length=0.05054407
        pennation_angle_at_optimal=0
      PathPoint infra_5-P1_l: scapula_l (-0.08214267 -0.02566296 0.08261305)
      ConditionalPathPoint infra_5-P3_l: scapula_l (-0.05407038 -0.02551186 0.02379335)
          socket_coordinate=/jointset/acromial_l/arm_flex_l range=(0 3.14)
      PathPoint infra_5-P2_l: humerus_l (0.002309798 0.01260462 -0.01303472)
      PathWrap: wrap_object=infra_cyl_l
    Thelen2003Muscle infra_6_l: max_isometric_force=182 optimal_fiber_length=0.07600078 tendon_slack_length=0.03532573
        pennation_angle_at_optimal=0
      PathPoint infra_6-P1_l: scapula_l (-0.07332586 -0.01618108 0.06048878)
      ConditionalPathPoint infra_6-P3_l: scapula_l (-0.052315 -0.02277094 0.02138511)
          socket_coordinate=/jointset/acromial_l/arm_flex_l range=(0 3.14)
      PathPoint infra_6-P2_l: humerus_l (0.003419336 0.01026947 -0.01213542)
      PathWrap: wrap_object=infra_cyl_l
    Thelen2003Muscle delt_scap_1_l: max_isometric_force=289 optimal_fiber_length=0.1078777
        tendon_slack_length=0.07650904 pennation_angle_at_optimal=0.08726646
      PathPoint delt_scap_1-P1_l: scapula_l (-0.07931286 -0.01236649 0.05672806)
      PathPoint delt_scap_1-P2_l: scapula_l (-0.0688188 -0.05721281 0.02863247)
      PathPoint delt_scap_1-P3_l: humerus_l (0.0005164885 -0.09475124 -0.0104604)
      PathWrap: wrap_object=deltoid_l
    Thelen2003Muscle delt_scap_2_l: max_isometric_force=211 optimal_fiber_length=0.09010635
        tendon_slack_length=0.07216104 pennation_angle_at_optimal=0.08726646
      PathPoint delt_scap_2-P1_l: scapula_l (-0.06494014 -0.004795631 0.03149065)
      PathPoint delt_scap_2-P2_l: scapula_l (-0.0555024 -0.04780139 0.01594896)
      PathPoint delt_scap_2-P3_l: humerus_l (0.003778676 -0.08719562 -0.01077176)
      PathWrap: wrap_object=deltoid_l
    Thelen2003Muscle delt_scap_3_l: max_isometric_force=446 optimal_fiber_length=0.07824051
        tendon_slack_length=0.05823423 pennation_angle_at_optimal=0.08726646
      PathPoint delt_scap_3-P1_l: scapula_l (-0.05090815 -0.002516748 0.005746628)
      PathPoint delt_scap_3-P2_l: humerus_l (-0.01804366 -0.003960101 0.003115501)
      PathPoint delt_scap_3-P3_l: humerus_l (0.003778676 -0.08719562 -0.01077176)
      PathWrap: wrap_object=deltoid_l
    Thelen2003Muscle delt_scap_4_l: max_isometric_force=117 optimal_fiber_length=0.06225157
        tendon_slack_length=0.04206187 pennation_angle_at_optimal=0.08726646
      PathPoint delt_scap_4-P1_l: scapula_l (-0.04336904 -0.008538431 -0.002457591)
      PathPoint delt_scap_4-P2_l: humerus_l (-0.01593795 -0.002461276 -0.006232738)
      PathPoint delt_scap_4-P3_l: humerus_l (0.004899698 -0.07654591 -0.0109164)
      PathWrap: wrap_object=deltoid_l
    Thelen2003Muscle delt_scap_5_l: max_isometric_force=120 optimal_fiber_length=0.06140879
        tendon_slack_length=0.03276383 pennation_angle_at_optimal=0.08726646
      PathPoint delt_scap_5-P1_l: scapula_l (-0.03022315 -0.005551013 -0.01210924)
      PathPoint delt_scap_5-P2_l: humerus_l (0.007955387 -0.0666975 -0.01188374)
      PathWrap: wrap_object=deltoid_l
    Thelen2003Muscle delt_scap_6_l: max_isometric_force=285 optimal_fiber_length=0.07155382
        tendon_slack_length=0.06250464 pennation_angle_at_optimal=0.08726646
      PathPoint delt_scap_6-P1_l: scapula_l (-0.04117568 -0.002612924 -0.00494579)
      PathPoint delt_scap_6-P2_l: humerus_l (0.002576289 -0.09848721 -0.01159444)
      PathWrap: wrap_object=deltoid_l
    Thelen2003Muscle delt_scap_7_l: max_isometric_force=149 optimal_fiber_length=0.06990705
        tendon_slack_length=0.07602623 pennation_angle_at_optimal=0.08726646
      PathPoint delt_scap_7-P1_l: scapula_l (-0.03729904 -0.005237866 -0.01096136)
      PathPoint delt_scap_7-P2_l: humerus_l (0.003887159 -0.118973 -0.01098873)
      PathWrap: wrap_object=deltoid_l
    Thelen2003Muscle delt_scap_8_l: max_isometric_force=215 optimal_fiber_length=0.06607802
        tendon_slack_length=0.06049396 pennation_angle_at_optimal=0.08726646
      PathPoint delt_scap_8-P1_l: scapula_l (-0.02820068 -0.002437133 -0.01072885)
      PathPoint delt_scap_8-P2_l: humerus_l (0.002576289 -0.09848721 -0.01159444)
      PathWrap: wrap_object=deltoid_l
    Thelen2003Muscle delt_scap_9_l: max_isometric_force=286 optimal_fiber_length=0.06777643
        tendon_slack_length=0.06573943 pennation_angle_at_optimal=0.08726646
      PathPoint delt_scap_9-P1_l: scapula_l (-0.02236197 -0.004628411 -0.009709678)
      PathPoint delt_scap_9-P2_l: humerus_l (0.01301807 -0.1061174 -0.01341158)
      PathWrap: wrap_object=deltoid_l
    Thelen2003Muscle delt_scap10_l: max_isometric_force=445 optimal_fiber_length=0.0693754
        tendon_slack_length=0.05935863 pennation_angle_at_optimal=0.08726646
      PathPoint delt_scap10-P1_l: scapula_l (-0.01295802 -0.004698259 -0.01085041)
      PathPoint delt_scap10-P2_l: humerus_l (0.01564363 -0.09895768 -0.01325789)
      PathWrap: wrap_object=deltoid_l
    Thelen2003Muscle delt_scap11_l: max_isometric_force=239 optimal_fiber_length=0.06869427
        tendon_slack_length=0.04473982 pennation_angle_at_optimal=0.08726646
      PathPoint delt_scap11-P1_l: scapula_l (-0.000915905 -0.006518687 -0.005838814)
      PathPoint delt_scap11-P2_l: humerus_l (0.02056986 -0.08786743 -0.01297601)
      PathWrap: wrap_object=deltoid_l
    Thelen2003Muscle delt_clav_1_l: max_isometric_force=128 optimal_fiber_length=0.07822108
        tendon_slack_length=0.05801085 pennation_angle_at_optimal=0.08726646
      PathPoint delt_clav_1-P1_l: clavicle_l (-0.02064491 0.01550846 -0.09960969)
      PathPoint delt_clav_1-P2_l: humerus_l (0.02056986 -0.08786743 -0.01297601)
      PathWrap: wrap_object=delt_ant_l
    Thelen2003Muscle delt_clav_2_l: max_isometric_force=160 optimal_fiber_length=0.08731769
        tendon_slack_length=0.08174422 pennation_angle_at_optimal=0.08726646
      PathPoint delt_clav_2-P1_l: clavicle_l (-0.01701221 0.01528699 -0.08290739)
      PathPoint delt_clav_2-P2_l: humerus_l (0.01856981 -0.1069874 -0.01154547)
      PathWrap pathwrap-1: wrap_object=delt_ant_l
    Thelen2003Muscle delt_clav_3_l: max_isometric_force=105 optimal_fiber_length=0.07693669
        tendon_slack_length=0.06255775 pennation_angle_at_optimal=0.08726646
      PathPoint delt_clav_3-P1_l: clavicle_l (-0.01595583 0.01346744 -0.08835292)
      PathPoint delt_clav_3-P2_l: humerus_l (0.02045513 -0.0942156 -0.01206745)
      PathWrap pathwrap-1: wrap_object=delt_ant_l
    Thelen2003Muscle delt_clav_4_l: max_isometric_force=112 optimal_fiber_length=0.0925171
        tendon_slack_length=0.06815084 pennation_angle_at_optimal=0.08726646
      PathPoint delt_clav_4-P1_l: clavicle_l (-0.01464457 0.01007637 -0.08581662)
      PathPoint delt_clav_4-P2_l: humerus_l (0.01856981 -0.1069874 -0.01154547)
      PathWrap pathwrap-1: wrap_object=delt_ant_l
    Thelen2003Muscle tric_long_1_l: max_isometric_force=223 optimal_fiber_length=0.09027866
        tendon_slack_length=0.1827964 pennation_angle_at_optimal=0.1745329
      PathPoint tric_long_1-P1_l: ulna_l (-0.02251759 0.003751468 0.005725797)
      PathPoint tric_long_1-P2_l: scapula_l (-0.053072 -0.05931322 0.01854781)
      PathWrap: wrap_object=elbow_l
    Thelen2003Muscle tric_long_2_l: max_isometric_force=296 optimal_fiber_length=0.07882299
        tendon_slack_length=0.1962075 pennation_angle_at_optimal=0.1745329
      PathPoint tric_long_2-P1_l: ulna_l (-0.0222397 0.01332908 -0.003415194)
      PathPoint tric_long_2-P2_l: scapula_l (-0.02818621 -0.0566842 0.02102305)
      PathWrap: wrap_object=elbow_l
    Thelen2003Muscle tric_long_3_l: max_isometric_force=283 optimal_fiber_length=0.1061326
        tendon_slack_length=0.1955782 pennation_angle_at_optimal=0.1745329
      PathPoint tric_long_3-P1_l: ulna_l (-0.02778214 0.009234882 -0.003893612)
      PathPoint tric_long_3-P2_l: scapula_l (-0.04337853 -0.05234912 0.01309292)
      PathWrap: wrap_object=elbow_l
    Thelen2003Muscle tric_long_4_l: max_isometric_force=327 optimal_fiber_length=0.1099102
        tendon_slack_length=0.1969599 pennation_angle_at_optimal=0
      PathPoint tric_long_4-P1_l: ulna_l (-0.02434949 0.008423754 -0.007807386)
      PathPoint tric_long_4-P2_l: scapula_l (-0.02818621 -0.0566842 0.02102305)
      PathWrap: wrap_object=elbow_l
    Thelen2003Muscle tric_med_1_l: max_isometric_force=263 optimal_fiber_length=0.07321587
        tendon_slack_length=0.07938524 pennation_angle_at_optimal=0.296706
      PathPoint tric_med_1-P1_l: humerus_l (0.004326129 -0.1076158 0.006361981)
      PathPoint tric_med_1-P2_l: ulna_l (-0.03324562 -0.003215289 -0.001130425)
      PathWrap: wrap_object=elbow_l
    Thelen2003Muscle tric_med_2_l: max_isometric_force=256 optimal_fiber_length=0.07020191
        tendon_slack_length=0.1018972 pennation_angle_at_optimal=0
      PathPoint tric_med_2-P1_l: humerus_l (0.003498807 -0.1316828 0.008624462)
      PathPoint tric_med_2-P2_l: ulna_l (-0.03324562 -0.003215289 -0.001130425)
      PathWrap: wrap_object=elbow_l
    Thelen2003Muscle tric_med_3_l: max_isometric_force=240 optimal_fiber_length=0.05550507
        tendon_slack_length=0.009865519 pennation_angle_at_optimal=0
      PathPoint tric_med_3-P1_l: humerus_l (-0.003146161 -0.2188319 -0.005542765)
      PathPoint tric_med_3-P2_l: ulna_l (-0.03324562 -0.003215289 -0.001130425)
      PathWrap: wrap_object=elbow_l
    Thelen2003Muscle tric_med_4_l: max_isometric_force=211 optimal_fiber_length=0.06799149
        tendon_slack_length=0.03682113 pennation_angle_at_optimal=0.1396263
      PathPoint tric_med_4-P1_l: humerus_l (-0.001892416 -0.1807106 -0.001071598)
      PathPoint tric_med_4-P2_l: ulna_l (-0.03324562 -0.003215289 -0.001130425)
      PathWrap: wrap_object=elbow_l
    Thelen2003Muscle tric_med_5_l: max_isometric_force=107 optimal_fiber_length=0.07326451
        tendon_slack_length=0.06700026 pennation_angle_at_optimal=0
      PathPoint tric_med_5-P1_l: humerus_l (-0.002038471 -0.1380271 0.004878434)
      PathPoint tric_med_5-P2_l: ulna_l (-0.03324562 -0.003215289 -0.001130425)
      PathWrap: wrap_object=elbow_l
    Thelen2003Muscle tric_lat_1_l: max_isometric_force=153 optimal_fiber_length=0.06829275
        tendon_slack_length=0.1537938 pennation_angle_at_optimal=0
      PathPoint tric_lat_1-P1_l: humerus_l (-0.001835519 -0.05880063 -0.003678141)
      PathPoint tric_lat_1-P2_l: ulna_l (-0.02579457 0.01171795 0.003415094)
      PathWrap: wrap_object=elbow_l
    Thelen2003Muscle tric_lat_2_l: max_isometric_force=410 optimal_fiber_length=0.06907705
        tendon_slack_length=0.1596167 pennation_angle_at_optimal=0.08726646
      PathPoint tric_lat_2-P1_l: humerus_l (-0.001835519 -0.05880063 -0.003678141)
      PathPoint tric_lat_2-P2_l: ulna_l (-0.02695595 0.009269194 0.002553686)
      PathWrap: wrap_object=elbow_l
    Thelen2003Muscle tric_lat_3_l: max_isometric_force=219 optimal_fiber_length=0.05924813
        tendon_slack_length=0.1725963 pennation_angle_at_optimal=0.1745329
      PathPoint tric_lat_3-P1_l: humerus_l (-0.001835519 -0.05880063 -0.003678141)
      PathPoint tric_lat_3-P2_l: ulna_l (-0.02506861 0.004042696 -0.00633136)
      PathWrap: wrap_object=elbow_l
    Thelen2003Muscle tric_lat_4_l: max_isometric_force=275 optimal_fiber_length=0.05762983
        tendon_slack_length=0.1418163 pennation_angle_at_optimal=0.1745329
      PathPoint tric_lat_4-P1_l: humerus_l (0.00233605 -0.09343637 -0.005711141)
      PathPoint tric_lat_4-P2_l: ulna_l (-0.02506861 0.004042696 -0.00633136)
      PathWrap: wrap_object=elbow_l
    Thelen2003Muscle tric_lat_5_l: max_isometric_force=87 optimal_fiber_length=0.05754582 tendon_slack_length=0.1416096
        pennation_angle_at_optimal=0.296706
      PathPoint tric_lat_5-P1_l: humerus_l (0.00233605 -0.09343637 -0.005711141)
      PathPoint tric_lat_5-P2_l: ulna_l (-0.02633574 0.007972248 -0.004066545)
      PathWrap: wrap_object=elbow_l
    Thelen2003Muscle bic_l_l: max_isometric_force=347 optimal_fiber_length=0.1212411 tendon_slack_length=0.219116
        pennation_angle_at_optimal=0
      PathPoint bic_l-P1_l: scapula_l (-0.02537689 -0.02174074 0.01270269)
      PathPoint bic_l-P2_l: humerus_l (0.02121251 -0.005388675 -0.005892286)
      PathPoint bic_l-P3_l: radius_l (0.00350281 -0.03163104 0.00691929)
      PathWrap: wrap_object=inf_sup_sub_l
      PathWrap pathwrap_0: wrap_object=elbow_circ_l
    Thelen2003Muscle bic_s_l: max_isometric_force=173 optimal_fiber_length=0.1074096 tendon_slack_length=0.1756192
        pennation_angle_at_optimal=0
      PathPoint bic_s-P1_l: scapula_l (0.01059939 -0.03837089 0.02447164)
      PathPoint bic_s-P2_l: radius_l (0.00350281 -0.03163104 0.00691929)
      PathWrap: wrap_object=elbow_circ_l
    Thelen2003Muscle brachiorad_1_l: max_isometric_force=30 optimal_fiber_length=0.1563167
        tendon_slack_length=0.1160019 pennation_angle_at_optimal=0
      PathPoint brachiorad_1-P1_l: humerus_l (0.002743246 -0.1957731 -0.003861539)
      PathPoint brachiorad_1-P2_l: radius_l (-0.00098847 -0.2214173 -0.03163104)
    Thelen2003Muscle brachiorad_2_l: max_isometric_force=82 optimal_fiber_length=0.1569596 tendon_slack_length=0.116479
        pennation_angle_at_optimal=0
      PathPoint brachiorad_2-P1_l: humerus_l (-0.0002315691 -0.2121208 -0.003909926)
      PathPoint brachiorad_2-P2_l: radius_l (-0.00098847 -0.2214173 -0.03163104)
    Thelen2003Muscle brachiorad_3_l: max_isometric_force=52 optimal_fiber_length=0.1041085
        tendon_slack_length=0.1505959 pennation_angle_at_optimal=0
      PathPoint brachiorad_3-P1_l: humerus_l (7.224313e-5 -0.2248474 -0.005645399)
      PathPoint brachiorad_3-P2_l: radius_l (-0.00098847 -0.2214173 -0.03163104)
    Thelen2003Muscle brachialis_1_l: max_isometric_force=314 optimal_fiber_length=0.08051638
        tendon_slack_length=0.07417434 pennation_angle_at_optimal=0
      PathPoint brachialis_1-P1_l: humerus_l (0.003670075 -0.1379811 -0.007165845)
      PathPoint brachialis_1-P2_l: ulna_l (-0.01311139 -0.03775889 0.003262862)
      PathWrap: wrap_object=elbow_circ_l
    Thelen2003Muscle brachialis_2_l: max_isometric_force=158 optimal_fiber_length=0.08770019
        tendon_slack_length=0.05447903 pennation_angle_at_optimal=0
      PathPoint brachialis_2-P1_l: humerus_l (0.01313607 -0.1448736 0.003577042)
      PathPoint brachialis_2-P2_l: ulna_l (-0.01551024 -0.03733437 0.007686663)
      PathWrap: wrap_object=elbow_circ_l
    Thelen2003Muscle brachialis_3_l: max_isometric_force=157 optimal_fiber_length=0.08008606
        tendon_slack_length=0.03626886 pennation_angle_at_optimal=0
      PathPoint brachialis_3-P1_l: humerus_l (0.006508591 -0.1705924 0.006316578)
      PathPoint brachialis_3-P2_l: ulna_l (-0.01447314 -0.02665475 0.0123963)
      PathWrap: wrap_object=elbow_circ_l
    Thelen2003Muscle brachialis_4_l: max_isometric_force=87 optimal_fiber_length=0.07008432
        tendon_slack_length=0.02930967 pennation_angle_at_optimal=0
      PathPoint brachialis_4-P1_l: humerus_l (0.009905455 -0.1788511 0.002030253)
      PathPoint brachialis_4-P2_l: ulna_l (-0.01539416 -0.03689702 0.004039476)
      PathWrap: wrap_object=elbow_circ_l
    Thelen2003Muscle brachialis_5_l: max_isometric_force=101 optimal_fiber_length=0.05759083
        tendon_slack_length=0.01944505 pennation_angle_at_optimal=0
      PathPoint brachialis_5-P1_l: humerus_l (0.006338449 -0.2056918 0.006089587)
      PathPoint brachialis_5-P2_l: ulna_l (-0.01687734 -0.03417693 0.01039048)
      PathWrap: wrap_object=elbow_circ_l
    Thelen2003Muscle brachialis_6_l: max_isometric_force=104 optimal_fiber_length=0.04386369
        tendon_slack_length=0.03252604 pennation_angle_at_optimal=0
      PathPoint brachialis_6-P1_l: humerus_l (0.009879019 -0.2076332 0.001622896)
      PathPoint brachialis_6-P2_l: ulna_l (-0.01568911 -0.02892484 0.01296498)
      PathWrap: wrap_object=elbow_circ_l
    Thelen2003Muscle brachialis_7_l: max_isometric_force=118 optimal_fiber_length=0.05804527
        tendon_slack_length=0.007103769 pennation_angle_at_optimal=0
      PathPoint brachialis_7-P1_l: humerus_l (0.005924743 -0.2192644 0.008822194)
      PathPoint brachialis_7-P2_l: ulna_l (-0.01376994 -0.03660919 -1.77633e-5)
      PathWrap: wrap_object=elbow_circ_l
    Thelen2003Muscle anconeus_1_l: max_isometric_force=31 optimal_fiber_length=0.02425038
        tendon_slack_length=0.006158826 pennation_angle_at_optimal=0
      PathPoint anconeus_1-P1_l: humerus_l (0.0020792 -0.2550166 -0.01304134)
      PathPoint anconeus_1-P2_l: ulna_l (-0.02745874 -0.02695493 -0.01514682)
    Thelen2003Muscle anconeus_2_l: max_isometric_force=70 optimal_fiber_length=0.01958356
        tendon_slack_length=0.007755866 pennation_angle_at_optimal=0.2617994
      PathPoint anconeus_2-P1_l: humerus_l (0.00418923 -0.2575966 -0.01141508)
      PathPoint anconeus_2-P2_l: ulna_l (-0.02926888 -0.03039988 -0.01627791)
    Thelen2003Muscle anconeus_3_l: max_isometric_force=25 optimal_fiber_length=0.02177668
        tendon_slack_length=0.004107006 pennation_angle_at_optimal=0
      PathPoint anconeus_3-P1_l: humerus_l (0.00267547 -0.2513304 -0.01298824)
      PathPoint anconeus_3-P2_l: ulna_l (-0.02694499 -0.01988521 -0.01479926)
    Thelen2003Muscle anconeus_4_l: max_isometric_force=118 optimal_fiber_length=0.02608546
        tendon_slack_length=0.02898385 pennation_angle_at_optimal=0.3141593
      PathPoint anconeus_4-P1_l: humerus_l (0.004413305 -0.2580537 -0.02000138)
      PathPoint anconeus_4-P2_l: ulna_l (-0.0332766 -0.05855278 -0.02080522)
    Thelen2003Muscle anconeus_5_l: max_isometric_force=118 optimal_fiber_length=0.02567243
        tendon_slack_length=0.01930258 pennation_angle_at_optimal=0.4014257
      PathPoint anconeus_5-P1_l: humerus_l (0.003260442 -0.2570613 -0.01876133)
      PathPoint anconeus_5-P2_l: ulna_l (-0.03174913 -0.04361688 -0.02023545)
    Thelen2003Muscle pron_quad_1_l: max_isometric_force=73 optimal_fiber_length=0.03742411
        tendon_slack_length=0.00496341 pennation_angle_at_optimal=0
      PathPoint pron_quad_1-P1_l: radius_l (-0.003343187 -0.1929291 -0.02135148)
      PathPoint pron_quad_1-P2_l: ulna_l (-0.01960783 -0.2006657 -0.01773567)
    Thelen2003Muscle pron_quad_2_l: max_isometric_force=178 optimal_fiber_length=0.03864369
        tendon_slack_length=0.005005659 pennation_angle_at_optimal=0
      PathPoint pron_quad_2-P1_l: radius_l (-0.003065419 -0.2026433 -0.02202727)
      PathPoint pron_quad_2-P2_l: ulna_l (-0.02036073 -0.2087978 -0.01960604)
    Thelen2003Muscle pron_quad_3_l: max_isometric_force=219 optimal_fiber_length=0.03524389
        tendon_slack_length=0.005006235 pennation_angle_at_optimal=0
      PathPoint pron_quad_3-P1_l: radius_l (-0.002113621 -0.213987 -0.02328216)
      PathPoint pron_quad_3-P2_l: ulna_l (-0.01980462 -0.2205152 -0.02123618)
    Thelen2003Muscle pron_teres_1_l: max_isometric_force=510 optimal_fiber_length=0.05964453
        tendon_slack_length=0.083209 pennation_angle_at_optimal=0
      PathPoint pron_teres_1-P1_l: humerus_l (0.01150003 -0.2567921 0.02323225)
      PathPoint pron_teres_1-P2_l: radius_l (0.00135053 -0.09301261 -0.02098804)
      PathWrap: wrap_object=ulna_radius_l method=hybrid
    Thelen2003Muscle pron_teres_2_l: max_isometric_force=141 optimal_fiber_length=0.03844716
        tendon_slack_length=0.04759188 pennation_angle_at_optimal=0
      PathPoint pron_teres_2-P1_l: ulna_l (0.002444935 -0.003411147 0.005855095)
      PathPoint pron_teres_2-P2_l: radius_l (0.001087197 -0.07564568 -0.01904674)
      PathWrap: wrap_object=ulna_radius_l
    Thelen2003Muscle supinator_1_l: max_isometric_force=47 optimal_fiber_length=0.02652966
        tendon_slack_length=0.02523795 pennation_angle_at_optimal=0
      PathPoint supinator_1-P1_l: humerus_l (0.01135138 -0.2582972 -0.02002065)
      PathPoint supinator_1-P2_l: radius_l (0.003116061 -0.03680447 -0.004974519)
      PathWrap: wrap_object=supinator2_l
    Thelen2003Muscle supinator_2_l: max_isometric_force=148 optimal_fiber_length=0.02613867
        tendon_slack_length=0.01441105 pennation_angle_at_optimal=0
      PathPoint supinator_2-P1_l: humerus_l (0.00708835 -0.2576847 -0.01875202)
      PathPoint supinator_2-P2_l: radius_l (0.001717515 -0.04314454 -0.005619454)
      PathWrap: wrap_object=supinator3_l
    Thelen2003Muscle supinator_3_l: max_isometric_force=285 optimal_fiber_length=0.0272306
        tendon_slack_length=0.01381407 pennation_angle_at_optimal=0.03490659
      PathPoint supinator_3-P1_l: ulna_l (-0.01497769 -0.02643244 -0.01905027)
      PathPoint supinator_3-P2_l: radius_l (0.005494006 -0.05542737 -0.006898444)
      PathWrap: wrap_object=supinator_l
    Thelen2003Muscle supinator_4_l: max_isometric_force=126 optimal_fiber_length=0.02503354
        tendon_slack_length=0.01490092 pennation_angle_at_optimal=0
      PathPoint supinator_4-P1_l: ulna_l (-0.01683966 -0.03604453 -0.01921037)
      PathPoint supinator_4-P2_l: radius_l (0.005324506 -0.06930521 -0.01142756)
      PathWrap: wrap_object=supinator_l
    Thelen2003Muscle supinator_5_l: max_isometric_force=232 optimal_fiber_length=0.02582651
        tendon_slack_length=0.02294586 pennation_angle_at_optimal=0
      PathPoint supinator_5-P1_l: ulna_l (-0.01772093 -0.04672938 -0.01431293)
      PathPoint supinator_5-P2_l: radius_l (0.005166216 -0.08333841 -0.01413343)
      PathWrap: wrap_object=supinator_l
    Thelen2003Muscle coracobr_1_l: max_isometric_force=201 optimal_fiber_length=0.06031909
        tendon_slack_length=0.08408115 pennation_angle_at_optimal=0
      PathPoint coracobr_1-P1_l: scapula_l (0.004613552 -0.03486708 0.02389662)
      PathPoint coracobr_1-P2_l: humerus_l (0.01386568 -0.1394278 0.004056392)
    Thelen2003Muscle coracobr_2_l: max_isometric_force=148 optimal_fiber_length=0.06205653
        tendon_slack_length=0.09449311 pennation_angle_at_optimal=0
      PathPoint coracobr_2-P1_l: scapula_l (0.005276829 -0.04329597 0.02879128)
      PathPoint coracobr_2-P2_l: humerus_l (0.01013398 -0.1574941 0.007593385)
    Thelen2003Muscle coracobr_3_l: max_isometric_force=114 optimal_fiber_length=0.06632157
        tendon_slack_length=0.1030858 pennation_angle_at_optimal=0
      PathPoint coracobr_3-P1_l: scapula_l (0.01052598 -0.03590565 0.02387638)
      PathPoint coracobr_3-P2_l: humerus_l (0.0153048 -0.1649662 0.002233581)
    Thelen2003Muscle rhomboid_1: max_isometric_force=51 optimal_fiber_length=0.08127851 tendon_slack_length=0.01236488
        pennation_angle_at_optimal=0
      PathPoint P1: torso (-0.06638442 0.4262547 0.0004975425)
      PathPoint P2: scapula_r (-0.07394877 -0.01862485 -0.08865767)
    Thelen2003Muscle rhomboid_2: max_isometric_force=92 optimal_fiber_length=0.1020525 tendon_slack_length=0.06253915
        pennation_angle_at_optimal=0
      PathPoint P1: torso (-0.06986775 0.4145513 0.001043546)
      PathPoint P2: scapula_r (-0.09914272 -0.08712339 -0.09544974)
    Thelen2003Muscle rhomboid_3: max_isometric_force=142 optimal_fiber_length=0.1193138 tendon_slack_length=0.03032598
        pennation_angle_at_optimal=0
      PathPoint P1: torso (-0.07608421 0.3987157 0.01063932)
      PathPoint P2: scapula_r (-0.0990215 -0.09099748 -0.09400988)
    Thelen2003Muscle rhomboid_4: max_isometric_force=82 optimal_fiber_length=0.1135983 tendon_slack_length=0.02779437
        pennation_angle_at_optimal=0
      PathPoint P1: torso (-0.08342452 0.3652732 0.003478157)
      PathPoint P2: scapula_r (-0.1020992 -0.1005563 -0.09094531)
    Thelen2003Muscle rhomboid_5: max_isometric_force=67 optimal_fiber_length=0.09774358 tendon_slack_length=0.03341661
        pennation_angle_at_optimal=0
      PathPoint P1: torso (-0.08535263 0.3349385 0.00580622)
      PathPoint P2: scapula_r (-0.1060282 -0.1069942 -0.09318833)
    Thelen2003Muscle rhomboid_1_l: max_isometric_force=51 optimal_fiber_length=0.08127851
        tendon_slack_length=0.01236488 pennation_angle_at_optimal=0
      PathPoint rhomboid_1-P1_l: torso (-0.06638442 0.4262547 -0.0004975425)
      PathPoint rhomboid_1-P2_l: scapula_l (-0.07394877 -0.01862485 0.08865767)
    Thelen2003Muscle rhomboid_2_l: max_isometric_force=92 optimal_fiber_length=0.1020525 tendon_slack_length=0.06253915
        pennation_angle_at_optimal=0
      PathPoint rhomboid_2-P1_l: torso (-0.06986775 0.4145513 -0.001043546)
      PathPoint rhomboid_2-P2_l: scapula_l (-0.09914272 -0.08712339 0.09544974)
    Thelen2003Muscle rhomboid_3_l: max_isometric_force=142 optimal_fiber_length=0.1193138
        tendon_slack_length=0.03032598 pennation_angle_at_optimal=0
      PathPoint rhomboid_3-P1_l: torso (-0.07608421 0.3987157 -0.01063932)
      PathPoint rhomboid_3-P2_l: scapula_l (-0.0990215 -0.09099748 0.09400988)
    Thelen2003Muscle rhomboid_4_l: max_isometric_force=82 optimal_fiber_length=0.1135983 tendon_slack_length=0.02779437
        pennation_angle_at_optimal=0
      PathPoint rhomboid_4-P1_l: torso (-0.08342452 0.3652732 -0.003478157)
      PathPoint rhomboid_4-P2_l: scapula_l (-0.1020992 -0.1005563 0.09094531)
    Thelen2003Muscle rhomboid_5_l: max_isometric_force=67 optimal_fiber_length=0.09774358
        tendon_slack_length=0.03341661 pennation_angle_at_optimal=0
      PathPoint rhomboid_5-P1_l: torso (-0.08535263 0.3349385 -0.00580622)
      PathPoint rhomboid_5-P2_l: scapula_l (-0.1060282 -0.1069942 0.09318833)
    Thelen2003Muscle lev_scap_1: max_isometric_force=96 optimal_fiber_length=0.1554546 tendon_slack_length=0.01871759
        pennation_angle_at_optimal=0
      PathPoint P1: torso (-0.04537749 0.5044803 0.03781141)
      PathPoint P2: scapula_r (-0.07544437 -0.00820544 -0.09706127)
    Thelen2003Muscle lev_scap_2: max_isometric_force=104 optimal_fiber_length=0.1223339 tendon_slack_length=0.01691252
        pennation_angle_at_optimal=0
      PathPoint P1: torso (-0.03986654 0.4887729 0.02193908)
      PathPoint P2: scapula_r (-0.06545042 0.0008247223 -0.09578238)
    Thelen2003Muscle lev_scap_1_l: max_isometric_force=96 optimal_fiber_length=0.1554546 tendon_slack_length=0.01871759
        pennation_angle_at_optimal=0
      PathPoint lev_scap_1-P1_l: torso (-0.04537749 0.5044803 -0.03781141)
      PathPoint lev_scap_1-P2_l: scapula_l (-0.07544437 -0.00820544 0.09706127)
    Thelen2003Muscle lev_scap_2_l: max_isometric_force=104 optimal_fiber_length=0.1223339
        tendon_slack_length=0.01691252 pennation_angle_at_optimal=0
      PathPoint lev_scap_2-P1_l: torso (-0.03986654 0.4887729 -0.02193908)
      PathPoint lev_scap_2-P2_l: scapula_l (-0.06545042 0.0008247223 0.09578238)
    Thelen2003Muscle subscap_1: max_isometric_force=44 optimal_fiber_length=0.05544751 tendon_slack_length=0.02792321
        pennation_angle_at_optimal=0
      PathPoint P1: scapula_r (-0.05062918 -0.02818454 -0.05946553)
      PathPoint P2: scapula_r (-0.03454216 -0.0360362 -0.03632765)
      PathPoint P3: humerus_r (0.02506262 0.00438017 -0.005325123)
      PathWrap: wrap_object=inf_sup_sub
    Thelen2003Muscle subscap_2: max_isometric_force=78 optimal_fiber_length=0.06523731 tendon_slack_length=0.04422868
        pennation_angle_at_optimal=0
      PathPoint P1: scapula_r (-0.06720382 -0.01610575 -0.08125753)
      PathPoint P2: scapula_r (-0.03372063 -0.03552977 -0.03645442)
      PathPoint P3: humerus_r (0.02477924 0.00613579 -0.005198188)
      PathWrap: wrap_object=inf_sup_sub
    Thelen2003Muscle subscap_3: max_isometric_force=264 optimal_fiber_length=0.06794846 tendon_slack_length=0.05930413
        pennation_angle_at_optimal=0.08726646
      PathPoint P1: scapula_r (-0.07469298 -0.02926025 -0.08492846)
      PathPoint P2: scapula_r (-0.03334929 -0.03709924 -0.03575442)
      PathPoint P3: humerus_r (0.02495126 0.002027294 -0.005385959)
      PathWrap: wrap_object=inf_sup_sub
    Thelen2003Muscle subscap_4: max_isometric_force=274 optimal_fiber_length=0.07485949 tendon_slack_length=0.05533968
        pennation_angle_at_optimal=0.08726646
      PathPoint P1: scapula_r (-0.08271726 -0.05051943 -0.07276026)
      PathPoint P2: humerus_r (0.02475217 0.003427437 -0.005953076)
      PathWrap: wrap_object=inf_sup_sub
    Thelen2003Muscle subscap_5: max_isometric_force=114 optimal_fiber_length=0.07986727 tendon_slack_length=0.06613852
        pennation_angle_at_optimal=0
      PathPoint P1: scapula_r (-0.08033484 -0.06238006 -0.0674546)
      PathPoint P2: humerus_r (0.0244722 0.005443192 -0.002229528)
      PathWrap: wrap_object=inf_sup_sub
    Thelen2003Muscle subscap_6: max_isometric_force=149 optimal_fiber_length=0.07693905 tendon_slack_length=0.07774681
        pennation_angle_at_optimal=0
      PathPoint P1: scapula_r (-0.0967355 -0.08434556 -0.07986466)
      PathPoint P2: humerus_r (0.02769181 -0.0004174293 -0.004627903)
      PathWrap: wrap_object=inf_sup_sub
    Thelen2003Muscle subscap_7: max_isometric_force=162 optimal_fiber_length=0.08301548 tendon_slack_length=0.07997833
        pennation_angle_at_optimal=0
      PathPoint P1: scapula_r (-0.09267624 -0.09695646 -0.07194412)
      PathPoint P2: humerus_r (0.02639463 -0.001742602 -0.00855676)
      PathWrap: wrap_object=inf_sup_sub
    Thelen2003Muscle subscap_8: max_isometric_force=61 optimal_fiber_length=0.07692261 tendon_slack_length=0.04022097
        pennation_angle_at_optimal=0
      PathPoint P1: scapula_r (-0.07149291 -0.07506411 -0.05301903)
      PathPoint P2: humerus_r (0.02639463 -0.001742602 -0.00855676)
      PathWrap: wrap_object=inf_sup_sub
    Thelen2003Muscle subscap_9: max_isometric_force=222 optimal_fiber_length=0.07316023 tendon_slack_length=0.0598676
        pennation_angle_at_optimal=0
      PathPoint P1: scapula_r (-0.08427707 -0.09433434 -0.05657923)
      PathPoint P2: humerus_r (0.02328701 -0.006044746 -0.01241096)
      PathWrap: wrap_object=inf_sup_sub
    Thelen2003Muscle subscap10: max_isometric_force=47 optimal_fiber_length=0.0684368 tendon_slack_length=0.01012379
        pennation_angle_at_optimal=0
      PathPoint P1: scapula_r (-0.06245692 -0.06622545 -0.03453635)
      PathPoint P2: humerus_r (0.01603589 -0.01845657 -0.01319486)
      PathWrap: wrap_object=inf_sup_sub
    Thelen2003Muscle subscap11: max_isometric_force=16 optimal_fiber_length=0.06411735 tendon_slack_length=0.009971594
        pennation_angle_at_optimal=0
      PathPoint P1: scapula_r (-0.04693114 -0.05882661 -0.02472208)
      PathPoint P2: humerus_r (0.01109916 -0.02388791 -0.01536927)
      PathWrap: wrap_object=inf_sup_sub
    Thelen2003Muscle subscap_1_l: max_isometric_force=44 optimal_fiber_length=0.05500789 tendon_slack_length=0.02770182
        pennation_angle_at_optimal=0
      PathPoint subscap_1-P1_l: scapula_l (-0.05062918 -0.02818454 0.05946553)
      PathPoint subscap_1-P2_l: scapula_l (-0.03454216 -0.0360362 0.03632765)
      PathPoint subscap_1-P3_l: humerus_l (0.02427923 0.004243258 0.005158674)
      PathWrap: wrap_object=inf_sup_sub_l
    Thelen2003Muscle subscap_2_l: max_isometric_force=78 optimal_fiber_length=0.06487655 tendon_slack_length=0.0439841
        pennation_angle_at_optimal=0
      PathPoint subscap_2-P1_l: scapula_l (-0.06720382 -0.01610575 0.08125753)
      PathPoint subscap_2-P2_l: scapula_l (-0.03372063 -0.03552977 0.03645442)
      PathPoint subscap_2-P3_l: humerus_l (0.0240047 0.005944001 0.005035706)
      PathWrap: wrap_object=inf_sup_sub_l
    Thelen2003Muscle subscap_3_l: max_isometric_force=264 optimal_fiber_length=0.06757158 tendon_slack_length=0.0589752
        pennation_angle_at_optimal=0.08726646
      PathPoint subscap_3-P1_l: scapula_l (-0.07469298 -0.02926025 0.08492846)
      PathPoint subscap_3-P2_l: scapula_l (-0.03334929 -0.03709924 0.03575442)
      PathPoint subscap_3-P3_l: humerus_l (0.02417135 0.001963926 0.005217608)
      PathWrap: wrap_object=inf_sup_sub_l
    Thelen2003Muscle subscap_4_l: max_isometric_force=274 optimal_fiber_length=0.07444094
        tendon_slack_length=0.05503027 pennation_angle_at_optimal=0.08726646
      PathPoint subscap_4-P1_l: scapula_l (-0.08271726 -0.05051943 0.07276026)
      PathPoint subscap_4-P2_l: humerus_l (0.02397848 0.003320304 0.005766998)
      PathWrap: wrap_object=inf_sup_sub_l
    Thelen2003Muscle subscap_5_l: max_isometric_force=114 optimal_fiber_length=0.07931489
        tendon_slack_length=0.06568109 pennation_angle_at_optimal=0
      PathPoint subscap_5-P1_l: scapula_l (-0.08033484 -0.06238006 0.0674546)
      PathPoint subscap_5-P2_l: humerus_l (0.02370726 0.005273052 0.002159839)
      PathWrap: wrap_object=inf_sup_sub_l
    Thelen2003Muscle subscap_6_l: max_isometric_force=149 optimal_fiber_length=0.07659086
        tendon_slack_length=0.07739496 pennation_angle_at_optimal=0
      PathPoint subscap_6-P1_l: scapula_l (-0.0967355 -0.08434556 0.07986466)
      PathPoint subscap_6-P2_l: humerus_l (0.02682624 -0.0004043816 0.004483247)
      PathWrap: wrap_object=inf_sup_sub_l
    Thelen2003Muscle subscap_7_l: max_isometric_force=162 optimal_fiber_length=0.08271186
        tendon_slack_length=0.07968582 pennation_angle_at_optimal=0
      PathPoint subscap_7-P1_l: scapula_l (-0.09267624 -0.09695646 0.07194412)
      PathPoint subscap_7-P2_l: humerus_l (0.02556961 -0.001688133 0.008289298)
      PathWrap: wrap_object=inf_sup_sub_l
    Thelen2003Muscle subscap_8_l: max_isometric_force=61 optimal_fiber_length=0.07647928 tendon_slack_length=0.03998917
        pennation_angle_at_optimal=0
      PathPoint subscap_8-P1_l: scapula_l (-0.07149291 -0.07506411 0.05301903)
      PathPoint subscap_8-P2_l: humerus_l (0.02556961 -0.001688133 0.008289298)
      PathWrap: wrap_object=inf_sup_sub_l
    Thelen2003Muscle subscap_9_l: max_isometric_force=222 optimal_fiber_length=0.07294959
        tendon_slack_length=0.05969523 pennation_angle_at_optimal=0
      PathPoint subscap_9-P1_l: scapula_l (-0.08427707 -0.09433434 0.05657923)
      PathPoint subscap_9-P2_l: humerus_l (0.02255912 -0.005855803 0.01202302)
      PathWrap: wrap_object=inf_sup_sub_l
    Thelen2003Muscle subscap10_l: max_isometric_force=47 optimal_fiber_length=0.06820975 tendon_slack_length=0.0100902
        pennation_angle_at_optimal=0
      PathPoint subscap10-P1_l: scapula_l (-0.06245692 -0.06622545 0.03453635)
      PathPoint subscap10-P2_l: humerus_l (0.01553465 -0.01787967 0.01278243)
      PathWrap: wrap_object=inf_sup_sub_l
    Thelen2003Muscle subscap11_l: max_isometric_force=16 optimal_fiber_length=0.06365347
        tendon_slack_length=0.009899452 pennation_angle_at_optimal=0
      PathPoint subscap11-P1_l: scapula_l (-0.04693114 -0.05882661 0.02472208)
      PathPoint subscap11-P2_l: humerus_l (0.01075223 -0.02314124 0.01488886)
      PathWrap: wrap_object=inf_sup_sub_l
    Thelen2003Muscle pect_min_1: max_isometric_force=47 optimal_fiber_length=0.06283537 tendon_slack_length=0.04189025
        pennation_angle_at_optimal=0
      PathPoint P1: torso (0.05921927 0.3052585 0.063061)
      PathPoint P2: scapula_r (-0.003578161 -0.02680028 -0.04596671)
    Thelen2003Muscle pect_min_2: max_isometric_force=107 optimal_fiber_length=0.09652469 tendon_slack_length=0.03644118
        pennation_angle_at_optimal=0
      PathPoint P1: torso (0.06855808 0.2775147 0.07427671)
      PathPoint P2: scapula_r (-0.003578161 -0.02680028 -0.04596671)
    Thelen2003Muscle pect_min_3: max_isometric_force=107 optimal_fiber_length=0.09786522 tendon_slack_length=0.02640085
        pennation_angle_at_optimal=0
      PathPoint P1: torso (0.05646371 0.2787528 0.09918499)
      PathPoint P2: scapula_r (0.002893405 -0.0303904 -0.04164433)
    Thelen2003Muscle pect_min_4: max_isometric_force=46 optimal_fiber_length=0.125771 tendon_slack_length=0.02367882
        pennation_angle_at_optimal=0
      PathPoint P1: torso (0.05895057 0.255418 0.1019739)
      PathPoint P2: scapula_r (0.01022661 -0.03717455 -0.033005)
    Thelen2003Muscle pect_maj_t_1: max_isometric_force=125 optimal_fiber_length=0.1708811
        tendon_slack_length=0.03265245 pennation_angle_at_optimal=0
      PathPoint P1: torso (0.09863877 0.2136182 0.06322607)
      PathPoint P3: torso (0.08158399 0.2397321 0.0943971)
      PathPoint P2: humerus_r (0.02165808 -0.04997248 -0.001295202)
      PathWrap: wrap_object=ter_lat_pec
      PathWrap pathwrap-1: wrap_object=Chest_pect
    Thelen2003Muscle pect_maj_t_2: max_isometric_force=118 optimal_fiber_length=0.1631647
        tendon_slack_length=0.03833926 pennation_angle_at_optimal=0
      PathPoint P1: torso (0.09076433 0.238825 0.04432195)
      PathPoint P3: torso (0.0791186 0.2532325 0.08527916)
      PathPoint P2: humerus_r (0.02186025 -0.05469002 0.0003929938)
      PathWrap: wrap_object=ter_lat_pec
      PathWrap pathwrap-1: wrap_object=Chest_pect
    Thelen2003Muscle pect_maj_t_3: max_isometric_force=165 optimal_fiber_length=0.1661269
        tendon_slack_length=0.04751607 pennation_angle_at_optimal=0
      PathPoint P1: torso (0.08646082 0.2505816 0.01540236)
      PathPoint P3: torso (0.07619735 0.2684256 0.08254648)
      PathPoint P2: humerus_r (0.02064215 -0.05956633 0.0009118087)
      PathWrap: wrap_object=ter_lat_pec
      PathWrap pathwrap-1: wrap_object=Chest_pect
    Thelen2003Muscle pect_maj_t_4: max_isometric_force=157 optimal_fiber_length=0.1620746
        tendon_slack_length=0.02475771 pennation_angle_at_optimal=0
      PathPoint P1: torso (0.07722303 0.2738978 0.01621588)
      PathPoint P3: torso (0.07245016 0.2865464 0.07272572)
      PathPoint P2: humerus_r (0.02189138 -0.05107368 -0.0005859544)
      PathWrap: wrap_object=ter_lat_pec
      PathWrap pathwrap-1: wrap_object=Chest_pect
    Thelen2003Muscle pect_maj_t_5: max_isometric_force=133 optimal_fiber_length=0.1314182
        tendon_slack_length=0.02277916 pennation_angle_at_optimal=0
      PathPoint P1: torso (0.06129508 0.330893 0.01243292)
      PathPoint P3: torso (0.0597191 0.3271812 0.05984755)
      PathPoint P2: humerus_r (0.02255598 -0.04048191 -0.002487361)
      PathWrap: wrap_object=ter_lat_pec
      PathWrap pathwrap-1: wrap_object=Chest_pect
    Thelen2003Muscle pect_maj_t_6: max_isometric_force=198 optimal_fiber_length=0.1275067
        tendon_slack_length=0.03167869 pennation_angle_at_optimal=0
      PathPoint P1: torso (0.04697374 0.3490332 0.02182214)
      PathPoint P3: torso (0.05349506 0.3415648 0.05488554)
      PathPoint P2: humerus_r (0.02189138 -0.05107368 -0.0005859544)
      PathWrap: wrap_object=ter_lat_pec
      PathWrap pathwrap-1: wrap_object=Chest_pect
    Thelen2003Muscle pect_maj_c_1: max_isometric_force=179 optimal_fiber_length=0.1233998
        tendon_slack_length=0.01539102 pennation_angle_at_optimal=0
      PathPoint P1: clavicle_r (0.01395764 -0.004819863 0.0266091)
      PathPoint P3: clavicle_r (-0.004822673 0.02040462 0.04890291)
      PathPoint P2: humerus_r (0.02080178 -0.07384835 0.002226489)
      PathWrap: wrap_object=ter_lat_pec
      PathWrap pathwrap-1: wrap_object=Chest_pect
    Thelen2003Muscle pect_maj_c_2: max_isometric_force=113 optimal_fiber_length=0.09959537
        tendon_slack_length=0.01278034 pennation_angle_at_optimal=0
      PathPoint P1: clavicle_r (0.005913463 -0.007519718 0.05180197)
      PathPoint P3: clavicle_r (-0.004880403 0.0194283 0.05913527)
      PathPoint P2: humerus_r (0.02080178 -0.06581743 0.002226489)
      PathWrap: wrap_object=ter_lat_pec
      PathWrap pathwrap-1: wrap_object=Chest_pect
    Thelen2003Muscle pect_min_1_l: max_isometric_force=47 optimal_fiber_length=0.06283537
        tendon_slack_length=0.04189025 pennation_angle_at_optimal=0
      PathPoint pect_min_1-P1_l: torso (0.05921927 0.3052585 -0.063061)
      PathPoint pect_min_1-P2: scapula_l (-0.003578161 -0.02680028 0.04596671)
    Thelen2003Muscle pect_min_2_l: max_isometric_force=107 optimal_fiber_length=0.09652469
        tendon_slack_length=0.03644118 pennation_angle_at_optimal=0
      PathPoint pect_min_2-P1_l: torso (0.06855808 0.2775147 -0.07427671)
      PathPoint pect_min_2-P2_l: scapula_l (-0.003578161 -0.02680028 0.04596671)
    Thelen2003Muscle pect_min_3_l: max_isometric_force=107 optimal_fiber_length=0.09786522
        tendon_slack_length=0.02640085 pennation_angle_at_optimal=0
      PathPoint pect_min_3-P1_l: torso (0.05646371 0.2787528 -0.09918499)
      PathPoint pect_min_3-P2_l: scapula_l (0.002893405 -0.0303904 0.04164433)
    Thelen2003Muscle pect_min_4_l: max_isometric_force=46 optimal_fiber_length=0.125771 tendon_slack_length=0.02367882
        pennation_angle_at_optimal=0
      PathPoint pect_min_4-P1_l: torso (0.05895057 0.255418 -0.1019739)
      PathPoint pect_min_4-P2_l: scapula_l (0.01022661 -0.03717455 0.033005)
    Thelen2003Muscle pect_maj_t_1_l: max_isometric_force=125 optimal_fiber_length=0.1725562
        tendon_slack_length=0.03297252 pennation_angle_at_optimal=0
      PathPoint pect_maj_t_1-P1_l: torso (0.09863877 0.2136182 -0.06322607)
      PathPoint pect_maj_t_1-P3_l: torso (0.08158399 0.2397321 -0.0943971)
      PathPoint pect_maj_t_1-P2_l: humerus_l (0.0209811 -0.04841048 0.001254717)
      PathWrap: wrap_object=ter_lat_pec_l
      PathWrap pathwrap-1: wrap_object=Chest_pect
    Thelen2003Muscle pect_maj_t_2_l: max_isometric_force=118 optimal_fiber_length=0.164567
        tendon_slack_length=0.03866874 pennation_angle_at_optimal=0
      PathPoint pect_maj_t_2-P1_l: torso (0.09076433 0.238825 -0.04432195)
      PathPoint pect_maj_t_2-P3_l: torso (0.0791186 0.2532325 -0.08527916)
      PathPoint pect_maj_t_2-P2: humerus_l (0.02117695 -0.05298055 -0.0003807099)
      PathWrap: wrap_object=ter_lat_pec_l
      PathWrap pathwrap-1: wrap_object=Chest_pect
    Thelen2003Muscle pect_maj_t_3_l: max_isometric_force=165 optimal_fiber_length=0.1670239
        tendon_slack_length=0.04777261 pennation_angle_at_optimal=0
      PathPoint pect_maj_t_3-P1_l: torso (0.08646082 0.2505816 -0.01540236)
      PathPoint pect_maj_t_3-P3_l: torso (0.07619735 0.2684256 -0.08254648)
      PathPoint pect_maj_t_3-P2_l: humerus_l (0.01999693 -0.05770444 -0.0008833079)
      PathWrap: wrap_object=ter_lat_pec_l
      PathWrap pathwrap-1: wrap_object=Chest_pect
    Thelen2003Muscle pect_maj_t_4_l: max_isometric_force=157 optimal_fiber_length=0.1627622
        tendon_slack_length=0.02486275 pennation_angle_at_optimal=0
      PathPoint pect_maj_t_4-P1_l: torso (0.07722303 0.2738978 -0.01621588)
      PathPoint pect_maj_t_4-P3_l: torso (0.07245016 0.2865464 -0.07272572)
      PathPoint pect_maj_t_4-P2_l: humerus_l (0.02120712 -0.04947726 0.000567639)
      PathWrap: wrap_object=ter_lat_pec_l
      PathWrap pathwrap-1: wrap_object=Chest_pect
    Thelen2003Muscle pect_maj_t_5_l: max_isometric_force=133 optimal_fiber_length=0.1315186
        tendon_slack_length=0.02279655 pennation_angle_at_optimal=0
      PathPoint pect_maj_t_5-P1_l: torso (0.06129508 0.330893 -0.01243292)
      PathPoint pect_maj_t_5-P3_l: torso (0.0597191 0.3271812 -0.05984755)
      PathPoint pect_maj_t_5-P2_l: humerus_l (0.02185094 -0.03921655 0.002409613)
      PathWrap: wrap_object=ter_lat_pec_l
      PathWrap pathwrap-1: wrap_object=Chest_pect
    Thelen2003Muscle pect_maj_t_6_l: max_isometric_force=198 optimal_fiber_length=0.1271018
        tendon_slack_length=0.03157808 pennation_angle_at_optimal=0
      PathPoint pect_maj_t_6-P1_l: torso (0.04697374 0.3490332 -0.02182214)
      PathPoint pect_maj_t_6-P3_l: torso (0.05349506 0.3415648 -0.05488554)
      PathPoint pect_maj_t_6-P2_l: humerus_l (0.02120712 -0.04947726 0.000567639)
      PathWrap: wrap_object=ter_lat_pec_l
      PathWrap pathwrap-1: wrap_object=Chest_pect
    Thelen2003Muscle pect_maj_c_1_l: max_isometric_force=179 optimal_fiber_length=0.1220496
        tendon_slack_length=0.01522262 pennation_angle_at_optimal=0
      PathPoint pect_maj_c_1-P1_l: clavicle_l (0.01395764 -0.004819863 -0.0266091)
      PathPoint pect_maj_c_1-P3_l: clavicle_l (-0.004822673 0.02040462 -0.04890291)
      PathPoint pect_maj_c_1-P2: humerus_l (0.02015157 -0.07154005 -0.002156894)
      PathWrap: wrap_object=ter_lat_pec_l
      PathWrap pathwrap-1: wrap_object=Chest_pect
    Thelen2003Muscle pect_maj_c_2_l: max_isometric_force=113 optimal_fiber_length=0.0984769
        tendon_slack_length=0.01263682 pennation_angle_at_optimal=0
      PathPoint pect_maj_c_2-P1_l: clavicle_l (0.005913463 -0.007519718 -0.05180197)
      PathPoint pect_maj_c_2-P3_l: clavicle_l (-0.004880403 0.0194283 -0.05913527)
      PathPoint pect_maj_c_2-P2_l: humerus_l (0.02015157 -0.06376015 -0.002156894)
      PathWrap: wrap_object=ter_lat_pec_l
      PathWrap pathwrap-1: wrap_object=Chest_pect
    Thelen2003Muscle rect_abd_r: max_isometric_force=163 optimal_fiber_length=0.218485 tendon_slack_length=0.01659627
        pennation_angle_at_optimal=0 FmaxTendonStrain=0.033 FmaxMuscleStrain=0.6 KshapeActive=0.5 KshapePassive=4
        Af=0.3 Flen=1.8 activation_time_constant=0.01 [seconds] deactivation_time_constant=0.04 [seconds]
      PathPoint P1: pelvis (-0.02599799 -0.0699946 0.01099915)
      PathPoint P2: torso (0.09038264 0.2180796 0.03045502)
    Thelen2003Muscle rect_abd_l: max_isometric_force=163 optimal_fiber_length=0.218485 tendon_slack_length=0.01659627
        pennation_angle_at_optimal=0 FmaxTendonStrain=0.033 FmaxMuscleStrain=0.6 KshapeActive=0.5 KshapePassive=4
        Af=0.3 Flen=1.8 activation_time_constant=0.01 deactivation_time_constant=0.04
      PathPoint rect_abd_r-P1_l: pelvis (-0.02599799 -0.0699946 -0.01099915)
      PathPoint rect_abd_r-P2_l: torso (0.09038264 0.2180796 -0.03045502)
    Thelen2003Muscle LD_L1_r: max_isometric_force=41.4 optimal_fiber_length=0.3194486 tendon_slack_length=0.06997451
        pennation_angle_at_optimal=0
      PathPoint P1: lumbar1 (-0.03900555 -0.01126827 0.003754622)
      PathPoint P2: humerus_r (-0.008853803 -0.01423403 0.002509177)
      PathWrap: wrap_object=Chest_r method=hybrid
    Thelen2003Muscle LD_L2_r: max_isometric_force=41.4 optimal_fiber_length=0.3379976 tendon_slack_length=0.0740376
        pennation_angle_at_optimal=0
      PathPoint P1: lumbar2 (-0.03727197 -0.01162781 0.003593573)
      PathPoint P2: humerus_r (-0.008856258 -0.0142316 0.002510362)
      PathWrap: wrap_object=Chest_r method=hybrid
    Thelen2003Muscle LD_L3_r: max_isometric_force=50.6 optimal_fiber_length=0.3486367 tendon_slack_length=0.0763679
        pennation_angle_at_optimal=0
      PathPoint P1: lumbar3 (-0.03987234 -0.00346716 0.003345558)
      PathPoint P2: humerus_r (-0.008856258 -0.0142316 0.004040843)
      PathWrap: wrap_object=Chest_r method=hybrid
    Thelen2003Muscle LD_L4_r: max_isometric_force=50.6 optimal_fiber_length=0.3618094 tendon_slack_length=0.07925347
        pennation_angle_at_optimal=0
      PathPoint P1: lumbar4 (-0.03900555 0.00433395 0.004006979)
      PathPoint P2: humerus_r (-0.008856258 -0.0142316 0.002510362)
      PathWrap: wrap_object=Chest_r method=hybrid
    Thelen2003Muscle LD_L5_r: max_isometric_force=50.6 optimal_fiber_length=0.3775281 tendon_slack_length=0.07752829
        pennation_angle_at_optimal=0
      PathPoint P1: lumbar5 (-0.03120444 0.01820259 0.00356314)
      PathPoint P2: humerus_r (-0.008856258 -0.0142316 0.002510362)
      PathWrap: wrap_object=Chest_r method=hybrid
    Thelen2003Muscle LD_T12_r: max_isometric_force=23 optimal_fiber_length=0.2884751 tendon_slack_length=0.05924041
        pennation_angle_at_optimal=0
      PathPoint P1: humerus_r (-0.008856258 -0.0142316 0.002510362)
      PathPoint P2: torso (-0.05108584 0.1002068 0.00428679)
      PathWrap: wrap_object=Chest_r method=hybrid range=(1 2)
    Thelen2003Muscle LD_T11_r: max_isometric_force=27.6 optimal_fiber_length=0.2697014 tendon_slack_length=0.0553847
        pennation_angle_at_optimal=0
      PathPoint P1: humerus_r (-0.008856258 -0.0142316 0.002510362)
      PathPoint P2: torso (-0.06201173 0.128697 0.00294726)
      PathWrap: wrap_object=Chest_r method=hybrid
    Thelen2003Muscle LD_T10_r: max_isometric_force=27.6 optimal_fiber_length=0.2632523 tendon_slack_length=0.04118919
        pennation_angle_at_optimal=0
      PathPoint P1: humerus_r (-0.008856258 -0.0142316 0.002510362)
      PathPoint P2: torso (-0.06778698 0.1552224 0.00376258)
      PathWrap: wrap_object=Chest_r method=hybrid
    Thelen2003Muscle LD_T9_r: max_isometric_force=18.4 optimal_fiber_length=0.2394474 tendon_slack_length=0.130455
        pennation_angle_at_optimal=0
      PathPoint P1: humerus_r (-0.008856258 -0.0142316 0.002510362)
      PathPoint P2: torso (-0.07761118 0.1905895 0.004004825)
      PathWrap: wrap_object=Chest_r method=hybrid
    Thelen2003Muscle LD_T8_r: max_isometric_force=18.4 optimal_fiber_length=0.2152532 tendon_slack_length=0.04420378
        pennation_angle_at_optimal=0
      PathPoint P1: humerus_r (-0.008856258 -0.0142316 0.002510362)
      PathPoint P2: torso (-0.07957602 0.2112203 0.004200278)
      PathWrap: wrap_object=Chest_r method=hybrid
    Thelen2003Muscle LD_T7_r: max_isometric_force=18.4 optimal_fiber_length=0.2057365 tendon_slack_length=0.04224954
        pennation_angle_at_optimal=0
      PathPoint P1: humerus_r (-0.008856258 -0.0142316 0.002510362)
      PathPoint P2: torso (-0.0884178 0.2308687 0.004001927)
      PathWrap: wrap_object=Chest_r method=hybrid
    Thelen2003Muscle LD_R12_r: max_isometric_force=18.4 optimal_fiber_length=0.2284434 tendon_slack_length=0.04691251
        pennation_angle_at_optimal=0
      PathPoint P1: humerus_r (-0.008856258 -0.0142316 0.002510362)
      PathPoint P2: torso (-0.0442089 0.1194416 0.043488)
    Thelen2003Muscle LD_R11_r: max_isometric_force=27.6 optimal_fiber_length=0.2277991 tendon_slack_length=0.04678012
        pennation_angle_at_optimal=0
      PathPoint P1: humerus_r (-0.008856258 -0.0142316 0.004040843)
      PathPoint P2: torso (-0.06680456 0.1375388 0.06189246)
      PathWrap: wrap_object=Chest_r method=hybrid
    Thelen2003Muscle LD_Il_r: max_isometric_force=32.2 optimal_fiber_length=0.4115138 tendon_slack_length=0.01779102
        pennation_angle_at_optimal=0
      PathPoint P1: pelvis (-0.1138632 0.07412488 0.05381515)
      PathPoint P2: humerus_r (-0.008856258 -0.0142316 0.002510362)
      PathWrap: wrap_object=Chest_r method=hybrid
    Thelen2003Muscle Ps_L1_VB_r: max_isometric_force=160.4797 optimal_fiber_length=0.1727803
        tendon_slack_length=0.0607218 pennation_angle_at_optimal=0.18675
      PathPoint P1: lumbar1 (-0.008806153 0.0201702 0.0173358)
      PathPoint P2: pelvis (-0.02379816 -0.0569956 0.07589415)
      ConditionalPathPoint P3: pelvis (-0.02879778 -0.08049379 0.08159371)
          socket_coordinate=/jointset/hip_r/hip_flexion_r range=(-1.5708 0.785398)
      PathPoint P4: femur_r (0.001468048 -0.04651877 0.003486614)
      PathPoint P5: femur_r (-0.01724956 -0.05477654 0.009542312)
    Thelen2003Muscle Ps_L1_TP_r: max_isometric_force=46.32404 optimal_fiber_length=0.1708298
        tendon_slack_length=0.06004414 pennation_angle_at_optimal=0.18675
      PathPoint P1: lumbar1 (-0.02015287 0.01270575 0.0196113)
      PathPoint P2: pelvis (-0.02379816 -0.0569956 0.07589415)
      ConditionalPathPoint P3: pelvis (-0.02879778 -0.08049379 0.08159371)
          socket_coordinate=/jointset/hip_r/hip_flexion_r range=(-1.5708 0.785398)
      PathPoint P4: femur_r (0.001468048 -0.04651877 0.003486614)
      PathPoint P5: femur_r (-0.01724956 -0.05477654 0.009542312)
    Thelen2003Muscle Ps_L1_L2_IVD_r: max_isometric_force=91.32454 optimal_fiber_length=0.1565138
        tendon_slack_length=0.05496841 pennation_angle_at_optimal=0.1867502
      PathPoint P1: lumbar1 (-0.001086625 0.003040682 0.01792816)
      PathPoint P2: pelvis (-0.02379816 -0.0569956 0.07589415)
      ConditionalPathPoint P3: pelvis (-0.02879778 -0.08049379 0.08159371)
          socket_coordinate=/jointset/hip_r/hip_flexion_r range=(-1.5708 0.785398)
      PathPoint P4: femur_r (0.001468048 -0.04651877 0.003486614)
      PathPoint P5: femur_r (-0.01724956 -0.05477654 0.009542312)
    Thelen2003Muscle Ps_L2_TP_r: max_isometric_force=160.4797 optimal_fiber_length=0.1511581
        tendon_slack_length=0.05309938 pennation_angle_at_optimal=0.1867502
      PathPoint P1: lumbar2 (-0.01874121 0.01264387 0.01928521)
      PathPoint P2: pelvis (-0.02379816 -0.0569956 0.07589415)
      ConditionalPathPoint P3: pelvis (-0.02879778 -0.08049379 0.08159371)
          socket_coordinate=/jointset/hip_r/hip_flexion_r range=(-1.5708 0.785398)
      PathPoint P4: femur_r (0.001468048 -0.04651877 0.003486614)
      PathPoint P5: femur_r (-0.01724956 -0.05477654 0.009542312)
    Thelen2003Muscle Ps_L2_L3_IVD_r: max_isometric_force=90.5635 optimal_fiber_length=0.1368311
        tendon_slack_length=0.04808091 pennation_angle_at_optimal=0.1867502
      PathPoint P1: lumbar2 (0.001701093 0.002934249 0.01859083)
      PathPoint P2: pelvis (-0.02379816 -0.0569956 0.07589415)
      ConditionalPathPoint P3: pelvis (-0.02879778 -0.08049379 0.08159371)
          socket_coordinate=/jointset/hip_r/hip_flexion_r range=(-1.5708 0.785398)
      PathPoint P4: femur_r (0.001468048 -0.04651877 0.003486614)
      PathPoint P5: femur_r (-0.01724956 -0.05477654 0.009542312)
    Thelen2003Muscle Ps_L3_TP_r: max_isometric_force=76.86482 optimal_fiber_length=0.132992
        tendon_slack_length=0.04674756 pennation_angle_at_optimal=0.1867502
      PathPoint P1: lumbar3 (-0.02124199 0.01796708 0.0244954)
      PathPoint P2: pelvis (-0.02379816 -0.0569956 0.07589415)
      ConditionalPathPoint P3: pelvis (-0.02879778 -0.08049379 0.08159371)
          socket_coordinate=/jointset/hip_r/hip_flexion_r range=(-1.5708 0.785398)
      PathPoint P4: femur_r (0.001468048 -0.04651877 0.003486614)
      PathPoint P5: femur_r (-0.01724956 -0.05477654 0.009542312)
    Thelen2003Muscle Ps_L3_L4_IVD_r: max_isometric_force=27.39736 optimal_fiber_length=0.1185449
        tendon_slack_length=0.04165868 pennation_angle_at_optimal=0.1867502
      PathPoint P1: lumbar3 (0.0009984814 0.005383312 0.01833547)
      PathPoint P2: pelvis (-0.02379816 -0.0569956 0.07589415)
      ConditionalPathPoint P3: pelvis (-0.02879778 -0.08049379 0.08159371)
          socket_coordinate=/jointset/hip_r/hip_flexion_r range=(-1.5708 0.785398)
      PathPoint P4: femur_r (0.001468048 -0.04651877 0.003486614)
      PathPoint P5: femur_r (-0.01724956 -0.05477654 0.009542312)
    Thelen2003Muscle Ps_L4_TP_r: max_isometric_force=122.4278 optimal_fiber_length=0.1151438
        tendon_slack_length=0.04046894 pennation_angle_at_optimal=0.1867502
      PathPoint P1: lumbar4 (-0.0135644 0.02162329 0.02242975)
      PathPoint P2: pelvis (-0.02379816 -0.0569956 0.07589415)
      ConditionalPathPoint P3: pelvis (-0.02879778 -0.08049379 0.08159371)
          socket_coordinate=/jointset/hip_r/hip_flexion_r range=(-1.5708 0.785398)
      PathPoint P4: femur_r (0.001468048 -0.04651877 0.003486614)
      PathPoint P5: femur_r (-0.01724956 -0.05477654 0.009542312)
    Thelen2003Muscle Ps_L4_L5_IVD_r: max_isometric_force=60.12199 optimal_fiber_length=0.09709394
        tendon_slack_length=0.03414827 pennation_angle_at_optimal=0.1867502
      PathPoint P1: lumbar4 (0.004697681 0.003421688 0.01785293)
      PathPoint P2: pelvis (-0.02379816 -0.0569956 0.07589415)
      ConditionalPathPoint P3: pelvis (-0.02879778 -0.08049379 0.08159371)
          socket_coordinate=/jointset/hip_r/hip_flexion_r range=(-1.5708 0.785398)
      PathPoint P4: femur_r (0.001468048 -0.04651877 0.003486614)
      PathPoint P5: femur_r (-0.01724956 -0.05477654 0.009542312)
    Thelen2003Muscle Ps_L5_TP_r: max_isometric_force=131.6595 optimal_fiber_length=0.1006624
        tendon_slack_length=0.03533892 pennation_angle_at_optimal=0.1867502
      PathPoint P1: lumbar5 (-0.004871368 0.02525809 0.02191947)
      PathPoint P2: pelvis (-0.02379816 -0.0569956 0.07589415)
      ConditionalPathPoint P3: pelvis (-0.02879778 -0.08049379 0.08159371)
          socket_coordinate=/jointset/hip_r/hip_flexion_r range=(-1.5708 0.785398)
      PathPoint P4: femur_r (0.001468048 -0.04651877 0.003486614)
      PathPoint P5: femur_r (-0.01724956 -0.05477654 0.009542312)
    Thelen2003Muscle Ps_L5_VB_r: max_isometric_force=145.3582 optimal_fiber_length=0.08869394
        tendon_slack_length=0.03113619 pennation_angle_at_optimal=0.1867502
      PathPoint P1: lumbar5 (0.0086679 0.01075686 0.01646901)
      PathPoint P2: pelvis (-0.02379816 -0.0569956 0.07589415)
      ConditionalPathPoint P3: pelvis (-0.02879778 -0.08049379 0.08159371)
          socket_coordinate=/jointset/hip_r/hip_flexion_r range=(-1.5708 0.785398)
      PathPoint P4: femur_r (0.001468048 -0.04651877 0.003486614)
      PathPoint P5: femur_r (-0.01724956 -0.05477654 0.009542312)
    Thelen2003Muscle QL_post_I_1-L3_r: max_isometric_force=18.2 optimal_fiber_length=0.03404295
        tendon_slack_length=0.02856185 pennation_angle_at_optimal=0.1291544
      PathPoint I_1_r-P1: pelvis (-0.1119914 0.07699406 0.05899545)
      PathPoint L3_TP_r-P2: lumbar3 (-0.02513691 0.01701509 0.02626374)
    Thelen2003Muscle QL_post_I_2-L4_r: max_isometric_force=24.2 optimal_fiber_length=0.0215284
        tendon_slack_length=0.01806221 pennation_angle_at_optimal=0.1291544
      PathPoint I_2_r-P1: pelvis (-0.1059918 0.08099375 0.06299514)
      PathPoint L4_TP_r-P2: lumbar4 (-0.01906938 0.02257988 0.02626374)
    Thelen2003Muscle QL_post_I_2-L3_r: max_isometric_force=14.1 optimal_fiber_length=0.04481692
        tendon_slack_length=0.03760115 pennation_angle_at_optimal=0.1291544
      PathPoint I_2_r-P1: pelvis (-0.1059918 0.08099375 0.06299514)
      PathPoint L3_TP_r-P2: lumbar3 (-0.02513691 0.01701509 0.02626374)
    Thelen2003Muscle QL_post_I_2-L2_r: max_isometric_force=8.8 optimal_fiber_length=0.03012929
        tendon_slack_length=0.01654421 pennation_angle_at_optimal=0.1291544
      PathPoint I_2_r-P1: pelvis (-0.1059918 0.08099375 0.06299514)
      PathPoint L2_TP_r-P2: lumbar2 (-0.02687049 0.01040148 0.02626374)
    Thelen2003Muscle QL_post_I_3-L1_r: max_isometric_force=12.92 optimal_fiber_length=0.07303307
        tendon_slack_length=0.03793398 pennation_angle_at_optimal=0.1291544
      PathPoint L1_TP-P1: lumbar1 (-0.02773728 0.01213506 0.02773728)
      PathPoint I_3_r-P1: pelvis (-0.09799244 0.08899313 0.06599491)
    Thelen2003Muscle QL_post_I_3-L2_r: max_isometric_force=13.6 optimal_fiber_length=0.04361707
        tendon_slack_length=0.03659449 pennation_angle_at_optimal=0.1291544
      PathPoint L2_TP_r-P2: lumbar2 (-0.02687049 0.01040148 0.02626374)
      PathPoint I_3_r-P1: pelvis (-0.09799244 0.08899313 0.06599491)
    Thelen2003Muscle QL_post_I_3-L3_r: max_isometric_force=23.2 optimal_fiber_length=0.03242111
        tendon_slack_length=0.02720111 pennation_angle_at_optimal=0.1291544
      PathPoint L3_TP_r-P2: lumbar3 (-0.02513691 0.01701509 0.02626374)
      PathPoint I_3_r-P1: pelvis (-0.09799244 0.08899313 0.06599491)
    Thelen2003Muscle QL_mid_L3-12_3_r: max_isometric_force=5.8 optimal_fiber_length=0.05850624
        tendon_slack_length=0.03038863 pennation_angle_at_optimal=0.1291544
      PathPoint quadratus_lumb_mid_L3_1_r-P1: torso (-0.0411747 0.1103945 0.05075182)
      PathPoint quadratus_lumb_mid_L3_1_r-P2: lumbar3 (-0.02545034 0.01883595 0.02633308)
    Thelen2003Muscle QL_mid_L3-12_2_r: max_isometric_force=6.6 optimal_fiber_length=0.06156922
        tendon_slack_length=0.03197956 pennation_angle_at_optimal=0.1291544
      PathPoint quadratus_lumb_mid_L3_2_r-P2: torso (-0.04173143 0.1171261 0.04243072)
      PathPoint quadratus_lumb_mid_L3_2_r-P3: lumbar3 (-0.02544895 0.01883535 0.02633308)
    Thelen2003Muscle QL_mid_L3-12_1_r: max_isometric_force=11 optimal_fiber_length=0.06628828
        tendon_slack_length=0.03443068 pennation_angle_at_optimal=0.1291544
      PathPoint quadratus_lumb_mid_L3_3_r-P2: torso (-0.04055872 0.1259462 0.03064168)
      PathPoint quadratus_lumb_mid_L3_3_r-P3: lumbar3 (-0.02544895 0.01883535 0.02633308)
    Thelen2003Muscle QL_mid_L2-12_1_r: max_isometric_force=9.2 optimal_fiber_length=0.04717456
        tendon_slack_length=0.02450286 pennation_angle_at_optimal=0.1291544
      PathPoint QL_mid_L2-12_1_l-P1: torso (-0.0405543 0.1259462 0.03064168)
      PathPoint QL_mid_L2-12_1_l-P1_0: lumbar2 (-0.02524214 0.0146452 0.02220716)
    Thelen2003Muscle QL_mid_L4-12_3_r: max_isometric_force=5.4 optimal_fiber_length=0.07422428
        tendon_slack_length=0.0385527 pennation_angle_at_optimal=0.1291544
      PathPoint quadratus_lumb_mid_L4_1_r-P1: torso (-0.04104796 0.1103415 0.05076164)
      PathPoint quadratus_lumb_mid_L4_1_r-P2: lumbar4 (-0.01853414 0.02661045 0.02432213)
    Thelen2003Muscle QL_ant_I_2-T12_r: max_isometric_force=7.1 optimal_fiber_length=0.09957188
        tendon_slack_length=0.05171786 pennation_angle_at_optimal=0.1291544
      PathPoint I_2_r-P1: pelvis (-0.1059918 0.08099375 0.06299514)
      PathPoint T12_r-P2: torso (-0.01395115 0.1277146 0.0196484)
    Thelen2003Muscle QL_ant_I_3-T12_r: max_isometric_force=13.34 optimal_fiber_length=0.09829576
        tendon_slack_length=0.05105563 pennation_angle_at_optimal=0.1291544
      PathPoint I_3_r-P1: pelvis (-0.09799244 0.08899313 0.06599491)
      PathPoint T12_r-P2: torso (-0.0098242 0.128697 0.01866598)
    Thelen2003Muscle QL_ant_I_2-12_1_r: max_isometric_force=4.7 optimal_fiber_length=0.09453043
        tendon_slack_length=0.04909988 pennation_angle_at_optimal=0.1291544
      PathPoint I_2_r-P2: pelvis (-0.1059918 0.08099375 0.06299514)
      PathPoint 12.1_r-P3: torso (-0.04027922 0.1159256 0.04224406)
    Thelen2003Muscle QL_ant_I_3-12_1_r: max_isometric_force=8.9 optimal_fiber_length=0.09344975
        tendon_slack_length=0.04853857 pennation_angle_at_optimal=0.1291544
      PathPoint I_3_r-P1: pelvis (-0.09799244 0.08899313 0.06599491)
      PathPoint 12.1_r-P2: torso (-0.03957257 0.122214 0.03679163)
    Thelen2003Muscle QL_ant_I_3-12_2_r: max_isometric_force=5.9 optimal_fiber_length=0.08767841
        tendon_slack_length=0.04554089 pennation_angle_at_optimal=0.1291544
      PathPoint I_3_r-P1: pelvis (-0.09799244 0.08899313 0.06599491)
      PathPoint 12.2_r-P2: torso (-0.03953258 0.115788 0.04526991)
    Thelen2003Muscle QL_ant_I_3-12_3_r: max_isometric_force=6.8 optimal_fiber_length=0.08177919
        tendon_slack_length=0.04243329 pennation_angle_at_optimal=0.1291544
      PathPoint I_3_r-P2: pelvis (-0.09799244 0.08899313 0.06599491)
      PathPoint 12.3_r-P3: torso (-0.03734178 0.1094013 0.05356154)
    Thelen2003Muscle MF_m1s_r: max_isometric_force=18.4 optimal_fiber_length=0.04060594 tendon_slack_length=0.01688196
        pennation_angle_at_optimal=0
      PathPoint P1: lumbar4 (-0.02860407 0.02807975 0.01514664)
      PathPoint P2: lumbar1 (-0.03207123 -0.01126827 0.00260037)
    Thelen2003Muscle MF_m1t_1_r: max_isometric_force=19.32 optimal_fiber_length=0.06515548
        tendon_slack_length=0.0195371 pennation_angle_at_optimal=0
      PathPoint P1: lumbar5 (-0.0173358 0.03380481 0.01525082)
      PathPoint P2: lumbar1 (-0.03813876 -0.01387263 0.002683894)
    Thelen2003Muscle MF_m1t_2_r: max_isometric_force=16.56 optimal_fiber_length=0.08003103
        tendon_slack_length=0.02399756 pennation_angle_at_optimal=0
      PathPoint P1: sacrum (-0.1214237 0.08397638 0.02099995)
      PathPoint P2: lumbar1 (-0.03813876 -0.01386864 0.002687049)
    Thelen2003Muscle MF_m1t_3_r: max_isometric_force=27.66 optimal_fiber_length=0.09118346
        tendon_slack_length=0.02734059 pennation_angle_at_optimal=0
      PathPoint P1: pelvis (-0.1321218 0.05431551 0.0479964)
      PathPoint P2: lumbar1 (-0.03813876 -0.01386864 0.002687049)
    Thelen2003Muscle MF_m2s_r: max_isometric_force=17.94 optimal_fiber_length=0.03935001 tendon_slack_length=0.01522576
        pennation_angle_at_optimal=0
      PathPoint P1: lumbar5 (-0.0173358 0.0346716 0.01370594)
      PathPoint P2: lumbar2 (-0.03553839 -0.01019267 0.00346716)
    Thelen2003Muscle MF_m2t_1_r: max_isometric_force=17.94 optimal_fiber_length=0.05375645
        tendon_slack_length=0.01634292 pennation_angle_at_optimal=0
      PathPoint P1: sacrum (-0.1207577 0.08521788 0.02043535)
      PathPoint P2: lumbar2 (-0.03900555 -0.01594027 0.00346716)
    Thelen2003Muscle MF_m2t_2_r: max_isometric_force=45.54 optimal_fiber_length=0.07342315 tendon_slack_length=0.022322
        pennation_angle_at_optimal=0
      PathPoint P1: pelvis (-0.1339897 0.04899622 0.04699637)
      PathPoint P2: lumbar2 (-0.03900555 -0.01594027 0.003155116)
    Thelen2003Muscle MF_m2t_3_r: max_isometric_force=45.54 optimal_fiber_length=0.08393566
        tendon_slack_length=0.02551797 pennation_angle_at_optimal=0
      PathPoint P1: pelvis (-0.1369894 0.03599722 0.04499653)
      PathPoint P2: lumbar2 (-0.03813876 -0.01624217 0.002050253)
    Thelen2003Muscle MF_m3s_r: max_isometric_force=24.84 optimal_fiber_length=0.03352932 tendon_slack_length=0.01393983
        pennation_angle_at_optimal=0
      PathPoint P1: sacrum (-0.1219997 0.08399978 0.01899995)
      PathPoint P2: lumbar3 (-0.03640518 -0.005593639 0.002520045)
    Thelen2003Muscle MF_m3t_1_r: max_isometric_force=24 optimal_fiber_length=0.09771283 tendon_slack_length=0.03253568
        pennation_angle_at_optimal=0
      PathPoint P1: pelvis (-0.1538831 0.002088439 0.01635994)
      PathPoint P2: lumbar3 (-0.04160592 -0.008863101 0.001440726)
    Thelen2003Muscle MF_m3t_2_r: max_isometric_force=24 optimal_fiber_length=0.08027924 tendon_slack_length=0.02673076
        pennation_angle_at_optimal=0
      PathPoint P1: pelvis (-0.1470417 0.02132515 0.02211039)
      PathPoint P2: lumbar3 (-0.04160592 -0.008867262 0.002305661)
    Thelen2003Muscle MF_m3t_3_r: max_isometric_force=24 optimal_fiber_length=0.08028171 tendon_slack_length=0.02673158
        pennation_angle_at_optimal=0
      PathPoint P1: pelvis (-0.1469887 0.02099838 0.0219983)
      PathPoint P2: lumbar3 (-0.04160592 -0.008867262 0.002305661)
    Thelen2003Muscle MF_m4s_r: max_isometric_force=24 optimal_fiber_length=0.03563215 tendon_slack_length=0.02254641
        pennation_angle_at_optimal=0
      PathPoint P1: sacrum (-0.1436886 0.05470976 0.01799995)
      PathPoint P2: lumbar4 (-0.03120444 -0.0001865505 0.001944071)
    Thelen2003Muscle MF_m4t_1_r: max_isometric_force=21.4 optimal_fiber_length=0.05291089
        tendon_slack_length=0.02144782 pennation_angle_at_optimal=0
      PathPoint P1: sacrum (-0.1522326 0.04152639 0.01535866)
      PathPoint P2: lumbar4 (-0.03727197 0.0001458027 0.002496511)
    Thelen2003Muscle MF_m4t_2_r: max_isometric_force=21.4 optimal_fiber_length=0.07146077
        tendon_slack_length=0.02896704 pennation_angle_at_optimal=0
      PathPoint P1: pelvis (-0.1509884 0.007999383 0.01599877)
      PathPoint P2: lumbar4 (-0.03813876 0.0001473543 0.002496355)
    Thelen2003Muscle MF_m4t_3_r: max_isometric_force=21.4 optimal_fiber_length=0.08307916
        tendon_slack_length=0.03367671 pennation_angle_at_optimal=0
      PathPoint P1: pelvis (-0.1599877 -0.003999691 0.01399892)
      PathPoint P2: lumbar4 (-0.03900555 0.0001473543 0.002496355)
    Thelen2003Muscle MF_m5s_r: max_isometric_force=10.35 optimal_fiber_length=0.01378833
        tendon_slack_length=0.006102069 pennation_angle_at_optimal=0
      PathPoint P1: sacrum (-0.1304547 0.06627013 0.01199997)
      PathPoint P2: lumbar5 (-0.02687049 0.01473543 0.003405913)
    Thelen2003Muscle MF_m5t_1_r: max_isometric_force=10.35 optimal_fiber_length=0.07612203
        tendon_slack_length=0.03085666 pennation_angle_at_optimal=0
      PathPoint P1: sacrum (-0.1740665 0.005229206 0.01003307)
      PathPoint P2: lumbar5 (-0.03077971 0.01461668 0.002536158)
    Thelen2003Muscle MF_m5t_2_r: max_isometric_force=10.35 optimal_fiber_length=0.05708206
        tendon_slack_length=0.02313934 pennation_angle_at_optimal=0
      PathPoint P1: sacrum (-0.1631156 0.02566173 0.01170797)
      PathPoint P2: lumbar5 (-0.02994898 0.01380684 0.002402282)
    Thelen2003Muscle MF_m5t_3_r: max_isometric_force=10.35 optimal_fiber_length=0.04062157
        tendon_slack_length=0.007145767 pennation_angle_at_optimal=0
      PathPoint P1: sacrum (-0.1522756 0.04258429 0.01159667)
      PathPoint P2: lumbar5 (-0.02845047 0.01321595 0.002011672)
    Thelen2003Muscle MF_m1_laminar_r: max_isometric_force=8.85 optimal_fiber_length=0.02712186
        tendon_slack_length=0.01029911 pennation_angle_at_optimal=0
      PathPoint P1: lumbar3 (-0.0346716 0.02166975 0.01560222)
      PathPoint P2: lumbar1 (-0.03033765 -0.004858575 0.00693432)
    Thelen2003Muscle MF_m2_laminar_r: max_isometric_force=10.2 optimal_fiber_length=0.0233355
        tendon_slack_length=0.008860709 pennation_angle_at_optimal=0
      PathPoint P1: lumbar4 (-0.02860407 0.02947086 0.01468342)
      PathPoint P2: lumbar2 (-0.03120444 -0.00520074 0.00606753)
    Thelen2003Muscle MF_m3_laminar_r: max_isometric_force=10.615 optimal_fiber_length=0.02267523
        tendon_slack_length=0.008609825 pennation_angle_at_optimal=0
      PathPoint P1: lumbar5 (-0.01906938 0.03380481 0.01386864)
      PathPoint P2: lumbar3 (-0.03293802 0.0005984752 0.005504116)
    Thelen2003Muscle MF_m4_laminar_r: max_isometric_force=7.7 optimal_fiber_length=0.02559303
        tendon_slack_length=0.009717512 pennation_angle_at_optimal=0
      PathPoint P1: sacrum (-0.1279997 0.0774877 0.01799995)
      PathPoint P2: lumbar4 (-0.02947086 0.005039032 0.006015523)
    Thelen2003Muscle MF_m5_laminar_r: max_isometric_force=16.6 optimal_fiber_length=0.02631132
        tendon_slack_length=0.009990097 pennation_angle_at_optimal=0
      PathPoint P1: pelvis (-0.1379894 0.04499653 0.01199907)
      PathPoint MF_m5_laminar_-P2: lumbar5 (-0.02513691 0.01560222 0.004888696)
    Thelen2003Muscle IL_L1_r: max_isometric_force=97.275 optimal_fiber_length=0.0459669 tendon_slack_length=0.09721774
        pennation_angle_at_optimal=0.2408554
      PathPoint P1: pelvis (-0.1439819 0.03899709 0.05030822)
      PathPoint P2: lumbar1 (-0.02687049 0.01473543 0.02513691)
      PathWrap: wrap_object=Cylinder2 method=hybrid
    Thelen2003Muscle IL_L2_r: max_isometric_force=138.1305 optimal_fiber_length=0.03317758
        tendon_slack_length=0.07027128 pennation_angle_at_optimal=0.2408554
      PathPoint P1: pelvis (-0.1359895 0.05599568 0.05499576)
      PathPoint P2: lumbar2 (-0.02812734 0.01119286 0.02687049)
      PathWrap: wrap_object=Cylinder method=hybrid
    Thelen2003Muscle IL_L3_r: max_isometric_force=163.422 optimal_fiber_length=0.02258579
        tendon_slack_length=0.04783749 pennation_angle_at_optimal=0.2408554
      PathPoint P1: pelvis (-0.1219906 0.06799475 0.05999537)
      PathPoint P2: lumbar3 (-0.02746658 0.01901226 0.02699089)
      PathWrap: wrap_object=Cylinder method=hybrid
    Thelen2003Muscle IL_L4_r: max_isometric_force=169.2585 optimal_fiber_length=0.01555352
        tendon_slack_length=0.0329435 pennation_angle_at_optimal=0.2408554
      PathPoint P1: pelvis (-0.116991 0.06499499 0.05599568)
      PathPoint P2: lumbar4 (-0.02060065 0.02389203 0.02687049)
      PathWrap: wrap_object=Cylinder method=hybrid
    Thelen2003Muscle IL_R5_r: max_isometric_force=21.4005 optimal_fiber_length=0.1507791 tendon_slack_length=0.2110663
        pennation_angle_at_optimal=0.2408554
      PathPoint IL_r5_R-P1: pelvis (-0.1359895 0.04399661 0.04899622)
      PathPoint IL_r5_R-P2: lumbar2 (-0.04301861 0.00173358 0.04854024)
      PathPoint IL_r5_R-P2_0: torso (-0.07761118 0.1689762 0.05599794)
      PathPoint IL_r5_R-P3: torso (-0.0785936 0.196484 0.05599794)
      PathPoint IL_r5_R-P4: torso (-0.07957602 0.2328335 0.05698036)
      PathPoint IL_r5_R-P5: torso (-0.07761118 0.2603413 0.05796278)
      PathPoint IL_r5_R-P6: torso (-0.07466392 0.2819545 0.05796278)
      PathPoint IL_r5_R-P7: torso (-0.0687694 0.3025854 0.0589452)
      PathWrap: wrap_object=Cylinder2 method=hybrid
    Thelen2003Muscle IL_R6_r: max_isometric_force=27.237 optimal_fiber_length=0.1441341 tendon_slack_length=0.17432
        pennation_angle_at_optimal=0.2408554
      PathPoint IL_r6_R-P1: pelvis (-0.12899 0.05899545 0.05299591)
      PathPoint IL_r6_R-P2: lumbar2 (-0.04265846 0.002050929 0.05027382)
      PathPoint IL_r6_R-P2_0: torso (-0.07761118 0.1679938 0.0589452)
      PathPoint IL_r6_R-P3: torso (-0.0785936 0.1984488 0.0589452)
      PathPoint IL_r6_R-P4: torso (-0.07957602 0.2357808 0.05992762)
      PathPoint IL_r6_R-P5: torso (-0.07564634 0.2632886 0.06091004)
      PathPoint IL_r6_R-P6: torso (-0.06975182 0.2770424 0.06189246)
      PathWrap: wrap_object=Cylinder2 method=hybrid
    Thelen2003Muscle IL_R7_r: max_isometric_force=35.019 optimal_fiber_length=0.1502228 tendon_slack_length=0.1488272
        pennation_angle_at_optimal=0.2408554
      PathPoint IL_r7_R-P1: pelvis (-0.1189908 0.06899468 0.05799553)
      PathPoint IL_r7_R-P2: lumbar2 (-0.04218225 0.002057647 0.05287419)
      PathPoint IL_r7_R-P2_0: torso (-0.0785936 0.1689762 0.06189246)
      PathPoint IL_r7_R-P3: torso (-0.0785936 0.1974664 0.06189246)
      PathPoint IL_r7_R-P4: torso (-0.07957602 0.2347984 0.06287488)
      PathPoint IL_r7_R-P5: torso (-0.0736815 0.2564116 0.0638573)
    Thelen2003Muscle IL_R8_r: max_isometric_force=31.128 optimal_fiber_length=0.1345616 tendon_slack_length=0.1265421
        pennation_angle_at_optimal=0.2408554
      PathPoint IL_r8_R-P1: pelvis (-0.1209907 0.07099452 0.05999537)
      PathPoint IL_r8_R-P2: lumbar2 (-0.04160592 0.00260037 0.05547456)
      PathPoint IL_r8_R-P2_0: torso (-0.07761118 0.1640641 0.0638573)
      PathPoint IL_r8_R-P3: torso (-0.07968025 0.1974664 0.0638573)
      PathPoint IL_r8_R-P4: torso (-0.07761118 0.2249742 0.06483972)
    Thelen2003Muscle IL_R9_r: max_isometric_force=44.7465 optimal_fiber_length=0.1496847 tendon_slack_length=0.08074691
        pennation_angle_at_optimal=0.2408554
      PathPoint IL_r9_R-P1: pelvis (-0.1189908 0.07499421 0.05999537)
      PathPoint IL_r9_R-P2: lumbar2 (-0.04160592 0.00260037 0.05720814)
      PathPoint IL_r9_R-P2_0: torso (-0.0785936 0.166029 0.06680456)
      PathPoint IL_r9_R-P3: torso (-0.07466392 0.1896071 0.06680456)
    Thelen2003Muscle IL_R10_r: max_isometric_force=89.493 optimal_fiber_length=0.1255313 tendon_slack_length=0.0663331
        pennation_angle_at_optimal=0.2408554
      PathPoint IL_r10_R-P1: pelvis (-0.116991 0.07199445 0.06199522)
      PathPoint IL_r10_R-P2: lumbar2 (-0.04168246 0.002276919 0.05980851)
      PathPoint IL_r10_R-P2_0: torso (-0.0736815 0.1522751 0.0687694)
    Thelen2003Muscle IL_R11_r: max_isometric_force=110.8935 optimal_fiber_length=0.1105074
        tendon_slack_length=0.04818159 pennation_angle_at_optimal=0.2408554
      PathPoint IL_r11_R-P1: pelvis (-0.1129913 0.07899391 0.06399506)
      PathPoint IL_r11_R-P2: lumbar2 (-0.04156007 0.002343254 0.06240888)
      PathPoint IL_r11_R-P2_0: torso (-0.06091004 0.1228025 0.07269908)
    Thelen2003Muscle IL_R12_r: max_isometric_force=132.294 optimal_fiber_length=0.08319266
        tendon_slack_length=0.03418377 pennation_angle_at_optimal=0.2408554
      PathPoint IL_r12_R-P1: pelvis (-0.1109914 0.08199367 0.06699483)
      PathPoint IL_r12_R-P2: torso (-0.03143744 0.0933299 0.06582214)
    Thelen2003Muscle LTpT_T1_r: max_isometric_force=25.2915 optimal_fiber_length=0.1040197
        tendon_slack_length=0.2459695 pennation_angle_at_optimal=0.2199115
      PathPoint LTpT_t1_R-P1: lumbar1 (-0.04160592 -0.01126827 0.002782396)
      PathPoint LTpT_t1_R-P2: torso (-0.049121 0.3978801 0.02569028)
      PathWrap: wrap_object=Chest_r method=hybrid
    Thelen2003Muscle LTpT_T2_r: max_isometric_force=50.583 optimal_fiber_length=0.1061509 tendon_slack_length=0.2555984
        pennation_angle_at_optimal=0.2199115
      PathPoint LTpT_t2_R-P1: lumbar2 (-0.04073913 -0.01300185 0.003319806)
      PathPoint LTpT_t2_R-P2: torso (-0.0540331 0.3792141 0.02607343)
      PathWrap: wrap_object=Chest_r method=hybrid
    Thelen2003Muscle LTpT_T3_r: max_isometric_force=50.583 optimal_fiber_length=0.105916 tendon_slack_length=0.2545239
        pennation_angle_at_optimal=0.2199115
      PathPoint LTpT_t3_R-P1: lumbar3 (-0.0433395 -0.00346716 0.00346716)
      PathPoint LTpT_t3_R-P2: lumbar1 (-0.03216658 -0.0121524 0.00433395)
      PathPoint LTpT_t3_R-P2_0: torso (-0.06034269 0.3586678 0.02507568)
      PathWrap: wrap_object=Chest_r method=hybrid
    Thelen2003Muscle LTpT_T4_r: max_isometric_force=19.455 optimal_fiber_length=0.1050276 tendon_slack_length=0.2524362
        pennation_angle_at_optimal=0.2199115
      PathPoint LTpT_t4_R-P1: lumbar4 (-0.04247271 0.00606753 0.002444348)
      PathPoint LTpT_t4_R-P2: lumbar1 (-0.03216909 -0.01213506 0.005304755)
      PathPoint LTpT_t4_R-P2_0: torso (-0.0687694 0.3369701 0.02569028)
      PathWrap: wrap_object=Chest_r method=hybrid
    Thelen2003Muscle LTpT_T5_r: max_isometric_force=19.455 optimal_fiber_length=0.09904294
        tendon_slack_length=0.2380137 pennation_angle_at_optimal=0.2199115
      PathPoint LTpT_t5_R-P1: lumbar4 (-0.04247271 0.00346716 -0.0003750999)
      PathPoint LTpT_t5_R-P2: lumbar2 (-0.03813876 0.003813876 0.005547456)
      PathPoint LTpT_t5_R-P2_0: torso (-0.07265851 0.3143744 0.02750776)
      PathWrap: wrap_object=Chest_r method=hybrid
    Thelen2003Muscle LTpT_T6_r: max_isometric_force=29.1825 optimal_fiber_length=0.1007844
        tendon_slack_length=0.2306479 pennation_angle_at_optimal=0.2199115
      PathPoint LTpT_t6_R-P1: lumbar5 (-0.03293802 0.01560222 0.0001851117)
      PathPoint LTpT_t6_R-P2: lumbar2 (-0.03813876 0.003813876 0.00780111)
      PathPoint LTpT_t6_R-P3: torso (-0.07168581 0.1866971 0.01498456)
      PathPoint LTpT_t6_R-P2_0: torso (-0.0785936 0.2888315 0.02717374)
    Thelen2003Muscle LTpT_T7_r: max_isometric_force=35.019 optimal_fiber_length=0.1148319 tendon_slack_length=0.2170709
        pennation_angle_at_optimal=0.2199115
      PathPoint LTpT_t7_R-P1: sacrum (-0.1313167 0.06051254 0.0002768593)
      PathPoint LTpT_t7_R-P2: lumbar2 (-0.03813009 0.003813876 0.00953469)
      PathPoint LTpT_t7_R-P3: torso (-0.07138539 0.1873288 0.0191061)
      PathPoint LTpT_t7_R-P2_0: torso (-0.0785936 0.2623061 0.02600466)
    Thelen2003Muscle LTpT_T8_r: max_isometric_force=56.4195 optimal_fiber_length=0.1228364
        tendon_slack_length=0.1944504 pennation_angle_at_optimal=0.2199115
      PathPoint LTpT_t8_R-P1: sacrum (-0.1429006 0.05024547 0.000374509)
      PathPoint LTpT_t8_R-P2: lumbar4 (-0.04071651 0.01564062 0.004903734)
      PathPoint LTpT_t8_R-P3: lumbar3 (-0.04052226 0.01174145 0.007208538)
      PathPoint LTpT_t8_R-P2_0: lumbar2 (-0.03927937 0.002688358 0.009482683)
      PathPoint LTpT_t8_R-P2_1: torso (-0.07761118 0.2367632 0.02505171)
    Thelen2003Muscle LTpT_T9_r: max_isometric_force=66.147 optimal_fiber_length=0.1218436 tendon_slack_length=0.2065051
        pennation_angle_at_optimal=0.2199115
      PathPoint LTpT_t9_R-P1: sacrum (-0.1658216 0.02683513 0)
      PathPoint LTpT_t9_R-P2: lumbar4 (-0.04049643 0.01556755 0.006483589)
      PathPoint LTpT_t9_R-P3: lumbar3 (-0.04024463 0.01200799 0.008399178)
      PathPoint LTpT_t9_R-P3_0: lumbar2 (-0.03875964 0.003010396 0.009968085)
      PathPoint LTpT_t9_R-P2_0: torso (-0.0736815 0.2180972 0.02372554)
    Thelen2003Muscle LTpT_T10_r: max_isometric_force=71.9835 optimal_fiber_length=0.1099593
        tendon_slack_length=0.1680311 pennation_angle_at_optimal=0.2199115
      PathPoint LTpT_t10_R-P1: sacrum (-0.1644626 0.02456104 0.01071997)
      PathPoint LTpT_t10_R-P2: lumbar4 (-0.04049643 0.01556755 0.01088688)
      PathPoint LTpT_t10_R-P2_0: lumbar3 (-0.03995902 0.01216106 0.01249044)
      PathPoint LTpT_t10_R-P3: lumbar2 (-0.03813876 0.00292975 0.01321855)
      PathPoint LTpT_t10_R-P2_1: torso (-0.06680456 0.1896071 0.0177818)
    Thelen2003Muscle LTpT_T11_r: max_isometric_force=73.929 optimal_fiber_length=0.0957826
        tendon_slack_length=0.1459814 pennation_angle_at_optimal=0.2199115
      PathPoint LTpT_t11_R-P1: sacrum (-0.1576486 0.03070932 0.02403994)
      PathPoint LTpT_t11_R-P2: lumbar4 (-0.04049643 0.01473543 0.01901737)
      PathPoint LTpT_t11_R-P3: lumbar3 (-0.04346796 0.01169196 0.01810291)
      PathPoint LTpT_t11_R-P2_0: lumbar2 (-0.03987234 0.00292975 0.01718845)
      PathPoint LTpT_t11_R-P2_1: torso (-0.05796278 0.158875 0.01731024)
    Thelen2003Muscle LTpT_T12_r: max_isometric_force=62.256 optimal_fiber_length=0.07566821
        tendon_slack_length=0.1153251 pennation_angle_at_optimal=0.2199115
      PathPoint LTpT_t12_R-P1: sacrum (-0.1447596 0.04879987 0.02792993)
      PathPoint LTpT_t12_R-P2: lumbar4 (-0.04049643 0.01473543 0.02187778)
      PathPoint LTpT_t12_R-P3: lumbar3 (-0.04279117 0.01218395 0.02071403)
      PathPoint LTpT_t12_R-P2_0: lumbar2 (-0.03970141 0.003452711 0.01954984)
      PathPoint LTpT_t12_R-P2_1: torso (-0.05010342 0.1306619 0.01754003)
    Thelen2003Muscle LTpT_R4_r: max_isometric_force=19.455 optimal_fiber_length=0.1335252 tendon_slack_length=0.203504
        pennation_angle_at_optimal=0.2199115
      PathPoint LTpT_r4_R-P1: lumbar4 (-0.0433395 0.006119416 0.00244446)
      PathPoint LTpT_r4_R-P2: lumbar2 (-0.0433395 0.004729397 0.009948929)
      PathPoint LTpT_r4_R-P2_0: torso (-0.07171666 0.1866598 0.0255384)
      PathPoint LTpT_r4_R-P3: torso (-0.07269908 0.2112203 0.02808228)
      PathPoint LTpT_r4_R-P4: torso (-0.07269908 0.2387281 0.0305735)
      PathPoint LTpT_r4_R-P5: torso (-0.07171666 0.2682007 0.03293023)
      PathPoint LTpT_r4_R-P6: torso (-0.0638573 0.3359876 0.03771805)
    Thelen2003Muscle LTpT_R5_r: max_isometric_force=19.455 optimal_fiber_length=0.1250125 tendon_slack_length=0.1905296
        pennation_angle_at_optimal=0.2199115
      PathPoint LTpT_r5_R-P1: lumbar4 (-0.04247271 0.00346716 6.93432e-5)
      PathPoint LTpT_r5_R-P2: lumbar2 (-0.04247271 0.004015561 0.01230512)
      PathPoint LTpT_r5_R-P2_0: torso (-0.07466392 0.184695 0.02938104)
      PathPoint LTpT_r5_R-P3: torso (-0.0736815 0.2102379 0.0314062)
      PathPoint LTpT_r5_R-P4: torso (-0.07466392 0.2387281 0.03403545)
      PathPoint LTpT_r5_R-P5: torso (-0.07269908 0.2662358 0.03634954)
      PathPoint LTpT_r5_R-P6: torso (-0.0638573 0.3074975 0.03850418)
    Thelen2003Muscle LTpT_R6_r: max_isometric_force=29.1825 optimal_fiber_length=0.1327505 tendon_slack_length=0.180751
        pennation_angle_at_optimal=0.2199115
      PathPoint LTpT_r6_R-P1: lumbar5 (-0.03293802 0.0173358 0.0001820259)
      PathPoint LTpT_r6_R-P2: lumbar3 (-0.0433395 0.01277094 0.009399471)
      PathPoint LTpT_r6_R-P2_0: lumbar2 (-0.03987234 0.003813876 0.01213506)
      PathPoint LTpT_r6_R-P2_1: torso (-0.07466392 0.1837125 0.03046219)
      PathPoint LTpT_r6_R-P3: torso (-0.07466392 0.2092555 0.03405146)
      PathPoint LTpT_r6_R-P4: torso (-0.07564634 0.2377456 0.03669015)
      PathPoint LTpT_r6_R-P5: torso (-0.07171666 0.2662358 0.0392968)
      PathPoint LTpT_r6_R-P6: torso (-0.06778698 0.2849018 0.0392968)
    Thelen2003Muscle LTpT_R7_r: max_isometric_force=35.019 optimal_fiber_length=0.1258605 tendon_slack_length=0.1886746
        pennation_angle_at_optimal=0.2199115
      PathPoint LTpT_r7_R-P1: sacrum (-0.1313197 0.06050984 0.0002799993)
      PathPoint LTpT_r7_R-P2: lumbar4 (-0.0404966 0.01632114 0.00704663)
      PathPoint LTpT_r7_R-P2_0: lumbar3 (-0.03995945 0.01228189 0.01114285)
      PathPoint LTpT_r7_R-P2_1: lumbar2 (-0.03813009 0.003740476 0.01497154)
      PathPoint LTpT_r7_R-P2_2: torso (-0.07662876 0.1817477 0.03486638)
      PathPoint LTpT_r7_R-P3: torso (-0.07761118 0.2072906 0.03889263)
      PathPoint LTpT_r7_R-P4: torso (-0.07564634 0.2387281 0.04150607)
      PathPoint LTpT_r7_R-P5: torso (-0.07269908 0.264271 0.04257091)
    Thelen2003Muscle LTpT_R8_r: max_isometric_force=56.4195 optimal_fiber_length=0.1033772
        tendon_slack_length=0.1933503 pennation_angle_at_optimal=0.2199115
      PathPoint LTpT_r8_R-P1: sacrum (-0.1428996 0.05024987 0.000369999)
      PathPoint LTpT_r8_R-P2: lumbar4 (-0.0403307 0.01570936 0.009875685)
      PathPoint LTpT_r8_R-P2_0: lumbar3 (-0.03980716 0.01213506 0.01390288)
      PathPoint LTpT_r8_R-P2_1: lumbar2 (-0.03813009 0.003363145 0.01780508)
      PathPoint LTpT_r8_R-P2_2: torso (-0.07761118 0.1817477 0.03999717)
      PathPoint LTpT_r8_R-P3: torso (-0.07761118 0.2053258 0.04294806)
      PathPoint LTpT_r8_R-P4: torso (-0.07466392 0.233816 0.0455388)
    Thelen2003Muscle LTpT_R9_r: max_isometric_force=66.147 optimal_fiber_length=0.08971565 tendon_slack_length=0.20388
        pennation_angle_at_optimal=0.2199115
      PathPoint LTpT_r9_R-P1: sacrum (-0.1658196 0.02683993 0)
      PathPoint LTpT_r9_R-P2: lumbar4 (-0.0404966 0.01532606 0.01290659)
      PathPoint LTpT_r9_R-P2_0: lumbar3 (-0.03995945 0.01128864 0.01697357)
      PathPoint LTpT_r9_R-P2_1: lumbar2 (-0.03813053 0.003412301 0.02096626)
      PathPoint LTpT_r9_R-P2_2: torso (-0.07761118 0.1797829 0.04259675)
      PathPoint LTpT_r9_R-P3: torso (-0.07564634 0.1994313 0.04593786)
    Thelen2003Muscle LTpT_R10_r: max_isometric_force=71.9835 optimal_fiber_length=0.1051218
        tendon_slack_length=0.162404 pennation_angle_at_optimal=0.2199115
      PathPoint LTpT_r10_R-P1: sacrum (-0.1644596 0.02455994 0.01071997)
      PathPoint LTpT_r10_R-P2: lumbar4 (-0.0404491 0.01461763 0.01684962)
      PathPoint LTpT_r10_R-P2_0: lumbar3 (-0.03991169 0.0109857 0.02032969)
      PathPoint LTpT_r10_R-P2_1: lumbar2 (-0.03808294 0.003160689 0.02369197)
      PathPoint LTpT_r10_R-P2_2: torso (-0.07564634 0.1729059 0.04606243)
    Thelen2003Muscle LTpT_R11_r: max_isometric_force=73.929 optimal_fiber_length=0.1022442
        tendon_slack_length=0.1284639 pennation_angle_at_optimal=0.2199115
      PathPoint LTpT_r11_R-P1: sacrum (-0.1576496 0.03070992 0.02403994)
      PathPoint LTpT_r11_R-P2: lumbar4 (-0.03995902 0.01556755 0.02549992)
      PathPoint LTpT_r11_R-P3: lumbar3 (-0.03995902 0.01207768 0.02823768)
      PathPoint LTpT_r11_R-P4: lumbar2 (-0.03815939 0.003883219 0.03083467)
      PathPoint LTpT_r11_R-P2_0: torso (-0.06387852 0.1450602 0.04475414)
    Thelen2003Muscle LTpT_R12_r: max_isometric_force=62.256 optimal_fiber_length=0.06143526
        tendon_slack_length=0.1193766 pennation_angle_at_optimal=0.2199115
      PathPoint LTpT_r12_R-P1: sacrum (-0.1447596 0.04879987 0.02792993)
      PathPoint LTpT_r12_R-P2: lumbar4 (-0.04049643 0.01523522 0.02904371)
      PathPoint LTpT_r12_R-P2_0: lumbar3 (-0.03995902 0.0118264 0.03109488)
      PathPoint LTpT_r12_R-P2_1: lumbar2 (-0.03813876 0.003813876 0.03364471)
      PathPoint LTpT_r12_R-P2_2: torso (-0.04424338 0.1178904 0.04579531)
      PathWrap: wrap_object=Cylinder2 method=hybrid
    Thelen2003Muscle LTpL_L5_r: max_isometric_force=103.1115 optimal_fiber_length=0.0513
        tendon_slack_length=0.0009967357 pennation_angle_at_optimal=0.2199115
      PathPoint P1: sacrum (-0.1385306 0.06312834 0.04551078)
      PathPoint P2: lumbar5 (-0.01140089 0.02473299 0.02239985)
    Thelen2003Muscle LTpL_L4_r: max_isometric_force=99.2205 optimal_fiber_length=0.03684344
        tendon_slack_length=0.03981015 pennation_angle_at_optimal=0.2199115
      PathPoint P1: pelvis (-0.1329897 0.04099684 0.0479963)
      PathPoint P2: lumbar4 (-0.01993617 0.02343627 0.02207393)
    Thelen2003Muscle LTpL_L3_r: max_isometric_force=91.4385 optimal_fiber_length=0.05039463
        tendon_slack_length=0.05473983 pennation_angle_at_optimal=0.2199115
      PathPoint P1: pelvis (-0.1399892 0.04099684 0.05099607)
      PathPoint P2: lumbar3 (-0.02580486 0.01990488 0.02011109)
    Thelen2003Muscle LTpL_L2_r: max_isometric_force=81.711 optimal_fiber_length=0.06140422
        tendon_slack_length=0.06743831 pennation_angle_at_optimal=0.2199115
      PathPoint P1: pelvis (-0.141989 0.03699715 0.05299591)
      PathPoint P2: lumbar2 (-0.025977 0.01244294 0.01912113)
    Thelen2003Muscle LTpL_L1_r: max_isometric_force=70.038 optimal_fiber_length=0.07295952
        tendon_slack_length=0.08474688 pennation_angle_at_optimal=0.2199115
      PathPoint P1: pelvis (-0.1441099 0.03353661 0.05356977)
      PathPoint P2: lumbar1 (-0.02740859 0.01443803 0.0197824)
      PathWrap: wrap_object=Cylinder2 method=hybrid
    Thelen2003Muscle EO1_r: max_isometric_force=111.744 optimal_fiber_length=0.03414992 tendon_slack_length=0.05423924
        pennation_angle_at_optimal=0
      PathPoint P1: Abdomen (0.00589008 0.04712064 0.02061528)
      PathPoint P2: torso (0.09136506 0.1709411 0.09136506)
    Thelen2003Muscle EO2_r: max_isometric_force=132.3546 optimal_fiber_length=0.03610137 tendon_slack_length=0.05250989
        pennation_angle_at_optimal=0
      PathPoint P1: torso (0.08940022 0.1385212 0.1031541)
      PathPoint P2: Abdomen (0.00785344 0.02257864 0.03239544)
    Thelen2003Muscle EO3_r: max_isometric_force=138.8978 optimal_fiber_length=0.03673959 tendon_slack_length=0.04455975
        pennation_angle_at_optimal=0
      PathPoint P1: torso (0.07712734 0.09875286 0.1115901)
      PathPoint P2: Abdomen (0.006647358 -0.00785344 0.03239544)
    Thelen2003Muscle EO4_r: max_isometric_force=134.0928 optimal_fiber_length=0.03762691 tendon_slack_length=0.04288496
        pennation_angle_at_optimal=0
      PathPoint P1: torso (0.06848273 0.08173302 0.1101843)
      PathPoint default: Abdomen (0.00589008 -0.02356032 0.03043208)
    Thelen2003Muscle EO5_r: max_isometric_force=155.945 optimal_fiber_length=0.04440657 tendon_slack_length=0.0486226
        pennation_angle_at_optimal=0
      PathPoint P1: torso (0.00098242 0.1080662 0.110031)
      PathPoint P2: pelvis (-0.05499576 0.08199367 0.1019921)
    Thelen2003Muscle EO6_r: max_isometric_force=226.9645 optimal_fiber_length=0.05270587 tendon_slack_length=0.05327058
        pennation_angle_at_optimal=0
      PathPoint P1: torso (-0.01080662 0.09136506 0.098242)
      PathPoint P2: pelvis (-0.06899468 0.09299283 0.09799244)
    Thelen2003Muscle IO1_r: max_isometric_force=123.9794 optimal_fiber_length=0.0422519 tendon_slack_length=0.0639206
        pennation_angle_at_optimal=0
      PathPoint P1: Abdomen (0.003013277 -0.04613896 0.04319392)
      PathPoint P2: pelvis (-0.008999306 0.02499807 0.1259903)
    Thelen2003Muscle IO2_r: max_isometric_force=150.0727 optimal_fiber_length=0.04325995 tendon_slack_length=0.06558567
        pennation_angle_at_optimal=0
      PathPoint P1: Abdomen (0.00294504 -0.02159696 0.05104736)
      PathPoint P2: pelvis (-0.02399815 0.04899622 0.1279901)
    Thelen2003Muscle IO3_r: max_isometric_force=151.2072 optimal_fiber_length=0.05105467 tendon_slack_length=0.07740451
        pennation_angle_at_optimal=0
      PathPoint P1: Abdomen (0.0049084 0.00687176 0.04810232)
      PathPoint P2: pelvis (-0.03899699 0.06899468 0.116991)
    Thelen2003Muscle IO4_r: max_isometric_force=179.0459 optimal_fiber_length=0.06558482 tendon_slack_length=0.04419167
        pennation_angle_at_optimal=0
      PathPoint P1: torso (0.06483972 0.1061014 0.1188728)
      PathPoint P2: pelvis (-0.05299591 0.08199367 0.09999229)
    Thelen2003Muscle IO5_r: max_isometric_force=157.0833 optimal_fiber_length=0.05288869 tendon_slack_length=0.0356369
        pennation_angle_at_optimal=0
      PathPoint P1: torso (0.0294726 0.09431232 0.1129783)
      PathPoint P2: pelvis (-0.07399429 0.09399275 0.07899391)
    Thelen2003Muscle IO6_r: max_isometric_force=138.6115 optimal_fiber_length=0.05051684 tendon_slack_length=0.03404012
        pennation_angle_at_optimal=0
      PathPoint P1: torso (0 0.08448812 0.098242)
      PathPoint P2: pelvis (-0.08999306 0.08799321 0.06599491)
    Thelen2003Muscle rect_abd_l_0: max_isometric_force=163 optimal_fiber_length=0.2184838
        tendon_slack_length=0.01659618 pennation_angle_at_optimal=0 FmaxTendonStrain=0.033 FmaxMuscleStrain=0.6
        KshapeActive=0.5 KshapePassive=4 Af=0.3 Flen=1.8 activation_time_constant=0.01 deactivation_time_constant=0.04
      PathPoint rect_abd_l-P1: pelvis (-0.02599799 -0.0699946 -0.01099915)
      PathPoint rect_abd_l-P2: torso (0.09038264 0.2177662 -0.03045502)
    Thelen2003Muscle Ps_L1_VB_l: max_isometric_force=160.4797 optimal_fiber_length=0.1727803
        tendon_slack_length=0.0607218 pennation_angle_at_optimal=0.18675
      PathPoint P1: lumbar1 (-0.008806153 0.0201702 -0.0173358)
      PathPoint P2: pelvis (-0.02379816 -0.0569956 -0.07589415)
      ConditionalPathPoint P3: pelvis (-0.02879778 -0.08049379 -0.08159371)
          socket_coordinate=/jointset/hip_l/hip_flexion_l range=(-1.5708 0.785398)
      PathPoint P4: femur_l (0.001468048 -0.04651877 -0.003486614)
      PathPoint P5: femur_l (-0.01724956 -0.05477654 -0.009542312)
    Thelen2003Muscle Ps_L1_TP_l: max_isometric_force=46.32404 optimal_fiber_length=0.1708298
        tendon_slack_length=0.06004413 pennation_angle_at_optimal=0.18675
      PathPoint P1: lumbar1 (-0.02015287 0.01270575 -0.01961546)
      PathPoint P2: pelvis (-0.02379816 -0.0569956 -0.07589415)
      ConditionalPathPoint P3: pelvis (-0.02879778 -0.08049379 -0.08159371)
          socket_coordinate=/jointset/hip_l/hip_flexion_l range=(-1.5708 0.785398)
      PathPoint P4: femur_l (0.001468048 -0.04651877 -0.003486614)
      PathPoint P5: femur_l (-0.01724956 -0.05477654 -0.009542312)
    Thelen2003Muscle Ps_L1_L2_IVD_l: max_isometric_force=91.32454 optimal_fiber_length=0.1565138
        tendon_slack_length=0.05496841 pennation_angle_at_optimal=0.1867502
      PathPoint P1: lumbar1 (-0.001086625 0.003040682 -0.01792522)
      PathPoint P2: pelvis (-0.02379816 -0.0569956 -0.07589415)
      ConditionalPathPoint P3: pelvis (-0.02879778 -0.08049379 -0.08159371)
          socket_coordinate=/jointset/hip_l/hip_flexion_l range=(-1.5708 0.785398)
      PathPoint P4: femur_l (0.001468048 -0.04651877 -0.003486614)
      PathPoint P5: femur_l (-0.01724956 -0.05477654 -0.009542312)
    Thelen2003Muscle Ps_L2_TP_l: max_isometric_force=160.4797 optimal_fiber_length=0.1511581
        tendon_slack_length=0.05309938 pennation_angle_at_optimal=0.1867502
      PathPoint P1: lumbar2 (-0.01874121 0.01264387 -0.01928608)
      PathPoint P2: pelvis (-0.02379816 -0.0569956 -0.07589415)
      ConditionalPathPoint P3: pelvis (-0.02879778 -0.08049379 -0.08159371)
          socket_coordinate=/jointset/hip_l/hip_flexion_l range=(-1.5708 0.785398)
      PathPoint P4: femur_l (0.001468048 -0.04651877 -0.003486614)
      PathPoint P5: femur_l (-0.01724956 -0.05477654 -0.009542312)
    Thelen2003Muscle Ps_L2_L3_IVD_l: max_isometric_force=90.5635 optimal_fiber_length=0.1368311
        tendon_slack_length=0.04808091 pennation_angle_at_optimal=0.1867502
      PathPoint P1: lumbar2 (0.001701093 0.002934249 -0.01859265)
      PathPoint P2: pelvis (-0.02379816 -0.0569956 -0.07589415)
      ConditionalPathPoint P3: pelvis (-0.02879778 -0.08049379 -0.08159371)
          socket_coordinate=/jointset/hip_l/hip_flexion_l range=(-1.5708 0.785398)
      PathPoint P4: femur_l (0.001468048 -0.04651877 -0.003486614)
      PathPoint P5: femur_l (-0.01724956 -0.05477654 -0.009542312)
    Thelen2003Muscle Ps_L3_TP_l: max_isometric_force=76.86482 optimal_fiber_length=0.132992
        tendon_slack_length=0.04674756 pennation_angle_at_optimal=0.1867502
      PathPoint P1: lumbar3 (-0.02124199 0.01796708 -0.02449549)
      PathPoint P2: pelvis (-0.02379816 -0.0569956 -0.07589415)
      ConditionalPathPoint P3: pelvis (-0.02879778 -0.08049379 -0.08159371)
          socket_coordinate=/jointset/hip_l/hip_flexion_l range=(-1.5708 0.785398)
      PathPoint P4: femur_l (0.001468048 -0.04651877 -0.003486614)
      PathPoint P5: femur_l (-0.01724956 -0.05477654 -0.009542312)
    Thelen2003Muscle Ps_L3_L4_IVD_l: max_isometric_force=27.39736 optimal_fiber_length=0.1185449
        tendon_slack_length=0.04165868 pennation_angle_at_optimal=0.1867502
      PathPoint P1: lumbar3 (0.0009984814 0.005383312 -0.01833261)
      PathPoint P2: pelvis (-0.02379816 -0.0569956 -0.07589415)
      ConditionalPathPoint P3: pelvis (-0.02879778 -0.08049379 -0.08159371)
          socket_coordinate=/jointset/hip_l/hip_flexion_l range=(-1.5708 0.785398)
      PathPoint P4: femur_l (0.001468048 -0.04651877 -0.003486614)
      PathPoint P5: femur_l (-0.01724956 -0.05477654 -0.009542312)
    Thelen2003Muscle Ps_L4_TP_l: max_isometric_force=122.4278 optimal_fiber_length=0.1151438
        tendon_slack_length=0.04046894 pennation_angle_at_optimal=0.1867502
      PathPoint P1: lumbar4 (-0.0135644 0.02162329 -0.02243253)
      PathPoint P2: pelvis (-0.02379816 -0.0569956 -0.07589415)
      ConditionalPathPoint P3: pelvis (-0.02879778 -0.08049379 -0.08159371)
          socket_coordinate=/jointset/hip_l/hip_flexion_l range=(-1.5708 0.785398)
      PathPoint P4: femur_l (0.001468048 -0.04651877 -0.003486614)
      PathPoint P5: femur_l (-0.01724956 -0.05477654 -0.009542312)
    Thelen2003Muscle Ps_L4_L5_IVD_l: max_isometric_force=60.12199 optimal_fiber_length=0.09709396
        tendon_slack_length=0.03414828 pennation_angle_at_optimal=0.1867502
      PathPoint P1: lumbar4 (0.004697681 0.003421688 -0.01785587)
      PathPoint P2: pelvis (-0.02379816 -0.0569956 -0.07589415)
      ConditionalPathPoint P3: pelvis (-0.02879778 -0.08049379 -0.08159371)
          socket_coordinate=/jointset/hip_l/hip_flexion_l range=(-1.5708 0.785398)
      PathPoint P4: femur_l (0.001468048 -0.04651877 -0.003486614)
      PathPoint P5: femur_l (-0.01724956 -0.05477654 -0.009542312)
    Thelen2003Muscle Ps_L5_TP_l: max_isometric_force=131.6595 optimal_fiber_length=0.1006624
        tendon_slack_length=0.03533892 pennation_angle_at_optimal=0.1867502
      PathPoint P1: lumbar5 (-0.004871368 0.02525809 -0.02192112)
      PathPoint P2: pelvis (-0.02379816 -0.0569956 -0.07589415)
      ConditionalPathPoint P3: pelvis (-0.02879778 -0.08049379 -0.08159371)
          socket_coordinate=/jointset/hip_l/hip_flexion_l range=(-1.5708 0.785398)
      PathPoint P4: femur_l (0.001468048 -0.04651877 -0.003486614)
      PathPoint P5: femur_l (-0.01724956 -0.05477654 -0.009542312)
    Thelen2003Muscle Ps_L5_VB_l: max_isometric_force=145.3582 optimal_fiber_length=0.08869394
        tendon_slack_length=0.03113619 pennation_angle_at_optimal=0.1867502
      PathPoint P1: lumbar5 (0.0086679 0.01075686 -0.01646901)
      PathPoint P2: pelvis (-0.02379816 -0.0569956 -0.07589415)
      ConditionalPathPoint P3: pelvis (-0.02879778 -0.08049379 -0.08159371)
          socket_coordinate=/jointset/hip_l/hip_flexion_l range=(-1.5708 0.785398)
      PathPoint P4: femur_l (0.001468048 -0.04651877 -0.003486614)
      PathPoint P5: femur_l (-0.01724956 -0.05477654 -0.009542312)
    Thelen2003Muscle QL_post_I_1-L3_l: max_isometric_force=18.2 optimal_fiber_length=0.03396369
        tendon_slack_length=0.02849535 pennation_angle_at_optimal=0.1291544
      PathPoint I.1_l-P1: pelvis (-0.1135682 0.07949337 -0.05819261)
      PathPoint L3_TP_l-P2: lumbar3 (-0.02513691 0.0173358 -0.02626374)
    Thelen2003Muscle QL_post_I_2-L4_l: max_isometric_force=24.2 optimal_fiber_length=0.02153184
        tendon_slack_length=0.0180651 pennation_angle_at_optimal=0.1291544
      PathPoint I_2_l-P1: pelvis (-0.1059918 0.08099375 -0.06299514)
      PathPoint L4_TP_l-P2: lumbar4 (-0.01906938 0.02257988 -0.0260037)
    Thelen2003Muscle QL_post_I_2-L3_l: max_isometric_force=14.1 optimal_fiber_length=0.04481692
        tendon_slack_length=0.03760115 pennation_angle_at_optimal=0.1291544
      PathPoint I_2_l-P1: pelvis (-0.1059918 0.08099375 -0.06299514)
      PathPoint L3_TP_l-P2: lumbar3 (-0.02513691 0.01701509 -0.02626374)
    Thelen2003Muscle QL_post_I_2-L2_l: max_isometric_force=8.8 optimal_fiber_length=0.03012929
        tendon_slack_length=0.01654421 pennation_angle_at_optimal=0.1291544
      PathPoint I_2_l-P1: pelvis (-0.1059918 0.08099375 -0.06299514)
      PathPoint L2_TP_l-P2: lumbar2 (-0.02687049 0.01040148 -0.02626374)
    Thelen2003Muscle QL_post_I_3-L1_l: max_isometric_force=12.92 optimal_fiber_length=0.07302995
        tendon_slack_length=0.03793236 pennation_angle_at_optimal=0.1291544
      PathPoint L1_TP_l-P1: lumbar1 (-0.02762416 0.01241954 -0.02773728)
      PathPoint I_3_l-P1: pelvis (-0.09799244 0.08899313 -0.06599491)
    Thelen2003Muscle QL_post_I_3-L2_l: max_isometric_force=13.6 optimal_fiber_length=0.04361707
        tendon_slack_length=0.03659449 pennation_angle_at_optimal=0.1291544
      PathPoint L2_TP_l-P2: lumbar2 (-0.02687049 0.01040148 -0.02626374)
      PathPoint I_3_l-P1: pelvis (-0.09799244 0.08899313 -0.06599491)
    Thelen2003Muscle QL_post_I_3-L3_l: max_isometric_force=23.2 optimal_fiber_length=0.03242111
        tendon_slack_length=0.02720111 pennation_angle_at_optimal=0.1291544
      PathPoint L3_TP_l-P2: lumbar3 (-0.02513691 0.01701509 -0.02626374)
      PathPoint I_3_l-P1: pelvis (-0.09799244 0.08899313 -0.06599491)
    Thelen2003Muscle QL_mid_L3-12_3_l: max_isometric_force=5.8 optimal_fiber_length=0.05850624
        tendon_slack_length=0.03038863 pennation_angle_at_optimal=0.1291544
      PathPoint quadratus_lumb_mid_L3_1_r-P1: torso (-0.0411747 0.1103945 -0.05075182)
      PathPoint quadratus_lumb_mid_L3_1_r-P2: lumbar3 (-0.02545034 0.01883595 -0.02633308)
    Thelen2003Muscle QL_mid_L3-12_2_l: max_isometric_force=6.6 optimal_fiber_length=0.06156922
        tendon_slack_length=0.03197956 pennation_angle_at_optimal=0.1291544
      PathPoint quadratus_lumb_mid_L3_2_r-P2: torso (-0.04173143 0.1171261 -0.04243072)
      PathPoint quadratus_lumb_mid_L3_2_r-P3: lumbar3 (-0.02544895 0.01883535 -0.02633308)
    Thelen2003Muscle QL_mid_L3-12_1_l: max_isometric_force=11 optimal_fiber_length=0.06628828
        tendon_slack_length=0.03443068 pennation_angle_at_optimal=0.1291544
      PathPoint quadratus_lumb_mid_L3_3_r-P2: torso (-0.04055872 0.1259462 -0.03064168)
      PathPoint quadratus_lumb_mid_L3_3_r-P3: lumbar3 (-0.02544895 0.01883535 -0.02633308)
    Thelen2003Muscle QL_mid_L2-12_1_l: max_isometric_force=9.2 optimal_fiber_length=0.04717456
        tendon_slack_length=0.02450286 pennation_angle_at_optimal=0.1291544
      PathPoint P1: torso (-0.0405543 0.1259462 -0.03064168)
      PathPoint P1_0: lumbar2 (-0.02524214 0.0146452 -0.02220716)
    Thelen2003Muscle QL_mid_L4-12_3_l: max_isometric_force=5.4 optimal_fiber_length=0.07422428
        tendon_slack_length=0.0385527 pennation_angle_at_optimal=0.1291544
      PathPoint quadratus_lumb_mid_L4_1_r-P1: torso (-0.04104796 0.1103415 -0.05076164)
      PathPoint quadratus_lumb_mid_L4_1_r-P2: lumbar4 (-0.01853414 0.02661045 -0.02432213)
    Thelen2003Muscle QL_ant_I_2-T12_l: max_isometric_force=7.1 optimal_fiber_length=0.09962607
        tendon_slack_length=0.051746 pennation_angle_at_optimal=0.1291544
      PathPoint I_2_l-P1: pelvis (-0.1059918 0.08099375 -0.06299514)
      PathPoint T12_l-P2: torso (-0.0098242 0.128697 -0.01866598)
    Thelen2003Muscle QL_ant_I_3-T12_l: max_isometric_force=13.34 optimal_fiber_length=0.09829576
        tendon_slack_length=0.05105563 pennation_angle_at_optimal=0.1291544
      PathPoint I_3_l-P1: pelvis (-0.09799244 0.08899313 -0.06599491)
      PathPoint T12_l-P2: torso (-0.0098242 0.128697 -0.01866598)
    Thelen2003Muscle QL_ant_I_2-12_1_l: max_isometric_force=4.7 optimal_fiber_length=0.09453043
        tendon_slack_length=0.04909988 pennation_angle_at_optimal=0.1291544
      PathPoint I_2_l-P2: pelvis (-0.1059918 0.08099375 -0.06299514)
      PathPoint 12.1_l-P3: torso (-0.04027922 0.1159256 -0.04224406)
    Thelen2003Muscle QL_ant_I_3-12_1_l: max_isometric_force=8.9 optimal_fiber_length=0.09344678
        tendon_slack_length=0.04853703 pennation_angle_at_optimal=0.1291544
      PathPoint I_3_l-P1: pelvis (-0.09799244 0.08899313 -0.06599491)
      PathPoint 12.1_l-P2: torso (-0.0392968 0.1218201 -0.03634954)
    Thelen2003Muscle QL_ant_I_3-12_2_l: max_isometric_force=5.9 optimal_fiber_length=0.08767841
        tendon_slack_length=0.04554089 pennation_angle_at_optimal=0.1291544
      PathPoint I_3_l-P1: pelvis (-0.09799244 0.08899313 -0.06599491)
      PathPoint 12.2_l-P2: torso (-0.03953258 0.115788 -0.04526991)
    Thelen2003Muscle QL_ant_I_3-12_3_l: max_isometric_force=6.8 optimal_fiber_length=0.08176337
        tendon_slack_length=0.04242508 pennation_angle_at_optimal=0.1291544
      PathPoint I_3_l-P2: pelvis (-0.09799244 0.08899313 -0.06599491)
      PathPoint 12.3_l-P3: torso (-0.03733196 0.1090486 -0.0540331)
    Thelen2003Muscle MF_m1s_l: max_isometric_force=18.4 optimal_fiber_length=0.04060594 tendon_slack_length=0.01688196
        pennation_angle_at_optimal=0
      PathPoint P1: lumbar4 (-0.02860407 0.02773728 -0.01473543)
      PathPoint P2: lumbar1 (-0.03207123 -0.01126827 -0.00260037)
    Thelen2003Muscle MF_m1t_1_l: max_isometric_force=19.32 optimal_fiber_length=0.06515548
        tendon_slack_length=0.0195371 pennation_angle_at_optimal=0
      PathPoint P1: lumbar5 (-0.01615237 0.03204497 -0.01524684)
      PathPoint P2: lumbar1 (-0.03813876 -0.01387263 -0.002687049)
    Thelen2003Muscle MF_m1t_2_l: max_isometric_force=16.56 optimal_fiber_length=0.08003103
        tendon_slack_length=0.02399756 pennation_angle_at_optimal=0
      PathPoint P1: sacrum (-0.1214237 0.08397638 -0.02099995)
      PathPoint P2: lumbar1 (-0.03813876 -0.01386864 -0.002687049)
    Thelen2003Muscle MF_m1t_3_l: max_isometric_force=27.66 optimal_fiber_length=0.09120152 tendon_slack_length=0.027346
        pennation_angle_at_optimal=0
      PathPoint P1: pelvis (-0.1319898 0.05399583 -0.0479963)
      PathPoint P2: lumbar1 (-0.03813876 -0.01386864 -0.002687049)
    Thelen2003Muscle MF_m2s_l: max_isometric_force=17.94 optimal_fiber_length=0.03935001 tendon_slack_length=0.01522576
        pennation_angle_at_optimal=0
      PathPoint P1: lumbar5 (-0.0173358 0.0346716 -0.01370395)
      PathPoint P2: lumbar2 (-0.03553839 -0.01040148 -0.00346716)
    Thelen2003Muscle MF_m2t_1_l: max_isometric_force=17.94 optimal_fiber_length=0.0538978
        tendon_slack_length=0.01638589 pennation_angle_at_optimal=0
      PathPoint P1: sacrum (-0.1207577 0.08521788 -0.02199994)
      PathPoint P2: lumbar2 (-0.03900555 -0.01594027 -0.003155116)
    Thelen2003Muscle MF_m2t_2_l: max_isometric_force=45.54 optimal_fiber_length=0.07342315 tendon_slack_length=0.022322
        pennation_angle_at_optimal=0
      PathPoint P1: pelvis (-0.1339897 0.04899622 -0.04699637)
      PathPoint P2: lumbar2 (-0.03900555 -0.01594027 -0.003155116)
    Thelen2003Muscle MF_m2t_3_l: max_isometric_force=45.54 optimal_fiber_length=0.08391902
        tendon_slack_length=0.02551291 pennation_angle_at_optimal=0
      PathPoint P1: pelvis (-0.1369894 0.03599722 -0.04499653)
      PathPoint P2: lumbar2 (-0.03813876 -0.01624217 -0.003155116)
    Thelen2003Muscle MF_m3s_l: max_isometric_force=24.84 optimal_fiber_length=0.03383388 tendon_slack_length=0.01406645
        pennation_angle_at_optimal=0
      PathPoint P1: sacrum (-0.1215107 0.08363558 -0.01899995)
      PathPoint P2: lumbar3 (-0.03120444 -0.00520074 -0.00260037)
    Thelen2003Muscle MF_m3t_1_l: max_isometric_force=24 optimal_fiber_length=0.09771973 tendon_slack_length=0.03253798
        pennation_angle_at_optimal=0
      PathPoint P1: pelvis (-0.1539881 0.001999846 -0.01599877)
      PathPoint P2: lumbar3 (-0.04160592 -0.008863101 -0.002522359)
    Thelen2003Muscle MF_m3t_2_l: max_isometric_force=24 optimal_fiber_length=0.08027761 tendon_slack_length=0.02673022
        pennation_angle_at_optimal=0
      PathPoint P1: pelvis (-0.1469887 0.02099838 -0.02184831)
      PathPoint P2: lumbar3 (-0.04160592 -0.008867262 -0.002305661)
    Thelen2003Muscle MF_m3t_3_l: max_isometric_force=24 optimal_fiber_length=0.08027761 tendon_slack_length=0.02673022
        pennation_angle_at_optimal=0
      PathPoint P1: pelvis (-0.1469887 0.02099838 -0.02184831)
      PathPoint P2: lumbar3 (-0.04160592 -0.008867262 -0.002305661)
    Thelen2003Muscle MF_m4s_l: max_isometric_force=24 optimal_fiber_length=0.03563023 tendon_slack_length=0.0225452
        pennation_angle_at_optimal=0
      PathPoint P1: sacrum (-0.1436886 0.05470976 -0.01799995)
      PathPoint P2: lumbar4 (-0.03120444 -0.0001865505 -0.00173358)
    Thelen2003Muscle MF_m4t_1_l: max_isometric_force=21.4 optimal_fiber_length=0.05290531
        tendon_slack_length=0.02144556 pennation_angle_at_optimal=0
      PathPoint P1: sacrum (-0.1519996 0.04199989 -0.01499996)
      PathPoint P2: lumbar4 (-0.03727197 0 -0.00260037)
    Thelen2003Muscle MF_m4t_2_l: max_isometric_force=21.4 optimal_fiber_length=0.07146077
        tendon_slack_length=0.02896704 pennation_angle_at_optimal=0
      PathPoint P1: pelvis (-0.1509884 0.007999383 -0.01599877)
      PathPoint P2: lumbar4 (-0.03813876 0.0001473543 -0.002496355)
    Thelen2003Muscle MF_m4t_3_l: max_isometric_force=21.4 optimal_fiber_length=0.0830855 tendon_slack_length=0.03367929
        pennation_angle_at_optimal=0
      PathPoint P1: pelvis (-0.1599877 -0.003999691 -0.01399892)
      PathPoint P2: lumbar4 (-0.03822544 0.0001473543 -0.00260037)
    Thelen2003Muscle MF_m5s_l: max_isometric_force=10.35 optimal_fiber_length=0.01378789
        tendon_slack_length=0.006101878 pennation_angle_at_optimal=0
      PathPoint P1: sacrum (-0.1304547 0.06627013 -0.01199997)
      PathPoint P2: lumbar5 (-0.02687049 0.01473543 -0.00346716)
    Thelen2003Muscle MF_m5t_1_l: max_isometric_force=10.35 optimal_fiber_length=0.07612205
        tendon_slack_length=0.03085666 pennation_angle_at_optimal=0
      PathPoint P1: sacrum (-0.1740665 0.005229206 -0.01002997)
      PathPoint P2: lumbar5 (-0.03077971 0.01461668 -0.002539695)
    Thelen2003Muscle MF_m5t_2_l: max_isometric_force=10.35 optimal_fiber_length=0.05708385
        tendon_slack_length=0.02314006 pennation_angle_at_optimal=0
      PathPoint P1: sacrum (-0.1631156 0.02566173 -0.01170997)
      PathPoint P2: lumbar5 (-0.02994898 0.01380684 -0.002539695)
    Thelen2003Muscle MF_m5t_3_l: max_isometric_force=10.35 optimal_fiber_length=0.04062934
        tendon_slack_length=0.007147135 pennation_angle_at_optimal=0
      PathPoint P1: sacrum (-0.1522756 0.04258429 -0.01159997)
      PathPoint P2: lumbar5 (-0.02845047 0.01321595 -0.002401008)
    Thelen2003Muscle MF_m1_laminar_l: max_isometric_force=8.85 optimal_fiber_length=0.02712186
        tendon_slack_length=0.01029911 pennation_angle_at_optimal=0
      PathPoint P1: lumbar3 (-0.0346716 0.02190378 -0.01560222)
      PathPoint P2: lumbar1 (-0.03033765 -0.004858575 -0.00693432)
    Thelen2003Muscle MF_m2_laminar_l: max_isometric_force=10.2 optimal_fiber_length=0.0233355
        tendon_slack_length=0.008860709 pennation_angle_at_optimal=0
      PathPoint P1: lumbar4 (-0.02860407 0.02904067 -0.01468342)
      PathPoint P2: lumbar2 (-0.03120444 -0.00520074 -0.00606753)
    Thelen2003Muscle MF_m3_laminar_l: max_isometric_force=10.615 optimal_fiber_length=0.02267523
        tendon_slack_length=0.008609825 pennation_angle_at_optimal=0
      PathPoint P1: lumbar5 (-0.01906938 0.03380481 -0.01401599)
      PathPoint P2: lumbar3 (-0.03293802 0.00086679 -0.00520074)
    Thelen2003Muscle MF_m4_laminar_l: max_isometric_force=7.7 optimal_fiber_length=0.02559303
        tendon_slack_length=0.009717512 pennation_angle_at_optimal=0
      PathPoint P1: sacrum (-0.1279997 0.0774877 -0.01799995)
      PathPoint P2: lumbar4 (-0.02947086 0.005039032 -0.006015523)
    Thelen2003Muscle MF_m5_laminar_l: max_isometric_force=16.6 optimal_fiber_length=0.02631451
        tendon_slack_length=0.009991307 pennation_angle_at_optimal=0
      PathPoint P1: pelvis (-0.1379894 0.04499653 -0.01237905)
      PathPoint P2: lumbar5 (-0.02513691 0.01560222 -0.004888696)
    Thelen2003Muscle IL_L1_l: max_isometric_force=97.275 optimal_fiber_length=0.04596164 tendon_slack_length=0.09720662
        pennation_angle_at_optimal=0.2408554
      PathPoint P1: pelvis (-0.1439889 0.03899699 -0.04999614)
      PathPoint P2: lumbar1 (-0.02687049 0.01473543 -0.02513691)
      PathWrap: wrap_object=Cylinder2 method=hybrid
    Thelen2003Muscle IL_L2_l: max_isometric_force=138.1305 optimal_fiber_length=0.03318296
        tendon_slack_length=0.07028269 pennation_angle_at_optimal=0.2408554
      PathPoint P1: pelvis (-0.1359895 0.05599568 -0.05499576)
      PathPoint P2: lumbar2 (-0.02773728 0.01126827 -0.02687049)
      PathWrap: wrap_object=Cylinder method=hybrid
    Thelen2003Muscle IL_L3_l: max_isometric_force=163.422 optimal_fiber_length=0.02259374
        tendon_slack_length=0.04785434 pennation_angle_at_optimal=0.2408554
      PathPoint P1: pelvis (-0.1219906 0.06799475 -0.05999537)
      PathPoint P2: lumbar3 (-0.02773728 0.01906938 -0.02647099)
      PathWrap: wrap_object=Cylinder method=hybrid
    Thelen2003Muscle IL_L4_l: max_isometric_force=169.2585 optimal_fiber_length=0.01555352
        tendon_slack_length=0.0329435 pennation_angle_at_optimal=0.2408554
      PathPoint P1: pelvis (-0.116991 0.06499499 -0.05599568)
      PathPoint P2: lumbar4 (-0.02060065 0.02389203 -0.02687049)
      PathWrap: wrap_object=Cylinder method=hybrid
    Thelen2003Muscle IL_R5_l: max_isometric_force=21.4005 optimal_fiber_length=0.1507695 tendon_slack_length=0.2110529
        pennation_angle_at_optimal=0.2408554
      PathPoint IL_r5_R-P1: pelvis (-0.1358975 0.04383452 -0.04898072)
      PathPoint IL_r5_R-P2: lumbar2 (-0.04301861 0.001830088 -0.04854024)
      PathPoint IL_r5_R-P2_0: torso (-0.07662876 0.1689762 -0.05599794)
      PathPoint IL_r5_R-P3: torso (-0.0785936 0.196484 -0.05599794)
      PathPoint IL_r5_R-P4: torso (-0.07957602 0.2328335 -0.05698036)
      PathPoint IL_r5_R-P5: torso (-0.07761118 0.2603413 -0.05796278)
      PathPoint IL_r5_R-P6: torso (-0.07466392 0.2819545 -0.05796278)
      PathPoint IL_r5_R-P7: torso (-0.0687694 0.3025854 -0.0589452)
      PathWrap: wrap_object=Cylinder2 method=hybrid
    Thelen2003Muscle IL_R6_l: max_isometric_force=27.237 optimal_fiber_length=0.1441229 tendon_slack_length=0.1743065
        pennation_angle_at_optimal=0.2408554
      PathPoint IL_r6_R-P1: pelvis (-0.1287121 0.05865697 -0.05297121)
      PathPoint IL_r6_R-P2: lumbar2 (-0.04265846 0.00173358 -0.05027382)
      PathPoint IL_r6_R-P2_0: torso (-0.07761118 0.168878 -0.0589452)
      PathPoint IL_r6_R-P3: torso (-0.07761118 0.1984488 -0.0589452)
      PathPoint IL_r6_R-P4: torso (-0.0785936 0.2357808 -0.05992762)
      PathPoint IL_r6_R-P5: torso (-0.07564634 0.2632886 -0.06091004)
      PathPoint IL_r6_R-P6: torso (-0.06975182 0.2770424 -0.06189246)
      PathWrap: wrap_object=Cylinder2 method=hybrid
    Thelen2003Muscle IL_R7_l: max_isometric_force=35.019 optimal_fiber_length=0.1502197 tendon_slack_length=0.1488241
        pennation_angle_at_optimal=0.2408554
      PathPoint IL_r7_R-P1: pelvis (-0.1189008 0.06926046 -0.05807062)
      PathPoint IL_r7_R-P2: lumbar2 (-0.04218225 0.002057647 -0.05287419)
      PathPoint IL_r7_R-P2_0: torso (-0.0785936 0.1689762 -0.06189246)
      PathPoint IL_r7_R-P3: torso (-0.0785936 0.1974664 -0.06189246)
      PathPoint IL_r7_R-P4: torso (-0.07957602 0.2347984 -0.06287488)
      PathPoint IL_r7_R-P5: torso (-0.0736815 0.2564116 -0.0638573)
    Thelen2003Muscle IL_R8_l: max_isometric_force=31.128 optimal_fiber_length=0.1345611 tendon_slack_length=0.1265416
        pennation_angle_at_optimal=0.2408554
      PathPoint IL_r8_R-P1: pelvis (-0.1209907 0.07099452 -0.05999537)
      PathPoint IL_r8_R-P2: lumbar2 (-0.04160592 0.002474893 -0.05547456)
      PathPoint IL_r8_R-P2_0: torso (-0.07761118 0.1640641 -0.0638573)
      PathPoint IL_r8_R-P3: torso (-0.07957602 0.1974664 -0.0638573)
      PathPoint IL_r8_R-P4: torso (-0.07761118 0.2249742 -0.06483972)
    Thelen2003Muscle IL_R9_l: max_isometric_force=44.7465 optimal_fiber_length=0.1496764 tendon_slack_length=0.08074244
        pennation_angle_at_optimal=0.2408554
      PathPoint IL_r9_R-P1: pelvis (-0.1189908 0.07499421 -0.05999537)
      PathPoint IL_r9_R-P2: lumbar2 (-0.04191138 0.002300989 -0.05720814)
      PathPoint IL_r9_R-P2_0: torso (-0.07662876 0.1611169 -0.06680456)
      PathPoint IL_r9_R-P3: torso (-0.07466392 0.1896071 -0.06680456)
    Thelen2003Muscle IL_R10_l: max_isometric_force=89.493 optimal_fiber_length=0.1253577 tendon_slack_length=0.06624136
        pennation_angle_at_optimal=0.2408554
      PathPoint IL_r10_R-P1: pelvis (-0.1159911 0.07599414 -0.06199522)
      PathPoint IL_r10_R-P2: lumbar2 (-0.04168246 0.002276919 -0.05980851)
      PathPoint IL_r10_R-P2_0: torso (-0.07363975 0.1522751 -0.0687694)
    Thelen2003Muscle IL_R11_l: max_isometric_force=110.8935 optimal_fiber_length=0.1105169
        tendon_slack_length=0.04818577 pennation_angle_at_optimal=0.2408554
      PathPoint IL_r11_R-P1: pelvis (-0.1129913 0.07899391 -0.06399506)
      PathPoint IL_r11_R-P2: lumbar2 (-0.04156007 0.002343254 -0.06240888)
      PathPoint IL_r11_R-P2_0: torso (-0.06134201 0.1228025 -0.07269908)
    Thelen2003Muscle IL_R12_l: max_isometric_force=132.294 optimal_fiber_length=0.08320572
        tendon_slack_length=0.03418914 pennation_angle_at_optimal=0.2408554
      PathPoint IL_r12_R-P1: pelvis (-0.1109914 0.08193838 -0.06655767)
      PathPoint IL_r12_R-P2: torso (-0.03144943 0.09368347 -0.06582214)
    Thelen2003Muscle LTpT_T1_l: max_isometric_force=25.2915 optimal_fiber_length=0.1040197
        tendon_slack_length=0.2459695 pennation_angle_at_optimal=0.2199115
      PathPoint LTpT_t1_R-P1: lumbar1 (-0.04160592 -0.01126827 -0.002782396)
      PathPoint LTpT_t1_R-P2: torso (-0.049121 0.3978801 -0.02569028)
      PathWrap: wrap_object=Chest_l method=hybrid
    Thelen2003Muscle LTpT_T2_l: max_isometric_force=50.583 optimal_fiber_length=0.1061916 tendon_slack_length=0.2556964
        pennation_angle_at_optimal=0.2199115
      PathPoint LTpT_t2_R-P1: lumbar2 (-0.04073913 -0.01213506 -0.00346716)
      PathPoint LTpT_t2_R-P2: torso (-0.0540331 0.3792141 -0.02607343)
      PathWrap: wrap_object=Chest_l method=hybrid
    Thelen2003Muscle LTpT_T3_l: max_isometric_force=50.583 optimal_fiber_length=0.105912 tendon_slack_length=0.2545142
        pennation_angle_at_optimal=0.2199115
      PathPoint LTpT_t3_R-P1: lumbar3 (-0.04247271 -0.00346716 -0.003527835)
      PathPoint LTpT_t3_R-P2: lumbar1 (-0.03216658 -0.0121524 -0.00433395)
      PathPoint LTpT_t3_R-P2_0: torso (-0.05992762 0.3585833 -0.02552327)
      PathWrap: wrap_object=Chest_l method=hybrid
    Thelen2003Muscle LTpT_T4_l: max_isometric_force=19.455 optimal_fiber_length=0.1050298 tendon_slack_length=0.2524414
        pennation_angle_at_optimal=0.2199115
      PathPoint LTpT_t4_R-P1: lumbar4 (-0.04247271 0.006119416 -0.002444348)
      PathPoint LTpT_t4_R-P2: lumbar1 (-0.03216909 -0.01215647 -0.005304755)
      PathPoint LTpT_t4_R-P2_0: torso (-0.0687694 0.3369701 -0.02569028)
      PathWrap: wrap_object=Chest_l method=hybrid
    Thelen2003Muscle LTpT_T5_l: max_isometric_force=19.455 optimal_fiber_length=0.09904202
        tendon_slack_length=0.2380115 pennation_angle_at_optimal=0.2199115
      PathPoint LTpT_t5_R-P1: lumbar4 (-0.04099925 0.003440853 -6.93432e-5)
      PathPoint LTpT_t5_R-P2: lumbar2 (-0.03813876 0.003813876 -0.005547456)
      PathPoint LTpT_t5_R-P2_0: torso (-0.07269908 0.3143744 -0.02758635)
      PathWrap: wrap_object=Chest_l method=hybrid
    Thelen2003Muscle LTpT_T6_l: max_isometric_force=29.1825 optimal_fiber_length=0.1007849
        tendon_slack_length=0.2306489 pennation_angle_at_optimal=0.2199115
      PathPoint LTpT_t6_R-P1: lumbar5 (-0.03293802 0.01560222 -0.0001820259)
      PathPoint LTpT_t6_R-P2: lumbar2 (-0.03813876 0.003813876 -0.00780111)
      PathPoint LTpT_t6_R-P3: torso (-0.07171666 0.1866598 -0.01519804)
      PathPoint LTpT_t6_R-P2_0: torso (-0.0785936 0.2888315 -0.02717374)
    Thelen2003Muscle LTpT_T7_l: max_isometric_force=35.019 optimal_fiber_length=0.1148321 tendon_slack_length=0.2170713
        pennation_angle_at_optimal=0.2199115
      PathPoint LTpT_t7_R-P1: sacrum (-0.1313167 0.06051254 -0.0002799993)
      PathPoint LTpT_t7_R-P2: lumbar2 (-0.03813009 0.003813876 -0.00953469)
      PathPoint LTpT_t7_R-P3: torso (-0.07171666 0.1876422 -0.01866598)
      PathPoint LTpT_t7_R-P2_0: torso (-0.0785936 0.2623061 -0.02554292)
    Thelen2003Muscle LTpT_T8_l: max_isometric_force=56.4195 optimal_fiber_length=0.1228364
        tendon_slack_length=0.1944503 pennation_angle_at_optimal=0.2199115
      PathPoint LTpT_t8_R-P1: sacrum (-0.1429006 0.05024547 -0.000369999)
      PathPoint LTpT_t8_R-P2: lumbar4 (-0.04071651 0.01564062 -0.004906031)
      PathPoint LTpT_t8_R-P3: lumbar3 (-0.04052226 0.01174145 -0.007211693)
      PathPoint LTpT_t8_R-P2_0: lumbar2 (-0.03927937 0.002688358 -0.009482683)
      PathPoint LTpT_t8_R-P2_1: torso (-0.07761118 0.2367632 -0.02505171)
    Thelen2003Muscle LTpT_T9_l: max_isometric_force=66.147 optimal_fiber_length=0.1218425 tendon_slack_length=0.2065032
        pennation_angle_at_optimal=0.2199115
      PathPoint LTpT_t9_R-P1: sacrum (-0.1658216 0.02683513 0)
      PathPoint LTpT_t9_R-P2: lumbar4 (-0.04049643 0.01556755 -0.006483589)
      PathPoint LTpT_t9_R-P3: lumbar3 (-0.04024463 0.01200799 -0.008399195)
      PathPoint LTpT_t9_R-P3_0: lumbar2 (-0.03875964 0.003010396 -0.01040148)
      PathPoint LTpT_t9_R-P2_0: torso (-0.0736815 0.2180972 -0.02357808)
    Thelen2003Muscle LTpT_T10_l: max_isometric_force=71.9835 optimal_fiber_length=0.1099588
        tendon_slack_length=0.1680304 pennation_angle_at_optimal=0.2199115
      PathPoint LTpT_t10_R-P1: sacrum (-0.1644626 0.02456104 -0.01071997)
      PathPoint LTpT_t10_R-P2: lumbar4 (-0.04049643 0.01556755 -0.01088688)
      PathPoint LTpT_t10_R-P2_0: lumbar3 (-0.03995902 0.01216106 -0.01249044)
      PathPoint LTpT_t10_R-P3: lumbar2 (-0.03813876 0.00292975 -0.01321855)
      PathPoint LTpT_t10_R-P2_1: torso (-0.06680456 0.1896071 -0.01768356)
    Thelen2003Muscle LTpT_T11_l: max_isometric_force=73.929 optimal_fiber_length=0.09580004
        tendon_slack_length=0.146008 pennation_angle_at_optimal=0.2199115
      PathPoint LTpT_t11_R-P1: sacrum (-0.1576486 0.03070932 -0.02403994)
      PathPoint LTpT_t11_R-P2: lumbar4 (-0.04049643 0.01473543 -0.01901737)
      PathPoint LTpT_t11_R-P3: lumbar3 (-0.04346796 0.01169196 -0.01809858)
      PathPoint LTpT_t11_R-P2_0: lumbar2 (-0.03987234 0.00292975 -0.01718845)
      PathPoint LTpT_t11_R-P2_1: torso (-0.05980875 0.158875 -0.01731024)
    Thelen2003Muscle LTpT_T12_l: max_isometric_force=62.256 optimal_fiber_length=0.07566958
        tendon_slack_length=0.1153272 pennation_angle_at_optimal=0.2199115
      PathPoint LTpT_t12_R-P1: sacrum (-0.1447596 0.04879987 -0.02799993)
      PathPoint LTpT_t12_R-P2: lumbar4 (-0.04049643 0.01473543 -0.02166975)
      PathPoint LTpT_t12_R-P3: lumbar3 (-0.04279117 0.01218395 -0.02080296)
      PathPoint LTpT_t12_R-P2_0: lumbar2 (-0.03970141 0.003452711 -0.01993617)
      PathPoint LTpT_t12_R-P2_1: torso (-0.05010342 0.1306619 -0.01768356)
    Thelen2003Muscle LTpT_R4_l: max_isometric_force=19.455 optimal_fiber_length=0.1335222 tendon_slack_length=0.2034994
        pennation_angle_at_optimal=0.2199115
      PathPoint LTpT_r4_R-P1: lumbar4 (-0.0433395 0.00606753 -0.002444348)
      PathPoint LTpT_r4_R-P2: lumbar2 (-0.0433395 0.00433395 -0.009950749)
      PathPoint LTpT_r4_R-P2_0: torso (-0.07171666 0.1866598 -0.02554292)
      PathPoint LTpT_r4_R-P3: torso (-0.07269908 0.2112203 -0.02807756)
      PathPoint LTpT_r4_R-P4: torso (-0.07269908 0.2387281 -0.03057291)
      PathPoint LTpT_r4_R-P5: torso (-0.07171666 0.2682007 -0.03293072)
      PathPoint LTpT_r4_R-P6: torso (-0.0638573 0.3359876 -0.0377151)
    Thelen2003Muscle LTpT_R5_l: max_isometric_force=19.455 optimal_fiber_length=0.1250144 tendon_slack_length=0.1905325
        pennation_angle_at_optimal=0.2199115
      PathPoint LTpT_r5_R-P1: lumbar4 (-0.04247271 0.003440853 -6.93432e-5)
      PathPoint LTpT_r5_R-P2: lumbar2 (-0.04247271 0.01213506 -0.01230842)
      PathPoint LTpT_r5_R-P2_0: torso (-0.07466392 0.184695 -0.02938418)
      PathPoint LTpT_r5_R-P3: torso (-0.0736815 0.2092555 -0.03140797)
      PathPoint LTpT_r5_R-P4: torso (-0.07466392 0.2387281 -0.03403103)
      PathPoint LTpT_r5_R-P5: torso (-0.07269908 0.2662358 -0.03587798)
      PathPoint LTpT_r5_R-P6: torso (-0.0638573 0.3074975 -0.03850104)
    Thelen2003Muscle LTpT_R6_l: max_isometric_force=29.1825 optimal_fiber_length=0.1327504
        tendon_slack_length=0.1807509 pennation_angle_at_optimal=0.2199115
      PathPoint LTpT_r6_R-P1: lumbar5 (-0.03293802 0.0173358 -0.0001820259)
      PathPoint LTpT_r6_R-P2: lumbar3 (-0.0433395 0.01277094 -0.009396004)
      PathPoint LTpT_r6_R-P2_0: lumbar2 (-0.03987234 0.003813876 -0.01213506)
      PathPoint LTpT_r6_R-P2_1: torso (-0.07466392 0.1837125 -0.03045502)
      PathPoint LTpT_r6_R-P3: torso (-0.07466392 0.2092555 -0.03405068)
      PathPoint LTpT_r6_R-P4: torso (-0.07564634 0.2377456 -0.03669339)
      PathPoint LTpT_r6_R-P5: torso (-0.07171666 0.2662358 -0.03882524)
      PathPoint LTpT_r6_R-P6: torso (-0.06778698 0.2849018 -0.03939504)
    Thelen2003Muscle LTpT_R7_l: max_isometric_force=35.019 optimal_fiber_length=0.1258548 tendon_slack_length=0.1886661
        pennation_angle_at_optimal=0.2199115
      PathPoint LTpT_r7_R-P1: sacrum (-0.1313197 0.06099984 -0.0002799993)
      PathPoint LTpT_r7_R-P2: lumbar4 (-0.0404966 0.01646901 -0.00693432)
      PathPoint LTpT_r7_R-P2_0: lumbar3 (-0.03995945 0.01213506 -0.01114692)
      PathPoint LTpT_r7_R-P2_1: lumbar2 (-0.03813009 0.00346716 -0.01496946)
      PathPoint LTpT_r7_R-P2_2: torso (-0.07662876 0.1817477 -0.03486609)
      PathPoint LTpT_r7_R-P3: torso (-0.07761118 0.2072906 -0.03889401)
      PathPoint LTpT_r7_R-P4: torso (-0.07564634 0.2387281 -0.04150724)
      PathPoint LTpT_r7_R-P5: torso (-0.07269908 0.264271 -0.04256826)
    Thelen2003Muscle LTpT_R8_l: max_isometric_force=56.4195 optimal_fiber_length=0.1033775
        tendon_slack_length=0.1933509 pennation_angle_at_optimal=0.2199115
      PathPoint LTpT_r8_R-P1: sacrum (-0.1428996 0.05024987 -0.000369999)
      PathPoint LTpT_r8_R-P2: lumbar4 (-0.0403307 0.01570936 -0.009872738)
      PathPoint LTpT_r8_R-P2_0: lumbar3 (-0.03980716 0.01170574 -0.01390331)
      PathPoint LTpT_r8_R-P2_1: lumbar2 (-0.03813009 0.003363145 -0.01780387)
      PathPoint LTpT_r8_R-P2_2: torso (-0.07761118 0.1817477 -0.03999432)
      PathPoint LTpT_r8_R-P3: torso (-0.07761118 0.2053258 -0.0429514)
      PathPoint LTpT_r8_R-P4: torso (-0.07466392 0.233816 -0.04553517)
    Thelen2003Muscle LTpT_R9_l: max_isometric_force=66.147 optimal_fiber_length=0.08971568
        tendon_slack_length=0.2038801 pennation_angle_at_optimal=0.2199115
      PathPoint LTpT_r9_R-P1: sacrum (-0.1658196 0.02683993 0)
      PathPoint LTpT_r9_R-P2: lumbar4 (-0.0404966 0.01532606 -0.0129065)
      PathPoint LTpT_r9_R-P2_0: lumbar3 (-0.03995945 0.01128864 -0.01697175)
      PathPoint LTpT_r9_R-P2_1: lumbar2 (-0.03813053 0.003412301 -0.02096765)
      PathPoint LTpT_r9_R-P2_2: torso (-0.07761118 0.1797829 -0.04259773)
      PathPoint LTpT_r9_R-P3: torso (-0.07564634 0.1994313 -0.04617374)
    Thelen2003Muscle LTpT_R10_l: max_isometric_force=71.9835 optimal_fiber_length=0.1051224
        tendon_slack_length=0.162405 pennation_angle_at_optimal=0.2199115
      PathPoint LTpT_r10_R-P1: sacrum (-0.1644596 0.02455994 -0.01071997)
      PathPoint LTpT_r10_R-P2: lumbar4 (-0.0404491 0.01461763 -0.0168504)
      PathPoint LTpT_r10_R-P2_0: lumbar3 (-0.03991169 0.0109857 -0.02032623)
      PathPoint LTpT_r10_R-P2_1: lumbar2 (-0.03808294 0.003160689 -0.02368937)
      PathPoint LTpT_r10_R-P2_2: torso (-0.07564634 0.1729059 -0.04617374)
    Thelen2003Muscle LTpT_R11_l: max_isometric_force=73.929 optimal_fiber_length=0.1022443 tendon_slack_length=0.128464
        pennation_angle_at_optimal=0.2199115
      PathPoint LTpT_r11_R-P1: sacrum (-0.1576496 0.03070992 -0.02403994)
      PathPoint LTpT_r11_R-P2: lumbar4 (-0.03995902 0.01556755 -0.02550096)
      PathPoint LTpT_r11_R-P3: lumbar3 (-0.03995902 0.01207768 -0.02824002)
      PathPoint LTpT_r11_R-P4: lumbar2 (-0.03815939 0.003883219 -0.03083172)
      PathPoint LTpT_r11_R-P2_0: torso (-0.06387852 0.1450602 -0.04475906)
    Thelen2003Muscle LTpT_R12_l: max_isometric_force=62.256 optimal_fiber_length=0.0614254
        tendon_slack_length=0.1193574 pennation_angle_at_optimal=0.2199115
      PathPoint LTpT_r12_R-P1: sacrum (-0.1447596 0.04899987 -0.02799993)
      PathPoint LTpT_r12_R-P2: lumbar4 (-0.04073913 0.01560222 -0.02947086)
      PathPoint LTpT_r12_R-P2_0: lumbar3 (-0.03995902 0.0118264 -0.03109176)
      PathPoint LTpT_r12_R-P2_1: lumbar2 (-0.03813876 0.003813876 -0.03364879)
      PathPoint LTpT_r12_R-P2_2: torso (-0.04424338 0.1178904 -0.04617374)
      PathWrap: wrap_object=Cylinder2 method=hybrid
    Thelen2003Muscle LTpL_L5_l: max_isometric_force=103.1115 optimal_fiber_length=0.05126146
        tendon_slack_length=0.0009959871 pennation_angle_at_optimal=0.2199115
      PathPoint P1: sacrum (-0.1389996 0.06299984 -0.04599988)
      PathPoint P2: lumbar5 (-0.01126827 0.02513691 -0.02253654)
    Thelen2003Muscle LTpL_L4_l: max_isometric_force=99.2205 optimal_fiber_length=0.03685283
        tendon_slack_length=0.03982028 pennation_angle_at_optimal=0.2199115
      PathPoint P1: pelvis (-0.1329897 0.04099684 -0.0479963)
      PathPoint P2: lumbar4 (-0.01993617 0.02340333 -0.02166975)
    Thelen2003Muscle LTpL_L3_l: max_isometric_force=91.4385 optimal_fiber_length=0.05039305
        tendon_slack_length=0.05473811 pennation_angle_at_optimal=0.2199115
      PathPoint P1: pelvis (-0.1399892 0.04099684 -0.05099607)
      PathPoint P2: lumbar3 (-0.0260037 0.01993617 -0.01993617)
    Thelen2003Muscle LTpL_L2_l: max_isometric_force=81.711 optimal_fiber_length=0.06141482
        tendon_slack_length=0.06744996 pennation_angle_at_optimal=0.2199115
      PathPoint P1: pelvis (-0.141989 0.03699715 -0.05299591)
      PathPoint P2: lumbar2 (-0.0260037 0.01213506 -0.01906938)
    Thelen2003Muscle LTpL_L1_l: max_isometric_force=70.038 optimal_fiber_length=0.07294069
        tendon_slack_length=0.08472501 pennation_angle_at_optimal=0.2199115
      PathPoint P1: pelvis (-0.1439889 0.03399738 -0.05399583)
      PathPoint P2: lumbar1 (-0.02773728 0.01473543 -0.01993617)
      PathWrap: wrap_object=Cylinder2 method=hybrid
    Thelen2003Muscle EO1_l: max_isometric_force=111.744 optimal_fiber_length=0.03423877 tendon_slack_length=0.05438036
        pennation_angle_at_optimal=0
      PathPoint P1: Abdomen (0.00589008 0.04712064 -0.02061528)
      PathPoint P2: torso (0.08801737 0.1676421 -0.09739574)
    Thelen2003Muscle EO2_l: max_isometric_force=132.3546 optimal_fiber_length=0.03609756 tendon_slack_length=0.05250435
        pennation_angle_at_optimal=0
      PathPoint P1: torso (0.08940022 0.1385212 -0.102938)
      PathPoint P2: Abdomen (0.00785344 0.02257864 -0.03239544)
    Thelen2003Muscle EO3_l: max_isometric_force=138.8978 optimal_fiber_length=0.0367506 tendon_slack_length=0.0445731
        pennation_angle_at_optimal=0
      PathPoint P1: torso (0.07761118 0.09922442 -0.1119959)
      PathPoint P2: Abdomen (0.006511444 -0.007491151 -0.03199305)
    Thelen2003Muscle EO4_l: max_isometric_force=134.0928 optimal_fiber_length=0.03763425 tendon_slack_length=0.04289332
        pennation_angle_at_optimal=0
      PathPoint P1: torso (0.0687694 0.08154086 -0.110031)
      PathPoint P2: Abdomen (0.006270088 -0.02313957 -0.03007907)
    Thelen2003Muscle EO5_l: max_isometric_force=155.945 optimal_fiber_length=0.04442352 tendon_slack_length=0.04864116
        pennation_angle_at_optimal=0
      PathPoint P1: torso (0.0007911703 0.1082116 -0.1096341)
      PathPoint P2: pelvis (-0.05469878 0.08152631 -0.1021501)
    Thelen2003Muscle EO6_l: max_isometric_force=226.9645 optimal_fiber_length=0.05265711 tendon_slack_length=0.0532213
        pennation_angle_at_optimal=0
      PathPoint P1: torso (-0.01080662 0.09136506 -0.098242)
      PathPoint P2: pelvis (-0.06899468 0.09299283 -0.08899313)
    Thelen2003Muscle IO1_l: max_isometric_force=123.9794 optimal_fiber_length=0.04225142 tendon_slack_length=0.06391988
        pennation_angle_at_optimal=0
      PathPoint P1: Abdomen (0.00294504 -0.04613896 -0.04319392)
      PathPoint P2: pelvis (-0.009036613 0.0246434 -0.1260093)
    Thelen2003Muscle IO2_l: max_isometric_force=150.0727 optimal_fiber_length=0.04325438 tendon_slack_length=0.06557723
        pennation_angle_at_optimal=0
      PathPoint P1: Abdomen (0.00294504 -0.02159696 -0.05104736)
      PathPoint P2: pelvis (-0.02420043 0.04850096 -0.1274132)
    Thelen2003Muscle IO3_l: max_isometric_force=151.2072 optimal_fiber_length=0.05105387 tendon_slack_length=0.07740329
        pennation_angle_at_optimal=0
      PathPoint P1: Abdomen (0.0049084 0.00687176 -0.04810232)
      PathPoint P2: pelvis (-0.03850013 0.068714 -0.116759)
    Thelen2003Muscle IO4_l: max_isometric_force=179.0459 optimal_fiber_length=0.06558025 tendon_slack_length=0.04418859
        pennation_angle_at_optimal=0
      PathPoint P1: torso (0.06450363 0.1059589 -0.1191646)
      PathPoint P2: pelvis (-0.05259394 0.08179479 -0.09964881)
    Thelen2003Muscle IO5_l: max_isometric_force=157.0833 optimal_fiber_length=0.05290144 tendon_slack_length=0.03564549
        pennation_angle_at_optimal=0
      PathPoint P1: torso (0.02975829 0.09429798 -0.1129734)
      PathPoint P2: pelvis (-0.0738701 0.09362668 -0.0790282)
    Thelen2003Muscle IO6_l: max_isometric_force=138.6115 optimal_fiber_length=0.05051684 tendon_slack_length=0.03404012
        pennation_angle_at_optimal=0
      PathPoint P1: torso (0 0.08448812 -0.098242)
      PathPoint P2: pelvis (-0.08999306 0.08799321 -0.06599491)
    Thelen2003Muscle LD_L1_l: max_isometric_force=41.4 optimal_fiber_length=0.3200896 tendon_slack_length=0.07011492
        pennation_angle_at_optimal=0
      PathPoint P1: lumbar1 (-0.03900555 -0.01126827 -0.003753201)
      PathPoint P2: humerus_l (-0.008577057 -0.01378676 -0.002431895)
      PathWrap: wrap_object=Chest_l method=hybrid
    Thelen2003Muscle LD_L2_l: max_isometric_force=41.4 optimal_fiber_length=0.3385666 tendon_slack_length=0.07416223
        pennation_angle_at_optimal=0
      PathPoint P1: lumbar2 (-0.03727197 -0.01162365 -0.003597178)
      PathPoint P2: humerus_l (-0.008579435 -0.01378676 -0.002431895)
      PathWrap: wrap_object=Chest_l method=hybrid
    Thelen2003Muscle LD_L3_l: max_isometric_force=50.6 optimal_fiber_length=0.3491499 tendon_slack_length=0.07648031
        pennation_angle_at_optimal=0
      PathPoint P1: lumbar3 (-0.03987234 -0.00346716 -0.003345809)
      PathPoint P2: humerus_l (-0.008579435 -0.01378676 -0.003914536)
      PathWrap: wrap_object=Chest_l method=hybrid
    Thelen2003Muscle LD_L4_l: max_isometric_force=50.6 optimal_fiber_length=0.3622593 tendon_slack_length=0.07935203
        pennation_angle_at_optimal=0
      PathPoint P1: lumbar4 (-0.03900555 0.00433395 -0.00400457)
      PathPoint P2: humerus_l (-0.008579435 -0.01378676 -0.002431895)
      PathWrap: wrap_object=Chest_l method=hybrid
    Thelen2003Muscle LD_L5_l: max_isometric_force=50.6 optimal_fiber_length=0.3779855 tendon_slack_length=0.07762222
        pennation_angle_at_optimal=0
      PathPoint P1: lumbar5 (-0.03120444 0.01820259 -0.003562507)
      PathPoint P2: humerus_l (-0.008579435 -0.01378676 -0.002431895)
      PathWrap: wrap_object=Chest_l method=hybrid
    Thelen2003Muscle LD_T12_l: max_isometric_force=23 optimal_fiber_length=0.2889343 tendon_slack_length=0.05933471
        pennation_angle_at_optimal=0
      PathPoint P1: humerus_l (-0.008579435 -0.01378676 -0.002431895)
      PathPoint P2: torso (-0.05108584 0.1002068 -0.004283351)
      PathWrap: wrap_object=Chest_l method=hybrid
    Thelen2003Muscle LD_T11_l: max_isometric_force=27.6 optimal_fiber_length=0.2701468 tendon_slack_length=0.05547616
        pennation_angle_at_optimal=0
      PathPoint P1: humerus_l (-0.008579435 -0.01378676 -0.002431895)
      PathPoint P2: torso (-0.06201173 0.128697 -0.003399173)
      PathWrap: wrap_object=Chest_l method=hybrid
    Thelen2003Muscle LD_T10_l: max_isometric_force=27.6 optimal_fiber_length=0.2637094 tendon_slack_length=0.04126071
        pennation_angle_at_optimal=0
      PathPoint P1: humerus_l (-0.008579435 -0.01378676 -0.002431895)
      PathPoint P2: torso (-0.06778698 0.1552224 -0.003762669)
      PathWrap: wrap_object=Chest_l method=hybrid
    Thelen2003Muscle LD_T9_l: max_isometric_force=18.4 optimal_fiber_length=0.2398703 tendon_slack_length=0.1306854
        pennation_angle_at_optimal=0
      PathPoint P1: humerus_l (-0.008579435 -0.01378676 -0.002431895)
      PathPoint P2: torso (-0.07761118 0.1905895 -0.004008274)
      PathWrap: wrap_object=Chest_l method=hybrid
    Thelen2003Muscle LD_T8_l: max_isometric_force=18.4 optimal_fiber_length=0.215627 tendon_slack_length=0.04428053
        pennation_angle_at_optimal=0
      PathPoint P1: humerus_l (-0.008579435 -0.01378676 -0.002431895)
      PathPoint P2: torso (-0.07957602 0.2112203 -0.004204758)
      PathWrap: wrap_object=Chest_l method=hybrid
    Thelen2003Muscle LD_T7_l: max_isometric_force=18.4 optimal_fiber_length=0.2060806 tendon_slack_length=0.04232021
        pennation_angle_at_optimal=0
      PathPoint P1: humerus_l (-0.008579435 -0.01378676 -0.002431895)
      PathPoint P2: torso (-0.0884178 0.2308687 -0.003998449)
      PathWrap: wrap_object=Chest_l method=hybrid
    Thelen2003Muscle LD_R12_l: max_isometric_force=18.4 optimal_fiber_length=0.2288291 tendon_slack_length=0.04699172
        pennation_angle_at_optimal=0
      PathPoint LD_l12_l-P1: humerus_l (-0.008579435 -0.01378676 -0.002431895)
      PathPoint LD_l12_l-P2: torso (-0.0442089 0.1194416 -0.04349173)
      PathWrap: wrap_object=Chest_l method=hybrid
    Thelen2003Muscle LD_R11_l: max_isometric_force=27.6 optimal_fiber_length=0.2282723 tendon_slack_length=0.0468773
        pennation_angle_at_optimal=0
      PathPoint LD_l11_l-P1: humerus_l (-0.008579435 -0.01378676 -0.003914536)
      PathPoint LD_l11_l-P2: torso (-0.06680456 0.1375388 -0.06189246)
      PathWrap: wrap_object=Chest_l method=hybrid
    Thelen2003Muscle LD_Il_l: max_isometric_force=32.2 optimal_fiber_length=0.412011 tendon_slack_length=0.01781251
        pennation_angle_at_optimal=0
      PathPoint P1: pelvis (-0.1138632 0.07412488 -0.05381515)
      PathPoint P2: humerus_l (-0.008579435 -0.01378676 -0.002431895)
      PathWrap: wrap_object=Chest_l method=hybrid
    Millard2012EquilibriumMuscle [values shared by the 78 below unless stated]: fiber_damping=0.01
        default_activation=0.01 minimum_activation=0.01
      ActiveForceLengthCurve: min_norm_active_fiber_length=0.25 transition_norm_fiber_length=0.77
          max_norm_active_fiber_length=1.9 shallow_ascending_slope=0.75 minimum_value=0
      ForceVelocityCurve: concentric_slope_at_vmax=0 concentric_slope_near_vmax=0.25 isometric_slope=5
          eccentric_slope_at_vmax=0 eccentric_slope_near_vmax=0.15 max_eccentric_velocity_force_multiplier=1.4
      FiberForceLengthCurve: strain_at_zero_force=0 strain_at_one_norm_force=0.7
      TendonForceLengthCurve
    Millard2012EquilibriumMuscle addbrev_r: max_isometric_force=625.8197 optimal_fiber_length=0.09754936
        tendon_slack_length=0.03354174 pennation_angle_at_optimal=0.1147809 [radians] ignore_tendon_compliance=true
      PathPoint P1: pelvis (-0.01909853 -0.09399275 0.01539881)
      PathPoint P2: femur_r (-0.00183506 -0.1082685 0.0228465)
      PathWrap: wrap_object=AB_at_femshaft_r method=hybrid
    Millard2012EquilibriumMuscle addlong_r: max_isometric_force=916.8 optimal_fiber_length=0.09992072
        tendon_slack_length=0.1217143 pennation_angle_at_optimal=0.1377704
      PathPoint P1: pelvis (-0.007579415 -0.08889314 0.01887854)
      PathPoint P2: femur_r (0.01033139 -0.2196292 0.0145245)
      PathWrap: wrap_object=AL_at_femshaft_r method=hybrid
    Millard2012EquilibriumMuscle addmagDist_r: max_isometric_force=597.2951 optimal_fiber_length=0.1594822
        tendon_slack_length=0.07864372 pennation_angle_at_optimal=0.194705 ignore_tendon_compliance=true
      PathPoint P1: pelvis (-0.07403429 -0.1276602 0.03981693)
      PathPoint P2: femur_r (0.01032221 -0.2408516 0.01770833)
      PathWrap: wrap_object=AMdist_at_femshaft_r method=hybrid
    Millard2012EquilibriumMuscle addmagIsch_r: max_isometric_force=597.2951 optimal_fiber_length=0.140904
        tendon_slack_length=0.1951574 pennation_angle_at_optimal=0.1680443
      PathPoint P1: pelvis (-0.08961309 -0.12975 0.04170678)
      PathPoint P2: femur_r (0.004413319 -0.3559741 -0.03003076)
      PathWrap: wrap_object=AMisch_at_condyles_r method=hybrid
    Millard2012EquilibriumMuscle addmagMid_r: max_isometric_force=597.2951 optimal_fiber_length=0.1259293
        tendon_slack_length=0.04264191 pennation_angle_at_optimal=0.2073076 ignore_tendon_compliance=true
      PathPoint P1: pelvis (-0.05265594 -0.1207407 0.0285378)
      PathPoint P2: femur_r (0.002220423 -0.1490069 0.02681023)
      PathWrap: wrap_object=AMmid_at_femshaft_r method=hybrid
    Millard2012EquilibriumMuscle addmagProx_r: max_isometric_force=597.2951 optimal_fiber_length=0.1014556
        tendon_slack_length=0.03874151 pennation_angle_at_optimal=0.3114833 ignore_tendon_compliance=true
      PathPoint P1: pelvis (-0.03097761 -0.1075417 0.01364895)
      PathPoint P2: femur_r (-0.01401068 -0.07235642 0.02937931)
      PathWrap: wrap_object=AMprox_at_femshaft_r method=hybrid
    Millard2012EquilibriumMuscle bflh_r: max_isometric_force=1313.184 optimal_fiber_length=0.0880624
        tendon_slack_length=0.2934451 pennation_angle_at_optimal=0.1759182
      PathPoint P1: pelvis (-0.103992 -0.1190908 0.05859548)
      PathPoint P2: tibia_r (-0.02943695 -0.0305725 0.02209955)
      PathPoint P3: tibia_r (-0.02506945 -0.03974425 0.02646705)
    Millard2012EquilibriumMuscle bfsh_r: max_isometric_force=557.1148 optimal_fiber_length=0.1003454
        tendon_slack_length=0.09626723 pennation_angle_at_optimal=0.2642232 ignore_tendon_compliance=true
      PathPoint P1: femur_r (0.00458765 -0.1936906 0.0214702)
      PathPoint P2: tibia_r (-0.02629235 -0.03659965 0.0277773)
      PathWrap: wrap_object=BF_at_gastroc_r method=hybrid
    Millard2012EquilibriumMuscle edl_r: max_isometric_force=603.4982 optimal_fiber_length=0.06402436
        tendon_slack_length=0.3407937 pennation_angle_at_optimal=0.2182582
      PathPoint P1: tibia_r (-0.013976 -0.1010639 0.01790675)
      PathPoint P2: tibia_r (0.0143254 -0.328436 0.0097832)
      PathPoint P3: calcn_r (0.09228598 0.0361512 0.00080336)
      PathPoint P4: calcn_r (0.1622787 0.0055231 0.0130546)
      PathPoint P5: toes_r (0.00030126 0.00471974 0.01536426)
      PathPoint P6: toes_r (0.04448606 -0.00040168 0.025105)
    Millard2012EquilibriumMuscle ehl_r: max_isometric_force=285.8675 optimal_fiber_length=0.06960457
        tendon_slack_length=0.3040968 pennation_angle_at_optimal=0.1972681
      PathPoint P1: tibia_r (-0.012229 -0.1353925 0.01650915)
      PathPoint P2: tibia_r (0.00620185 -0.2541011 0.0143254)
      PathPoint P3: tibia_r (0.01747 -0.3225836 -0.0024458)
      PathPoint P4: calcn_r (0.0974074 0.03906338 -0.02118862)
      PathPoint P5: calcn_r (0.1298431 0.03102978 -0.02580794)
      PathPoint P6: calcn_r (0.1741283 0.01395838 -0.0281176)
      PathPoint P7: toes_r (0.02992516 0.00411722 -0.0246029)
      PathPoint P8: toes_r (0.05653646 0.00341428 -0.01867812)
    Millard2012EquilibriumMuscle fdl_r: max_isometric_force=423.177 optimal_fiber_length=0.04183099
        tendon_slack_length=0.3552566 pennation_angle_at_optimal=0.2248391
      PathPoint P1: tibia_r (-0.00200905 -0.1600252 -0.0015723)
      PathPoint P2: tibia_r (-0.0153736 -0.3183908 -0.0108314)
      PathPoint P3: calcn_r (0.04378312 0.0316323 -0.0281176)
      PathPoint P4: calcn_r (0.07109736 0.01767392 -0.02641046)
      PathPoint P5: calcn_r (0.1664964 -0.00813402 0.01164872)
      PathPoint P6: toes_r (-0.00190798 -0.00783276 0.01476174)
      PathPoint P7: toes_r (0.0286197 -0.00712982 0.0215903)
      PathPoint P8: toes_r (0.04428522 -0.0060252 0.02430164)
    Millard2012EquilibriumMuscle fhl_r: max_isometric_force=907.8393 optimal_fiber_length=0.04977699
        tendon_slack_length=0.3346862 pennation_angle_at_optimal=0.2580255
      PathPoint P1: tibia_r (-0.0270785 -0.188938 0.01747)
      PathPoint P2: tibia_r (-0.0211387 -0.3206619 -0.0066386)
      PathPoint P3: calcn_r (0.03755708 0.02771592 -0.02420122)
      PathPoint P4: calcn_r (0.104236 0.00682856 -0.02570752)
      PathPoint P5: calcn_r (0.1733249 -0.00532226 -0.02701298)
      PathPoint P6: toes_r (0.0155651 -0.00642688 -0.0266113)
      PathPoint P7: toes_r (0.05643604 -0.01024284 -0.01817602)
    Millard2012EquilibriumMuscle gaslat_r: max_isometric_force=1575.059 optimal_fiber_length=0.05165814
        tendon_slack_length=0.3303926 pennation_angle_at_optimal=0.2102268
      PathPoint P1: femur_r (-0.00275259 -0.3499459 0.02541558)
      PathPoint P2: calcn_r (0.00441848 0.0311302 -0.00532226)
      PathWrap shank: wrap_object=GasLat_at_shank_r method=hybrid
      PathWrap condyles: wrap_object=Gastroc_at_condyles_r method=hybrid
    Millard2012EquilibriumMuscle gasmed_r: max_isometric_force=3115.515 optimal_fiber_length=0.04483965
        tendon_slack_length=0.3505549 pennation_angle_at_optimal=0.1656816
      PathPoint P1: femur_r (0.00734024 -0.3475604 -0.01908462)
      PathPoint P2: calcn_r (0.00441848 0.0311302 -0.00532226)
      PathWrap shank: wrap_object=GasMed_at_shank_r method=hybrid
      PathWrap condyles: wrap_object=Gastroc_at_condyles_r method=hybrid
    Millard2012EquilibriumMuscle glmax1_r: max_isometric_force=983.7836 optimal_fiber_length=0.1423469
        tendon_slack_length=0.0472949 pennation_angle_at_optimal=0.3540118 ignore_tendon_compliance=true
      PathPoint P1: pelvis (-0.1230905 0.03449734 0.05629566)
      PathPoint P2: pelvis (-0.1256903 -0.02419813 0.07789399)
      PathPoint P3: femur_r (-0.04073833 -0.02991148 0.02770941)
      PathPoint P4: femur_r (-0.02541558 -0.0519322 0.04312391)
      PathWrap: wrap_object=Gmax1_at_pelvis_r method=hybrid
    Millard2012EquilibriumMuscle glmax2_r: max_isometric_force=1406.046 optimal_fiber_length=0.150517
        tendon_slack_length=0.06508389 pennation_angle_at_optimal=0.3673821 ignore_tendon_compliance=true
      PathPoint P1: pelvis (-0.1316898 0.008699329 0.04619644)
      PathPoint P2: pelvis (-0.1343896 -0.0608953 0.08129373)
      PathPoint P3: femur_r (-0.04128885 -0.05358375 0.02312176)
      PathPoint P4: femur_r (-0.01431347 -0.09322105 0.03844451)
      PathWrap: wrap_object=Gmax2_at_pelvis_r method=hybrid
    Millard2012EquilibriumMuscle glmax3_r: max_isometric_force=947.7541 optimal_fiber_length=0.1593317
        tendon_slack_length=0.06651537 pennation_angle_at_optimal=0.3824161 ignore_tendon_compliance=true
      PathPoint P1: pelvis (-0.12999 -0.05249595 0.008999306)
      PathPoint P2: pelvis (-0.1272902 -0.1262903 0.04349664)
      PathPoint P3: femur_r (-0.02578259 -0.1032221 0.008624782)
      PathPoint P4: femur_r (-0.00550518 -0.1301975 0.03771048)
      PathWrap: wrap_object=Gmax3_at_pelvis_r method=hybrid
    Millard2012EquilibriumMuscle glmed1_r: max_isometric_force=1093.467 optimal_fiber_length=0.07147954
        tendon_slack_length=0.05465427 pennation_angle_at_optimal=0.3165559 ignore_tendon_compliance=true
      PathPoint P1: pelvis (-0.04449657 0.02449811 0.117191)
      PathPoint P2: femur_r (-0.02000215 -0.0107351 0.05092291)
    Millard2012EquilibriumMuscle glmed2_r: max_isometric_force=765.0917 optimal_fiber_length=0.07128393
        tendon_slack_length=0.06371495 pennation_angle_at_optimal=0.3165559 ignore_tendon_compliance=true
      PathPoint P1: pelvis (-0.08499344 0.03159756 0.06749479)
      PathPoint P2: femur_r (-0.02367227 -0.005321674 0.04835383)
    Millard2012EquilibriumMuscle glmed3_r: max_isometric_force=871.1993 optimal_fiber_length=0.07077863
        tendon_slack_length=0.04385642 pennation_angle_at_optimal=0.3165559 ignore_tendon_compliance=true
      PathPoint P1: pelvis (-0.1151911 -0.007299437 0.05259594)
      PathPoint P2: femur_r (-0.02835168 -0.004312391 0.04752805)
    Millard2012EquilibriumMuscle glmin1_r: max_isometric_force=374.0459 optimal_fiber_length=0.06543111
        tendon_slack_length=0.01552813 pennation_angle_at_optimal=0.1745329 ignore_tendon_compliance=true
      PathPoint P1: pelvis (-0.04639642 -0.01489885 0.104192)
      PathPoint P2: femur_r (-0.006606216 -0.009542312 0.05138168)
    Millard2012EquilibriumMuscle glmin2_r: max_isometric_force=394.8197 optimal_fiber_length=0.05359912
        tendon_slack_length=0.02498011 pennation_angle_at_optimal=0 ignore_tendon_compliance=true
      PathPoint P1: pelvis (-0.06159525 -0.0141989 0.09709251)
      PathPoint P2: femur_r (-0.008808288 -0.009542312 0.05138168)
    Millard2012EquilibriumMuscle glmin3_r: max_isometric_force=446.7738 optimal_fiber_length=0.03631196
        tendon_slack_length=0.04861264 pennation_angle_at_optimal=0.01745329
      PathPoint P1: pelvis (-0.07889391 -0.0154988 0.07979384)
      PathPoint P2: femur_r (-0.01238665 -0.007615499 0.05046415)
    Millard2012EquilibriumMuscle grac_r: max_isometric_force=281.3115 optimal_fiber_length=0.2047319
        tendon_slack_length=0.1545949 pennation_angle_at_optimal=0.1720016 ignore_tendon_compliance=true
      PathPoint P1: pelvis (-0.04735635 -0.12931 0.02455811)
      PathPoint P2: tibia_r (-0.01608987 -0.04153493 -0.02586434)
      PathPoint P3: tibia_r (0.00155483 -0.06081307 -0.01374016)
      PathWrap: wrap_object=GR_at_condyles_r method=hybrid
    Millard2012EquilibriumMuscle iliacus_r: max_isometric_force=1021.141 optimal_fiber_length=0.1051006
        tendon_slack_length=0.09476873 pennation_angle_at_optimal=0.279914 ignore_tendon_compliance=true
      PathPoint P1: pelvis (-0.06049533 0.03089762 0.0842935)
      PathPoint P2: pelvis (-0.01349896 -0.0556957 0.07559417)
      PathPoint P3: femur_r (-0.002110319 -0.05184044 0.01275367)
      PathPoint P4: femur_r (-0.01119387 -0.05844666 0.01798359)
      PathWrap: wrap_object=IL_at_brim_r method=hybrid range=(2 3)
    Millard2012EquilibriumMuscle perbrev_r: max_isometric_force=521.2016 optimal_fiber_length=0.04095136
        tendon_slack_length=0.1330716 pennation_angle_at_optimal=0.2052361
      PathPoint P1: tibia_r (-0.02122605 -0.2211702 0.02192485)
      PathPoint P2: tibia_r (-0.02961165 -0.3400535 0.02175015)
      PathPoint P3: tibia_r (-0.02489475 -0.3497494 0.02227425)
      PathPoint P4: calcn_r (0.04729782 0.0271134 0.02339786)
      PathPoint P5: calcn_r (0.06798434 0.02199198 0.03444406)
    Millard2012EquilibriumMuscle perlong_r: max_isometric_force=1115.371 optimal_fiber_length=0.04646178
        tendon_slack_length=0.3038497 pennation_angle_at_optimal=0.2479525
      PathPoint P1: tibia_r (-0.01747 -0.1199316 0.0246327)
      PathPoint P2: tibia_r (-0.02768995 -0.340665 0.02070195)
      PathPoint P3: tibia_r (-0.0237592 -0.3506229 0.020964)
      PathPoint P4: calcn_r (0.04398396 0.0230966 0.02219282)
      PathPoint P5: calcn_r (0.06838602 0.01064452 0.02851928)
      PathPoint P6: calcn_r (0.08555784 0.00692898 0.01184956)
      PathPoint P7: calcn_r (0.1208053 0.0085357 -0.01847728)
    Millard2012EquilibriumMuscle piri_r: max_isometric_force=1029.787 optimal_fiber_length=0.02542922
        tendon_slack_length=0.1123837 pennation_angle_at_optimal=0.1745329
      PathPoint P1: pelvis (-0.1018021 -0.006529496 0.01350896)
      PathPoint P2: pelvis (-0.1020121 -0.03065763 0.0609153)
      PathPoint P3: femur_r (-0.01357944 -0.003303108 0.04009606)
    Millard2012EquilibriumMuscle recfem_r: max_isometric_force=2191.741 optimal_fiber_length=0.06974394
        tendon_slack_length=0.4121173 pennation_angle_at_optimal=0.2170149
      PathPoint P1: pelvis (-0.02399815 -0.03879701 0.0932928)
      PathPoint P2: patella_r (0.0102879 0.05041071 0.000720153)
      PathPoint P3: patella_r (0.01244836 0.04495812 -0.00102879)
      PathPoint P4: patella_r (0.00514395 0.002541111 3.08637e-5)
      PathPoint P5: tibia_r (0.0284761 -0.05513532 -0.000410545)
      PathWrap: wrap_object=KnExt_at_fem_r method=hybrid
    Millard2012EquilibriumMuscle sart_r: max_isometric_force=249.4131 optimal_fiber_length=0.3699779
        tendon_slack_length=0.1138392 pennation_angle_at_optimal=0.02613542 ignore_tendon_compliance=true
      PathPoint P1: pelvis (-0.0194985 -0.0155988 0.1055919)
      PathPoint P2: femur_r (-0.00275259 -0.3273747 -0.03862801)
      PathPoint P3: tibia_r (-0.02192485 -0.03502735 -0.03188275)
      PathPoint P4: tibia_r (-0.01388865 -0.05232265 -0.0230604)
      PathPoint P5: tibia_r (0.0118796 -0.0707535 -0.0022711)
    Millard2012EquilibriumMuscle semimem_r: max_isometric_force=2200.987 optimal_fiber_length=0.06232606
        tendon_slack_length=0.3139661 pennation_angle_at_optimal=0.2545615
      PathPoint P1: pelvis (-0.09869239 -0.1139912 0.06139526)
      PathPoint P2: tibia_r (-0.0253315 -0.03642495 -0.0171206)
      PathWrap: wrap_object=SM_at_condyles_r method=hybrid
    Millard2012EquilibriumMuscle semiten_r: max_isometric_force=591.2951 optimal_fiber_length=0.1731752
        tendon_slack_length=0.2218069 pennation_angle_at_optimal=0.241295
      PathPoint P1: pelvis (-0.103792 -0.1252903 0.05149603)
      PathPoint P2: tibia_r (-0.0272532 -0.0443738 -0.02000315)
      PathPoint P3: tibia_r (0.00165965 -0.06752155 -0.01021995)
      PathWrap: wrap_object=ST_at_condyles_r method=hybrid
    Millard2012EquilibriumMuscle soleus_r: max_isometric_force=6194.843 optimal_fiber_length=0.03874778
        tendon_slack_length=0.2437199 pennation_angle_at_optimal=0.3814289
      PathPoint P1: tibia_r (-0.0066386 -0.0800126 0.0085603)
      PathPoint P2: calcn_r (0.00441848 0.0311302 -0.00532226)
    Millard2012EquilibriumMuscle tfl_r: max_isometric_force=411.2066 optimal_fiber_length=0.08812667
        tendon_slack_length=0.4169756 pennation_angle_at_optimal=0.05235988
      PathPoint P1: pelvis (-0.0310976 0.02139835 0.1240904)
      PathPoint P2: femur_r (0.02697538 -0.09129424 0.05477654)
      PathPoint P3: femur_r (0.009817571 -0.3715997 0.02972797)
      PathPoint P4: tibia_r (0.0094338 -0.0358135 0.0302231)
    Millard2012EquilibriumMuscle tibant_r: max_isometric_force=1227.452 optimal_fiber_length=0.06141704
        tendon_slack_length=0.2162285 pennation_angle_at_optimal=0.1951828
      PathPoint P1: tibia_r (0.0134519 -0.1146032 0.0141507)
      PathPoint P2: tibia_r (0.02192485 -0.1664891 0.0111808)
      PathPoint P3: tibia_r (0.02035255 -0.3196137 -0.0115302)
      PathPoint P4: calcn_r (0.1170897 0.01787476 -0.0306281)
    Millard2012EquilibriumMuscle tibpost_r: max_isometric_force=1730.154 optimal_fiber_length=0.03379826
        tendon_slack_length=0.2510545 pennation_angle_at_optimal=0.2264891
      PathPoint P1: tibia_r (-0.00358135 -0.1139044 0.00899705)
      PathPoint P2: tibia_r (-0.0143254 -0.3192643 -0.01528625)
      PathPoint P3: calcn_r (0.04187514 0.03354028 -0.02872012)
      PathPoint P4: calcn_r (0.07752424 0.01596678 -0.02821802)
    Millard2012EquilibriumMuscle vasint_r: max_isometric_force=1697.361 optimal_fiber_length=0.09058342
        tendon_slack_length=0.1844606 pennation_angle_at_optimal=0.06309973
      PathPoint P1: femur_r (0.02660837 -0.1765328 0.02844343)
      PathPoint P2: femur_r (0.03073726 -0.1912133 0.0261496)
      PathPoint P3: patella_r (0.005966982 0.04938192 -0.000617274)
      PathPoint P4: patella_r (0.00514395 0.002541111 -0.0004012281)
      PathPoint P5: tibia_r (0.0284499 -0.0552052 0.000375605)
      PathWrap: wrap_object=KnExt_at_fem_r method=hybrid
    Millard2012EquilibriumMuscle vaslat_r: max_isometric_force=5148.767 optimal_fiber_length=0.09075238
        tendon_slack_length=0.2014094 pennation_angle_at_optimal=0.2528673
      PathPoint P1: femur_r (0.004404144 -0.1701101 0.0320218)
      PathPoint P2: femur_r (0.02468156 -0.237732 0.03752698)
      PathPoint P3: patella_r (0.01059654 0.04351782 0.01450594)
      PathPoint P4: patella_r (0.00514395 0.002541111 0.007541031)
      PathPoint P5: tibia_r (0.02842369 -0.05536243 0.004463585)
      PathWrap: wrap_object=KnExt_at_fem_r method=hybrid
    Millard2012EquilibriumMuscle vasmed_r: max_isometric_force=2747.823 optimal_fiber_length=0.08848113
        tendon_slack_length=0.1827247 pennation_angle_at_optimal=0.4222225
      PathPoint P1: femur_r (0.01284542 -0.1925895 0.01724956)
      PathPoint P2: femur_r (0.03266407 -0.2540641 0.000825777)
      PathPoint P3: patella_r (0.006481377 0.04578116 -0.01748943)
      PathPoint P4: patella_r (0.00514395 0.002541111 -0.008744715)
      PathPoint P5: tibia_r (0.02786465 -0.0555284 -0.00592233)
      PathWrap: wrap_object=KnExt_at_fem_r method=hybrid
    Millard2012EquilibriumMuscle addbrev_l: max_isometric_force=625.8197 optimal_fiber_length=0.09754936
        tendon_slack_length=0.03354174 pennation_angle_at_optimal=0.1147809 ignore_tendon_compliance=true
      PathPoint P1: pelvis (-0.01909853 -0.09399275 -0.01539881)
      PathPoint P2: femur_l (-0.00183506 -0.1082685 -0.0228465)
      PathWrap: wrap_object=AB_at_femshaft_l method=hybrid
    Millard2012EquilibriumMuscle addlong_l: max_isometric_force=916.8 optimal_fiber_length=0.09992072
        tendon_slack_length=0.1217143 pennation_angle_at_optimal=0.1377704
      PathPoint P1: pelvis (-0.007579415 -0.08889314 -0.01887854)
      PathPoint P2: femur_l (0.01033139 -0.2196292 -0.0145245)
      PathWrap: wrap_object=AL_at_femshaft_l method=hybrid
    Millard2012EquilibriumMuscle addmagDist_l: max_isometric_force=597.2951 optimal_fiber_length=0.1594822
        tendon_slack_length=0.07864372 pennation_angle_at_optimal=0.194705 ignore_tendon_compliance=true
      PathPoint P1: pelvis (-0.07403429 -0.1276602 -0.03981693)
      PathPoint P2: femur_l (0.01032221 -0.2408516 -0.01770833)
      PathWrap: wrap_object=AMdist_at_femshaft_l method=hybrid
    Millard2012EquilibriumMuscle addmagIsch_l: max_isometric_force=597.2951 optimal_fiber_length=0.140904
        tendon_slack_length=0.1951574 pennation_angle_at_optimal=0.1680443
      PathPoint P1: pelvis (-0.08961309 -0.12975 -0.04170678)
      PathPoint P2: femur_l (0.004413319 -0.3559741 0.03003076)
      PathWrap: wrap_object=AMisch_at_condyles_l method=hybrid
    Millard2012EquilibriumMuscle addmagMid_l: max_isometric_force=597.2951 optimal_fiber_length=0.1259293
        tendon_slack_length=0.04264191 pennation_angle_at_optimal=0.2073076 ignore_tendon_compliance=true
      PathPoint P1: pelvis (-0.05265594 -0.1207407 -0.0285378)
      PathPoint P2: femur_l (0.002220423 -0.1490069 -0.02681023)
      PathWrap: wrap_object=AMmid_at_femshaft_l method=hybrid
    Millard2012EquilibriumMuscle addmagProx_l: max_isometric_force=597.2951 optimal_fiber_length=0.1014556
        tendon_slack_length=0.03874151 pennation_angle_at_optimal=0.3114833 ignore_tendon_compliance=true
      PathPoint P1: pelvis (-0.03097761 -0.1075417 -0.01364895)
      PathPoint P2: femur_l (-0.01401068 -0.07235642 -0.02937931)
      PathWrap: wrap_object=AMprox_at_femshaft_l method=hybrid
    Millard2012EquilibriumMuscle bflh_l: max_isometric_force=1313.184 optimal_fiber_length=0.0880624
        tendon_slack_length=0.2934451 pennation_angle_at_optimal=0.1759182
      PathPoint P1: pelvis (-0.103992 -0.1190908 -0.05859548)
      PathPoint P2: tibia_l (-0.02943695 -0.0305725 -0.02209955)
      PathPoint P3: tibia_l (-0.02506945 -0.03974425 -0.02646705)
    Millard2012EquilibriumMuscle bfsh_l: max_isometric_force=557.1148 optimal_fiber_length=0.1003454
        tendon_slack_length=0.09626723 pennation_angle_at_optimal=0.2642232 ignore_tendon_compliance=true
      PathPoint P1: femur_l (0.00458765 -0.1936906 -0.0214702)
      PathPoint P2: tibia_l (-0.02629235 -0.03659965 -0.0277773)
      PathWrap: wrap_object=BF_at_gastroc_l method=hybrid
    Millard2012EquilibriumMuscle edl_l: max_isometric_force=603.4982 optimal_fiber_length=0.06402436
        tendon_slack_length=0.3407937 pennation_angle_at_optimal=0.2182582
      PathPoint P1: tibia_l (-0.013976 -0.1010639 -0.01790675)
      PathPoint P2: tibia_l (0.0143254 -0.328436 -0.0097832)
      PathPoint P3: calcn_l (0.09228598 0.0361512 -0.00080336)
      PathPoint P4: calcn_l (0.1622787 0.0055231 -0.0130546)
      PathPoint P5: toes_l (0.00030126 0.00471974 -0.01536426)
      PathPoint P6: toes_l (0.04448606 -0.00040168 -0.025105)
    Millard2012EquilibriumMuscle ehl_l: max_isometric_force=285.8675 optimal_fiber_length=0.06960457
        tendon_slack_length=0.3040968 pennation_angle_at_optimal=0.1972681
      PathPoint P1: tibia_l (-0.012229 -0.1353925 -0.01650915)
      PathPoint P2: tibia_l (0.00620185 -0.2541011 -0.0143254)
      PathPoint P3: tibia_l (0.01747 -0.3225836 0.0024458)
      PathPoint P4: calcn_l (0.0974074 0.03906338 0.02118862)
      PathPoint P5: calcn_l (0.1298431 0.03102978 0.02580794)
      PathPoint P6: calcn_l (0.1741283 0.01395838 0.0281176)
      PathPoint P7: toes_l (0.02992516 0.00411722 0.0246029)
      PathPoint P8: toes_l (0.05653646 0.00341428 0.01867812)
    Millard2012EquilibriumMuscle fdl_l: max_isometric_force=423.177 optimal_fiber_length=0.04183099
        tendon_slack_length=0.3552566 pennation_angle_at_optimal=0.2248391
      PathPoint P1: tibia_l (-0.00200905 -0.1600252 0.0015723)
      PathPoint P2: tibia_l (-0.0153736 -0.3183908 0.0108314)
      PathPoint P3: calcn_l (0.04378312 0.0316323 0.0281176)
      PathPoint P4: calcn_l (0.07109736 0.01767392 0.02641046)
      PathPoint P5: calcn_l (0.1664964 -0.00813402 -0.01164872)
      PathPoint P6: toes_l (-0.00190798 -0.00783276 -0.01476174)
      PathPoint P7: toes_l (0.0286197 -0.00712982 -0.0215903)
      PathPoint P8: toes_l (0.04428522 -0.0060252 -0.02430164)
    Millard2012EquilibriumMuscle fhl_l: max_isometric_force=907.8393 optimal_fiber_length=0.04977699
        tendon_slack_length=0.3346862 pennation_angle_at_optimal=0.2580255
      PathPoint P1: tibia_l (-0.0270785 -0.188938 -0.01747)
      PathPoint P2: tibia_l (-0.0211387 -0.3206619 0.0066386)
      PathPoint P3: calcn_l (0.03755708 0.02771592 0.02420122)
      PathPoint P4: calcn_l (0.104236 0.00682856 0.02570752)
      PathPoint P5: calcn_l (0.1733249 -0.00532226 0.02701298)
      PathPoint P6: toes_l (0.0155651 -0.00642688 0.0266113)
      PathPoint P7: toes_l (0.05643604 -0.01024284 0.01817602)
    Millard2012EquilibriumMuscle gaslat_l: max_isometric_force=1575.059 optimal_fiber_length=0.05165814
        tendon_slack_length=0.3303926 pennation_angle_at_optimal=0.2102268
      PathPoint P1: femur_l (-0.00275259 -0.3499459 -0.02541558)
      PathPoint P2: calcn_l (0.00441848 0.0311302 0.00532226)
      PathWrap shank: wrap_object=GasLat_at_shank_l method=hybrid
      PathWrap condyles: wrap_object=Gastroc_at_condyles_l method=hybrid
    Millard2012EquilibriumMuscle gasmed_l: max_isometric_force=3115.515 optimal_fiber_length=0.04483965
        tendon_slack_length=0.3505549 pennation_angle_at_optimal=0.1656816
      PathPoint P1: femur_l (0.00734024 -0.3475604 0.01908462)
      PathPoint P2: calcn_l (0.00441848 0.0311302 0.00532226)
      PathWrap shank: wrap_object=GasMed_at_shank_l method=hybrid
      PathWrap condyles: wrap_object=Gastroc_at_condyles_l method=hybrid
    Millard2012EquilibriumMuscle glmax1_l: max_isometric_force=983.7836 optimal_fiber_length=0.1423469
        tendon_slack_length=0.0472949 pennation_angle_at_optimal=0.3540118 ignore_tendon_compliance=true
      PathPoint P1: pelvis (-0.1230905 0.03449734 -0.05629566)
      PathPoint P2: pelvis (-0.1256903 -0.02419813 -0.07789399)
      PathPoint P3: femur_l (-0.04073833 -0.02991148 -0.02770941)
      PathPoint P4: femur_l (-0.02541558 -0.0519322 -0.04312391)
      PathWrap: wrap_object=Gmax1_at_pelvis_l method=hybrid
    Millard2012EquilibriumMuscle glmax2_l: max_isometric_force=1406.046 optimal_fiber_length=0.150517
        tendon_slack_length=0.06508389 pennation_angle_at_optimal=0.3673821 ignore_tendon_compliance=true
      PathPoint P1: pelvis (-0.1316898 0.008699329 -0.04619644)
      PathPoint P2: pelvis (-0.1343896 -0.0608953 -0.08129373)
      PathPoint P3: femur_l (-0.04128885 -0.05358375 -0.02312176)
      PathPoint P4: femur_l (-0.01431347 -0.09322105 -0.03844451)
      PathWrap: wrap_object=Gmax2_at_pelvis_l method=hybrid
    Millard2012EquilibriumMuscle glmax3_l: max_isometric_force=947.7541 optimal_fiber_length=0.1593317
        tendon_slack_length=0.06651537 pennation_angle_at_optimal=0.3824161 ignore_tendon_compliance=true
      PathPoint P1: pelvis (-0.12999 -0.05249595 -0.008999306)
      PathPoint P2: pelvis (-0.1272902 -0.1262903 -0.04349664)
      PathPoint P3: femur_l (-0.02578259 -0.1032221 -0.008624782)
      PathPoint P4: femur_l (-0.00550518 -0.1301975 -0.03771048)
      PathWrap: wrap_object=Gmax3_at_pelvis_l method=hybrid
    Millard2012EquilibriumMuscle glmed1_l: max_isometric_force=1093.467 optimal_fiber_length=0.07147954
        tendon_slack_length=0.05465427 pennation_angle_at_optimal=0.3165559 ignore_tendon_compliance=true
      PathPoint P1: pelvis (-0.04449657 0.02449811 -0.117191)
      PathPoint P2: femur_l (-0.02000215 -0.0107351 -0.05092291)
    Millard2012EquilibriumMuscle glmed2_l: max_isometric_force=765.0917 optimal_fiber_length=0.07128393
        tendon_slack_length=0.06371495 pennation_angle_at_optimal=0.3165559 ignore_tendon_compliance=true
      PathPoint P1: pelvis (-0.08499344 0.03159756 -0.06749479)
      PathPoint P2: femur_l (-0.02367227 -0.005321674 -0.04835383)
    Millard2012EquilibriumMuscle glmed3_l: max_isometric_force=871.1993 optimal_fiber_length=0.07077863
        tendon_slack_length=0.04385642 pennation_angle_at_optimal=0.3165559 ignore_tendon_compliance=true
      PathPoint P1: pelvis (-0.1151911 -0.007299437 -0.05259594)
      PathPoint P2: femur_l (-0.02835168 -0.004312391 -0.04752805)
    Millard2012EquilibriumMuscle glmin1_l: max_isometric_force=374.0459 optimal_fiber_length=0.06543111
        tendon_slack_length=0.01552813 pennation_angle_at_optimal=0.1745329 ignore_tendon_compliance=true
      PathPoint P1: pelvis (-0.04639642 -0.01489885 -0.104192)
      PathPoint P2: femur_l (-0.006606216 -0.009542312 -0.05138168)
    Millard2012EquilibriumMuscle glmin2_l: max_isometric_force=394.8197 optimal_fiber_length=0.05359912
        tendon_slack_length=0.02498011 pennation_angle_at_optimal=0 ignore_tendon_compliance=true
      PathPoint P1: pelvis (-0.06159525 -0.0141989 -0.09709251)
      PathPoint P2: femur_l (-0.008808288 -0.009542312 -0.05138168)
    Millard2012EquilibriumMuscle glmin3_l: max_isometric_force=446.7738 optimal_fiber_length=0.03631196
        tendon_slack_length=0.04861264 pennation_angle_at_optimal=0.01745329
      PathPoint P1: pelvis (-0.07889391 -0.0154988 -0.07979384)
      PathPoint P2: femur_l (-0.01238665 -0.007615499 -0.05046415)
    Millard2012EquilibriumMuscle grac_l: max_isometric_force=281.3115 optimal_fiber_length=0.2047319
        tendon_slack_length=0.1545949 pennation_angle_at_optimal=0.1720016 ignore_tendon_compliance=true
      PathPoint P1: pelvis (-0.04735635 -0.12931 -0.02455811)
      PathPoint P2: tibia_l (-0.01608987 -0.04153493 0.02586434)
      PathPoint P3: tibia_l (0.00155483 -0.06081307 0.01374016)
      PathWrap: wrap_object=GR_at_condyles_l method=hybrid
    Millard2012EquilibriumMuscle iliacus_l: max_isometric_force=1021.141 optimal_fiber_length=0.1051006
        tendon_slack_length=0.09476873 pennation_angle_at_optimal=0.279914 ignore_tendon_compliance=true
      PathPoint P1: pelvis (-0.06049533 0.03089762 -0.0842935)
      PathPoint P2: pelvis (-0.01349896 -0.0556957 -0.07559417)
      PathPoint P3: femur_l (-0.002110319 -0.05184044 -0.01275367)
      PathPoint P4: femur_l (-0.01119387 -0.05844666 -0.01798359)
      PathWrap: wrap_object=IL_at_brim_l method=hybrid range=(2 3)
    Millard2012EquilibriumMuscle perbrev_l: max_isometric_force=521.2016 optimal_fiber_length=0.04095136
        tendon_slack_length=0.1330716 pennation_angle_at_optimal=0.2052361
      PathPoint P1: tibia_l (-0.02122605 -0.2211702 -0.02192485)
      PathPoint P2: tibia_l (-0.02961165 -0.3400535 -0.02175015)
      PathPoint P3: tibia_l (-0.02489475 -0.3497494 -0.02227425)
      PathPoint P4: calcn_l (0.04729782 0.0271134 -0.02339786)
      PathPoint P5: calcn_l (0.06798434 0.02199198 -0.03444406)
    Millard2012EquilibriumMuscle perlong_l: max_isometric_force=1115.371 optimal_fiber_length=0.04646178
        tendon_slack_length=0.3038497 pennation_angle_at_optimal=0.2479525
      PathPoint P1: tibia_l (-0.01747 -0.1199316 -0.0246327)
      PathPoint P2: tibia_l (-0.02768995 -0.340665 -0.02070195)
      PathPoint P3: tibia_l (-0.0237592 -0.3506229 -0.020964)
      PathPoint P4: calcn_l (0.04398396 0.0230966 -0.02219282)
      PathPoint P5: calcn_l (0.06838602 0.01064452 -0.02851928)
      PathPoint P6: calcn_l (0.08555784 0.00692898 -0.01184956)
      PathPoint P7: calcn_l (0.1208053 0.0085357 0.01847728)
    Millard2012EquilibriumMuscle piri_l: max_isometric_force=1029.787 optimal_fiber_length=0.02542922
        tendon_slack_length=0.1123837 pennation_angle_at_optimal=0.1745329
      PathPoint P1: pelvis (-0.1018021 -0.006529496 -0.01350896)
      PathPoint P2: pelvis (-0.1020121 -0.03065763 -0.0609153)
      PathPoint P3: femur_l (-0.01357944 -0.003303108 -0.04009606)
    Millard2012EquilibriumMuscle recfem_l: max_isometric_force=2191.741 optimal_fiber_length=0.06974394
        tendon_slack_length=0.4121173 pennation_angle_at_optimal=0.2170149
      PathPoint P1: pelvis (-0.02399815 -0.03879701 -0.0932928)
      PathPoint P2: patella_l (0.0102879 0.05041071 -0.000720153)
      PathPoint P3: patella_l (0.01244836 0.04495812 0.00102879)
      PathPoint P4: patella_l (0.00514395 0.002541111 -3.08637e-5)
      PathPoint P5: tibia_l (0.0284761 -0.05513532 0.000410545)
      PathWrap: wrap_object=KnExt_at_fem_l method=hybrid
    Millard2012EquilibriumMuscle sart_l: max_isometric_force=249.4131 optimal_fiber_length=0.3699779
        tendon_slack_length=0.1138392 pennation_angle_at_optimal=0.02613542 ignore_tendon_compliance=true
      PathPoint P1: pelvis (-0.0194985 -0.0155988 -0.1055919)
      PathPoint P2: femur_l (-0.00275259 -0.3273747 0.03862801)
      PathPoint P3: tibia_l (-0.02192485 -0.03502735 0.03188275)
      PathPoint P4: tibia_l (-0.01388865 -0.05232265 0.0230604)
      PathPoint P5: tibia_l (0.0118796 -0.0707535 0.0022711)
    Millard2012EquilibriumMuscle semimem_l: max_isometric_force=2200.987 optimal_fiber_length=0.06232606
        tendon_slack_length=0.3139661 pennation_angle_at_optimal=0.2545615
      PathPoint P1: pelvis (-0.09869239 -0.1139912 -0.06139526)
      PathPoint P2: tibia_l (-0.0253315 -0.03642495 0.0171206)
      PathWrap: wrap_object=SM_at_condyles_l method=hybrid
    Millard2012EquilibriumMuscle semiten_l: max_isometric_force=591.2951 optimal_fiber_length=0.1731752
        tendon_slack_length=0.2218069 pennation_angle_at_optimal=0.241295
      PathPoint P1: pelvis (-0.103792 -0.1252903 -0.05149603)
      PathPoint P2: tibia_l (-0.0272532 -0.0443738 0.02000315)
      PathPoint P3: tibia_l (0.00165965 -0.06752155 0.01021995)
      PathWrap: wrap_object=ST_at_condyles_l method=hybrid
    Millard2012EquilibriumMuscle soleus_l: max_isometric_force=6194.843 optimal_fiber_length=0.03874778
        tendon_slack_length=0.2437199 pennation_angle_at_optimal=0.3814289
      PathPoint P1: tibia_l (-0.0066386 -0.0800126 -0.0085603)
      PathPoint P2: calcn_l (0.00441848 0.0311302 0.00532226)
    Millard2012EquilibriumMuscle tfl_l: max_isometric_force=411.2066 optimal_fiber_length=0.08812667
        tendon_slack_length=0.4169756 pennation_angle_at_optimal=0.05235988
      PathPoint P1: pelvis (-0.0310976 0.02139835 -0.1240904)
      PathPoint P2: femur_l (0.02697538 -0.09129424 -0.05477654)
      PathPoint P3: femur_l (0.009817571 -0.3715997 -0.02972797)
      PathPoint P4: tibia_l (0.0094338 -0.0358135 -0.0302231)
    Millard2012EquilibriumMuscle tibant_l: max_isometric_force=1227.452 optimal_fiber_length=0.06141704
        tendon_slack_length=0.2162285 pennation_angle_at_optimal=0.1951828
      PathPoint P1: tibia_l (0.0134519 -0.1146032 -0.0141507)
      PathPoint P2: tibia_l (0.02192485 -0.1664891 -0.0111808)
      PathPoint P3: tibia_l (0.02035255 -0.3196137 0.0115302)
      PathPoint P4: calcn_l (0.1170897 0.01787476 0.0306281)
    Millard2012EquilibriumMuscle tibpost_l: max_isometric_force=1730.154 optimal_fiber_length=0.03379826
        tendon_slack_length=0.2510545 pennation_angle_at_optimal=0.2264891
      PathPoint P1: tibia_l (-0.00358135 -0.1139044 -0.00899705)
      PathPoint P2: tibia_l (-0.0143254 -0.3192643 0.01528625)
      PathPoint P3: calcn_l (0.04187514 0.03354028 0.02872012)
      PathPoint P4: calcn_l (0.07752424 0.01596678 0.02821802)
    Millard2012EquilibriumMuscle vasint_l: max_isometric_force=1697.361 optimal_fiber_length=0.09058342
        tendon_slack_length=0.1844606 pennation_angle_at_optimal=0.06309973
      PathPoint P1: femur_l (0.02660837 -0.1765328 -0.02844343)
      PathPoint P2: femur_l (0.03073726 -0.1912133 -0.0261496)
      PathPoint P3: patella_l (0.005966982 0.04938192 0.000617274)
      PathPoint P4: patella_l (0.00514395 0.002541111 0.0004012281)
      PathPoint P5: tibia_l (0.0284499 -0.0552052 -0.000375605)
      PathWrap: wrap_object=KnExt_at_fem_l method=hybrid
    Millard2012EquilibriumMuscle vaslat_l: max_isometric_force=5148.767 optimal_fiber_length=0.09075238
        tendon_slack_length=0.2014094 pennation_angle_at_optimal=0.2528673
      PathPoint P1: femur_l (0.004404144 -0.1701101 -0.0320218)
      PathPoint P2: femur_l (0.02468156 -0.237732 -0.03752698)
      PathPoint P3: patella_l (0.01059654 0.04351782 -0.01450594)
      PathPoint P4: patella_l (0.00514395 0.002541111 -0.007541031)
      PathPoint P5: tibia_l (0.02842369 -0.05536243 -0.004463585)
      PathWrap: wrap_object=KnExt_at_fem_l method=hybrid
    Millard2012EquilibriumMuscle vasmed_l: max_isometric_force=2747.823 optimal_fiber_length=0.08848113
        tendon_slack_length=0.1827247 pennation_angle_at_optimal=0.4222225
      PathPoint P1: femur_l (0.01284542 -0.1925895 -0.01724956)
      PathPoint P2: femur_l (0.03266407 -0.2540641 -0.000825777)
      PathPoint P3: patella_l (0.006481377 0.04578116 0.01748943)
      PathPoint P4: patella_l (0.00514395 0.002541111 0.008744715)
      PathPoint P5: tibia_l (0.02786465 -0.0555284 0.00592233)
      PathWrap: wrap_object=KnExt_at_fem_l method=hybrid
    ObjectGroup elbow_flex: members=(tric_long_1_l tric_long_2_l tric_long_3_l tric_long_4_l tric_med_1_l tric_med_2_l tric_med_3_l tric_med_4_l tric_med_5_l tric_lat_1_l tric_lat_2_l tric_lat_3_l tric_lat_4_l tric_lat_5_l bic_l_l bic_s_l brachiorad_1_l brachiorad_2_l brachiorad_3_l brachialis_1_l brachialis_2_l brachialis_3_l brachialis_4_l brachialis_5_l brachialis_6_l brachialis_7_l anconeus_1_l anconeus_2_l anconeus_3_l anconeus_4_l anconeus_5_l pron_teres_1_l supinator_1_l supinator_2_l)
    ObjectGroup arm_flex: members=(ter_min_1_l ter_min_2_l ter_min_3_l ter_maj_1_l ter_maj_2_l ter_maj_3_l ter_maj_4_l supra_1_l supra_2_l supra_3_l supra_4_l infra_1_l infra_2_l infra_3_l infra_4_l infra_5_l infra_6_l delt_scap_1_l delt_scap_2_l delt_scap_3_l delt_scap_4_l delt_scap_5_l delt_scap_6_l delt_scap_7_l delt_scap_8_l delt_scap_9_l delt_scap10_l delt_scap11_l delt_clav_1_l delt_clav_2_l delt_clav_3_l delt_clav_4_l tric_long_1_l tric_long_2_l tric_long_3_l tric_long_4_l bic_l_l bic_s_l coracobr_1_l coracobr_2_l coracobr_3_l subscap_1_l subscap_2_l subscap_3_l subscap_4_l subscap_5_l subscap_6_l subscap_7_l subscap_8_l subscap_9_l subscap10_l subscap11_l pect_maj_t_1_l pect_maj_t_2_l pect_maj_t_3_l pect_maj_t_4_l pect_maj_t_5_l pect_maj_t_6_l pect_maj_c_1_l pect_maj_c_2_l LD_L1_l LD_L2_l LD_L3_l LD_L4_l LD_L5_l LD_T12_l LD_T11_l LD_T10_l LD_T9_l LD_T8_l LD_T7_l LD_R12_l LD_R11_l LD_Il_l)
    ObjectGroup flex_extension: members=(rect_abd_r rect_abd_l LD_L2_r LD_L3_r LD_L4_r LD_L5_r LD_Il_r Ps_L1_VB_r Ps_L1_TP_r Ps_L1_L2_IVD_r Ps_L2_TP_r Ps_L2_L3_IVD_r Ps_L3_TP_r Ps_L3_L4_IVD_r Ps_L4_TP_r Ps_L4_L5_IVD_r Ps_L5_TP_r Ps_L5_VB_r QL_post_I_1-L3_r QL_post_I_2-L4_r QL_post_I_2-L3_r QL_post_I_2-L2_r QL_post_I_3-L1_r QL_post_I_3-L2_r QL_post_I_3-L3_r QL_mid_L3-12_3_r QL_mid_L3-12_2_r QL_mid_L3-12_1_r QL_mid_L2-12_1_r QL_mid_L4-12_3_r QL_ant_I_2-T12_r QL_ant_I_3-T12_r QL_ant_I_2-12_1_r QL_ant_I_3-12_1_r QL_ant_I_3-12_2_r QL_ant_I_3-12_3_r MF_m1s_r MF_m1t_1_r MF_m1t_2_r MF_m1t_3_r MF_m2s_r MF_m2t_1_r MF_m2t_2_r MF_m2t_3_r MF_m3s_r MF_m3t_1_r MF_m3t_2_r MF_m3t_3_r MF_m4s_r MF_m4t_1_r MF_m4t_2_r MF_m4t_3_r MF_m5s_r MF_m5t_1_r MF_m5t_2_r MF_m5t_3_r MF_m1_laminar_r MF_m2_laminar_r MF_m3_laminar_r MF_m4_laminar_r MF_m5_laminar_r IL_L1_r IL_L2_r IL_L3_r IL_L4_r IL_R5_r IL_R6_r IL_R7_r IL_R8_r IL_R9_r IL_R10_r IL_R11_r IL_R12_r LTpT_T2_r LTpT_T3_r LTpT_T4_r LTpT_T5_r LTpT_T6_r LTpT_T7_r LTpT_T8_r LTpT_T9_r LTpT_T10_r LTpT_T11_r LTpT_T12_r LTpT_R4_r LTpT_R5_r LTpT_R6_r LTpT_R7_r LTpT_R8_r LTpT_R9_r LTpT_R10_r LTpT_R11_r LTpT_R12_r LTpL_L5_r LTpL_L4_r LTpL_L3_r LTpL_L2_r LTpL_L1_r EO1_r EO2_r EO3_r EO4_r EO5_r EO6_r IO1_r IO2_r IO3_r IO4_r IO5_r IO6_r rect_abd_l_0 Ps_L1_VB_l Ps_L1_TP_l Ps_L1_L2_IVD_l Ps_L2_TP_l Ps_L2_L3_IVD_l Ps_L3_TP_l Ps_L3_L4_IVD_l Ps_L4_TP_l Ps_L4_L5_IVD_l Ps_L5_TP_l Ps_L5_VB_l QL_post_I_1-L3_l QL_post_I_2-L4_l QL_post_I_2-L3_l QL_post_I_2-L2_l QL_post_I_3-L1_l QL_post_I_3-L2_l QL_post_I_3-L3_l QL_mid_L3-12_3_l QL_mid_L3-12_2_l QL_mid_L3-12_1_l QL_mid_L2-12_1_l QL_mid_L4-12_3_l QL_ant_I_2-T12_l QL_ant_I_3-T12_l QL_ant_I_2-12_1_l QL_ant_I_3-12_1_l QL_ant_I_3-12_2_l QL_ant_I_3-12_3_l MF_m1s_l MF_m1t_1_l MF_m1t_2_l MF_m1t_3_l MF_m2s_l MF_m2t_1_l MF_m2t_2_l MF_m2t_3_l MF_m3s_l MF_m3t_1_l MF_m3t_2_l MF_m3t_3_l MF_m4s_l MF_m4t_1_l MF_m4t_2_l MF_m4t_3_l MF_m5s_l MF_m5t_1_l MF_m5t_2_l MF_m5t_3_l MF_m1_laminar_l MF_m2_laminar_l MF_m3_laminar_l MF_m4_laminar_l MF_m5_laminar_l IL_L1_l IL_L2_l IL_L3_l IL_L4_l IL_R5_l IL_R6_l IL_R7_l IL_R8_l IL_R9_l IL_R10_l IL_R11_l IL_R12_l LTpT_T2_l LTpT_T3_l LTpT_T4_l LTpT_T5_l LTpT_T6_l LTpT_T7_l LTpT_T8_l LTpT_T9_l LTpT_T10_l LTpT_T11_l LTpT_T12_l LTpT_R4_l LTpT_R5_l LTpT_R6_l LTpT_R7_l LTpT_R8_l LTpT_R9_l LTpT_R10_l LTpT_R11_l LTpT_R12_l LTpL_L5_l LTpL_L4_l LTpL_L3_l LTpL_L2_l LTpL_L1_l EO1_l EO2_l EO3_l EO4_l EO5_l EO6_l IO1_l IO2_l IO3_l IO4_l IO5_l IO6_l LD_L2_l LD_L3_l LD_L4_l LD_L5_l LD_Il_l)
    ObjectGroup right_leg: members=(addbrev_r addlong_r addmagDist_r addmagIsch_r addmagMid_r addmagProx_r bflh_r bfsh_r edl_r ehl_r fdl_r fhl_r gaslat_r gasmed_r glmax1_r glmax2_r glmax3_r glmed1_r glmed2_r glmed3_r glmin1_r glmin2_r glmin3_r grac_r iliacus_r perbrev_r perlong_r piri_r recfem_r sart_r semimem_r semiten_r soleus_r tfl_r tibant_r tibpost_r vasint_r vaslat_r vasmed_r)
    ObjectGroup left_leg: members=(addbrev_l addlong_l addmagDist_l addmagIsch_l addmagMid_l addmagProx_l bflh_l bfsh_l edl_l ehl_l fdl_l fhl_l gaslat_l gasmed_l glmax1_l glmax2_l glmax3_l glmed1_l glmed2_l glmed3_l glmin1_l glmin2_l glmin3_l grac_l iliacus_l perbrev_l perlong_l piri_l recfem_l sart_l semimem_l semiten_l soleus_l tfl_l tibant_l tibpost_l vasint_l vaslat_l vasmed_l)
    ObjectGroup hip_add_r: members=(addbrev_r addlong_r addmagDist_r addmagIsch_r addmagMid_r addmagProx_r bflh_r grac_r semimem_r semiten_r)
    ObjectGroup hip_abd_r: members=(glmax1_r glmed1_r glmed2_r glmed3_r glmin1_r glmin2_r glmin3_r piri_r sart_r tfl_r)
    ObjectGroup hip_flex_r: members=(addbrev_r addlong_r glmin1_r grac_r iliacus_r recfem_r sart_r tfl_r Ps_L1_VB_r Ps_L1_TP_r Ps_L1_L2_IVD_r Ps_L2_TP_r Ps_L2_L3_IVD_r Ps_L3_TP_r Ps_L3_L4_IVD_r Ps_L4_TP_r Ps_L4_L5_IVD_r Ps_L5_TP_r Ps_L5_VB_r)
    ObjectGroup hip_ext_r: members=(addlong_r addmagDist_r addmagIsch_r addmagMid_r addmagProx_r bflh_r glmax1_r glmax2_r glmax3_r glmed1_r glmed2_r glmed3_r glmin3_r semimem_r semiten_r)
    ObjectGroup hip_inrot_r: members=(glmed1_r glmed2_r glmed3_r glmin1_r iliacus_r tfl_r Ps_L1_VB_r Ps_L1_TP_r Ps_L1_L2_IVD_r Ps_L2_TP_r Ps_L2_L3_IVD_r Ps_L3_TP_r Ps_L3_L4_IVD_r Ps_L4_TP_r Ps_L4_L5_IVD_r Ps_L5_TP_r Ps_L5_VB_r)
    ObjectGroup hip_exrot_r: members=(glmin3_r piri_r)
    ObjectGroup knee_flex_r: members=(bflh_r bfsh_r gaslat_r gasmed_r grac_r sart_r semimem_r semiten_r)
    ObjectGroup knee_ext_r: members=(recfem_r vasint_r vaslat_r vasmed_r)
    ObjectGroup ankle_df_r: members=(edl_r ehl_r tibant_r)
    ObjectGroup ankle_pf_r: members=(fdl_r fhl_r gaslat_r gasmed_r perbrev_r perlong_r soleus_r tibpost_r)
    ObjectGroup everter_r: members=(edl_r perbrev_r perlong_r)
    ObjectGroup inverter_r: members=(ehl_r fdl_r fhl_r tibant_r tibpost_r)
    ObjectGroup hip_add_l: members=(addbrev_l addlong_l addmagDist_l addmagIsch_l addmagMid_l addmagProx_l bflh_l grac_l semimem_l semiten_l)
    ObjectGroup hip_abd_l: members=(glmax1_l glmed1_l glmed2_l glmed3_l glmin1_l glmin2_l glmin3_l piri_l sart_l tfl_l)
    ObjectGroup hip_flex_l: members=(addbrev_l addlong_l glmin1_l grac_l iliacus_l recfem_l sart_l tfl_l Ps_L1_VB_l Ps_L1_TP_l Ps_L1_L2_IVD_l Ps_L2_TP_l Ps_L2_L3_IVD_l Ps_L3_TP_l Ps_L3_L4_IVD_l Ps_L4_TP_l Ps_L4_L5_IVD_l Ps_L5_TP_l Ps_L5_VB_l)
    ObjectGroup hip_ext_l: members=(addlong_l addmagDist_l addmagIsch_l addmagMid_l addmagProx_l bflh_l glmax1_l glmax2_l glmax3_l glmed1_l glmed2_l glmed3_l glmin3_l semimem_l semiten_l)
    ObjectGroup hip_exrot_l: members=(glmin3_l piri_l)
    ObjectGroup hip_inrot_l: members=(glmed1_l glmed2_l glmed3_l glmin1_l iliacus_l tfl_l Ps_L1_VB_l Ps_L1_TP_l Ps_L1_L2_IVD_l Ps_L2_TP_l Ps_L2_L3_IVD_l Ps_L3_TP_l Ps_L3_L4_IVD_l Ps_L4_TP_l Ps_L4_L5_IVD_l Ps_L5_TP_l Ps_L5_VB_l)
    ObjectGroup knee_flex_l: members=(bflh_l bfsh_l gaslat_l gasmed_l grac_l sart_l semimem_l semiten_l)
    ObjectGroup knee_ext_l: members=(recfem_l vasint_l vaslat_l vasmed_l)
    ObjectGroup ankle_df_l: members=(edl_l ehl_l tibant_l)
    ObjectGroup ankle_pf_l: members=(fdl_l fhl_l gaslat_l gasmed_l perbrev_l perlong_l soleus_l tibpost_l)
    ObjectGroup everter_l: members=(edl_l perbrev_l perlong_l)
    ObjectGroup inverter_l: members=(ehl_l fdl_l fhl_l tibant_l tibpost_l)
  MarkerSet:
    Marker RACR: torso (-0.00294726 0.4175285 0.1277146)
    Marker LACR: torso (-0.00294726 0.4175285 -0.1277146)
    Marker C7: torso (-0.0835057 0.4273527 0.001625178)
    Marker CLAV: torso (0.0392968 0.3733196 0.01670114)
    Marker RASH: torso (0.049121 0.364969 0.1670114)
    Marker RPSH: torso (-0.049121 0.364969 0.1670114)
    Marker LASH: torso (0.049121 0.364969 -0.1670114)
    Marker LPSH: torso (-0.05698036 0.364969 -0.1670114)
    Marker RSJC: humerus_r (0 0 0)
    Marker RUA1: humerus_r (0 -0.046661 0.0186644)
    Marker RUA2: humerus_r (0 -0.186644 0.0186644)
    Marker RUA3: humerus_r (0.0279966 -0.1213186 0.0186644)
    Marker RLEL: humerus_r (0.0139983 -0.2613016 0.0373288)
    Marker RMEL: humerus_r (0.002099745 -0.2669009 -0.04292812)
    Marker RFAsuperior: ulna_r (0.004456586 -0.07748564 0.04386348)
    Marker RFAradius: radius_r (0.000494235 -0.2224057 0.0494235)
    Marker RFAulna: radius_r (-0.02174634 -0.2224057 -0.02174634)
    Marker LSJC: humerus_l (0 0 0)
    Marker LUA1: humerus_l (0 -0.0452025 -0.018081)
    Marker LUA2: humerus_l (0 -0.18081 -0.018081)
    Marker LUA3: humerus_l (0.0271215 -0.1175265 -0.018081)
    Marker LLEL: humerus_l (0.01356075 -0.253134 -0.036162)
    Marker LMEL: humerus_l (0.002034158 -0.2585583 0.0415863)
    Marker LFAsuperior: ulna_l (0.004456586 -0.07748564 -0.04386348)
    Marker LFAradius: radius_l (0.000494235 -0.2224057 -0.0494235)
    Marker LFAulna: radius_l (-0.02174634 -0.2224057 0.02174634)
    Marker RASI: pelvis (0.009529735 0.01808021 0.1284541)
    Marker LASI: pelvis (0.009529735 0.01808021 -0.1284541)
    Marker RPSI: pelvis (-0.154988 0.0349973 0.04499653)
    Marker LPSI: pelvis (-0.154988 0.0349973 -0.04499653)
    Marker LHJC: femur_l (0 0 0)
    Marker RHJC: femur_r (0 0 0)
    Marker RTH1: femur_r (0.01651554 -0.1376295 0.05872192)
    Marker RTH2: femur_r (0.0734024 -0.2110319 0.004312391)
    Marker RTH3: femur_r (0.0091753 -0.275259 0.0550518)
    Marker RLFC: femur_r (0 -0.3706821 0.0458765)
    Marker RMFC: femur_r (0 -0.3706821 -0.0458765)
    Marker RKJC: tibia_r (0.001512029 -0.002086792 -0.007382822)
    Marker RTB1: tibia_r (-0.001451565 -0.1366923 0.04301062)
    Marker RTB2: tibia_r (0.03228832 -0.2009985 -0.003421491)
    Marker RTB3: tibia_r (0.009939819 -0.2578886 0.04835181)
    Marker RLMAL: tibia_r (-0.0043675 -0.3396168 0.0462955)
    Marker RMMAL: tibia_r (0.005241 -0.3396168 -0.033193)
    Marker RAJC: talus_r (0 0 0)
    Marker RCAL: calcn_r (-0.025105 0.020084 -0.005021)
    Marker RTOE: calcn_r (0.205861 0.02985567 -0.030126)
    Marker RMT5: calcn_r (0.145609 0.02501462 0.0592478)
    Marker LTH1: femur_l (0.01651554 -0.1376295 -0.05872192)
    Marker LTH2: femur_l (0.0734024 -0.2110319 -0.004312391)
    Marker LTH3: femur_l (0.0091753 -0.275259 -0.0550518)
    Marker LLFC: femur_l (0 -0.3706821 -0.0458765)
    Marker LMFC: femur_l (0 -0.3706821 0.0458765)
    Marker LKJC: tibia_l (0.001512029 -0.002086792 0.007382822)
    Marker LTB1: tibia_l (-0.001451565 -0.1366923 -0.04301062)
    Marker LTB2: tibia_l (0.03228832 -0.2009985 0.003421491)
    Marker LTB3: tibia_l (0.009939819 -0.2578886 -0.04835181)
    Marker LLMAL: tibia_l (-0.0043675 -0.3396168 -0.0462955)
    Marker LMMAL: tibia_l (0.005241 -0.3396168 0.033193)
    Marker LAJC: talus_l (0 0 0)
    Marker LCAL: calcn_l (-0.025105 0.020084 0.005021)
    Marker LTOE: calcn_l (0.205861 0.02985487 0.030126)
    Marker LMT5: calcn_l (0.145609 0.02501362 -0.0592478)
    Marker REJC: ulna_r (0 0 0)
    Marker LEJC: ulna_l (0 0 0)
    Marker R_tibial_plateau: tibia_r (-0.007066213 -0.0148495 -0.00129692)
    Marker L_tibial_plateau: tibia_l (-0.007066213 -0.0148495 0.00129692)
    Marker RHand: hand_r (-0.002181676 -0.08804304 -0.00305705)
    Marker LHand: hand_l (-0.0008015096 -0.08804304 0.003059844)
    Marker RBToe: toes_r (0.080336 -0.0040168 -0.015063)
    Marker LBToe: toes_l (0.080336 -0.0040168 0.015063)
    Marker Head: torso (0.004096962 0.6432768 -0.0003531398)
    Marker NewMarker_70: calcn_r (0.04439416 0.02081413 -0.007766966)
